# OpenSim document version 40000
Model mri_v0_AdaptedForPredSim:
  gravity: 0 -9.80665 0
  length_units: meters
  force_units: N
  credits:
    Delp S.L., Loan J.P., Hoy M.G., Zajac F.E., Topp E.L., Rosen J.M., Thelen D.G., Anderson F.C., Seth A. Notes: 3D, 23 DOF gait model created by D.G. Thelen, Univ. of Wisconsin-Madison, and Ajay Seth, Frank C. Anderson, and Scott L. Delp, Stanford University. Lower extremity joint defintions based on Delp et al. (1990). Low back joint and anthropometry based on Anderson and Pandy (1999, 2001). Planar knee model of Yamaguchi and Zajac (1989). Seth replaced tibia translation constraints with a CustomJoint for the knee and removed the patella to eliminate all kinematic constraints; insertions of the quadrucepts are handled with moving points in the tibia frame as defined by Delp 1990. License: Creative Commons (CCBY 3.0). You are free to distribute, remix, tweak, and build upon this work, even commercially, as long as you credit us for the original creation. http://creativecommons.org/licenses/by/3.0/ More Information: http://simtk-confluence.stanford.edu:8080/display/OpenSim/Gait+2392+and+2354+Models
  publications:
    Delp, S.L., Loan, J.P., Hoy, M.G., Zajac, F.E., Topp E.L., Rosen, J.M.: An interactive graphics-based model of the lower extremity to study orthopaedic surgical procedures, IEEE Transactions on Biomedical Engineering, vol. 37, pp. 757-767, 1990. Yamaguchi G.T., Zajac F.E.: A planar model of the knee joint to characterize the knee extensor mechanism." J . Biomecl7. vol. 21. pp. 1-10. 1989. Anderson F.C., Pandy M.G.: A dynamic optimization solution for vertical jumping in three dimensions. Computer Methods in Biomechanics and Biomedical Engineering 2:201-231, 1999. Anderson F.C., Pandy M.G.: Dynamic optimization of human walking. Journal of Biomechanical Engineering 123:381-390, 2001.
  Ground: meshes=treadmill.vtp
  BodySet:
    Body pelvis: mass=4.134911 [kg] mass_center=(-0.05790252 0 0) inertia=(0.02420921 0.02051189 0.01363535 0 0 0)
        meshes=(sacrum.vtp pelvis.vtp l_pelvis.vtp)
      WrapCylinder Gmax1_at_pelvis_r: xyz_body_rotation=(-0.6 0.45 0.5)
          translation=(-0.04995833 -0.06347165 0.07370901) quadrant=-x radius=0.03194057 length=0.09827868
      WrapEllipsoid Gmax2_at_pelvis_r: xyz_body_rotation=(-0.5 0.39 0) translation=(-0.04750136 -0.03521653 0.07370901)
          quadrant=all dimensions=(0.05487226 0.05487226 0.0818989)
      WrapCylinder Gmax3_at_pelvis_r: xyz_body_rotation=(-0.1 0 0) translation=(-0.06797609 -0.07207103 0.05569125)
          quadrant=all radius=0.03275956 length=0.0818989
      WrapCylinder Post_at_pelvis_r: xyz_body_rotation=(-0.1 0 0) translation=(-0.04913934 -0.05732923 0.05569125)
          quadrant=all radius=0.03275956 length=0.09827868
      WrapCylinder Gmed_at_pelvis_r: xyz_body_rotation=(-1 0.6 0.7) translation=(-0.02456967 -0.0450444 0.0818989)
          quadrant=-x radius=0.03275956 length=0.1228483
      WrapCylinder Gmax1_at_pelvis_l: xyz_body_rotation=(0.6 -0.45 0.5)
          translation=(-0.04995833 -0.06347165 -0.07370901) quadrant=-x radius=0.03194057 length=0.09827868
      WrapEllipsoid Gmax2_at_pelvis_l: xyz_body_rotation=(0.5 -0.39 0)
          translation=(-0.04750136 -0.03521653 -0.07370901) quadrant=all dimensions=(0.05487226 0.05487226 0.0818989)
      WrapCylinder Gmax3_at_pelvis_l: xyz_body_rotation=(0.1 0 0) translation=(-0.06797609 -0.07207103 -0.05569125)
          quadrant=all radius=0.03275956 length=0.0818989
      WrapCylinder Post_at_pelvis_l: xyz_body_rotation=(0.1 0 0) translation=(-0.04913934 -0.05732923 -0.05569125)
          quadrant=all radius=0.03275956 length=0.09827868
      WrapCylinder Gmed_at_pelvis_l: xyz_body_rotation=(1 -0.6 0.7) translation=(-0.02456967 -0.0450444 -0.0818989)
          quadrant=-x radius=0.03275956 length=0.1228483
      WrapCylinder PS_at_brim_r: xyz_body_rotation=(-0.25 -0.27 0.1) translation=(-0.06060519 -0.04913934 0.05372568)
          quadrant=-y radius=0.04094945 length=0.0818989
      WrapCylinder PS_at_brim_l: xyz_body_rotation=(0.25 0.27 0.1) translation=(-0.06060519 -0.04913934 -0.05372568)
          quadrant=-y radius=0.04094945 length=0.0818989
      WrapCylinder IL_at_brim_r: xyz_body_rotation=(-0.32 -0.24 0.9) translation=(-0.05814822 -0.05323428 0.06191557)
          quadrant=-y radius=0.0449625 length=0.0818989
      WrapCylinder IL_at_brim_l: xyz_body_rotation=(0.32 0.24 0.9) translation=(-0.05814822 -0.05323428 -0.06191557)
          quadrant=-y radius=0.0449625 length=0.0818989
    Body femur_r: mass=5.148393 mass_center=(0 -0.1620408 0) inertia=(0.06733715 0.01765148 0.07100825 0 0 0)
        meshes=femur_r.vtp
      WrapCylinder GasLat_at_condyles_r: translation=(0.004765905 -0.3908042 0) quadrant=all radius=0.02478271
          length=0.0953181
      WrapCylinder GasMed_at_condyles_r: translation=(0.004765905 -0.3908042 0) quadrant=all radius=0.02382953
          length=0.0953181
      WrapCylinder KnExt_at_fem_r: xyz_body_rotation=(-0.0623366 0.0507601 0)
          translation=(-0.001811044 -0.3838765 0.001993206) quadrant=all radius=0.02859543 length=0.0953181
      WrapCylinder KnExtVL_at_fem_r: xyz_body_rotation=(-0.0623366 0.0507601 0)
          translation=(-0.003812724 -0.3838765 0.001993206) quadrant=all radius=0.02859543 length=0.0953181
      WrapCylinder AB_at_femshaft_r: xyz_body_rotation=(1.66157 0.186644 0)
          translation=(0.01395781 -0.1073234 0.02227107) quadrant=all radius=0.01572749 length=0.06672267
      WrapCylinder AL_at_femshaft_r: xyz_body_rotation=(1.77711 0.136489 0)
          translation=(0.02929383 -0.2210513 0.01440609) quadrant=all radius=0.01915894 length=0.0953181
      WrapCylinder AMprox_at_femshaft_r: xyz_body_rotation=(1.61126 0.18656 0)
          translation=(0.004940328 -0.06948194 0.02421366) quadrant=all radius=0.02011212 length=0.06672267
      WrapCylinder AMmid_at_femshaft_r: xyz_body_rotation=(1.61139 0.13656 0)
          translation=(0.02193508 -0.1531867 0.01962047) quadrant=all radius=0.02039807 length=0.1143817
      WrapCylinder AMdist_at_femshaft_r: xyz_body_rotation=(1.71188 0.186636 0)
          translation=(0.03012672 -0.2485286 0.008926159) quadrant=all radius=0.02077935 length=0.1906362
      WrapCylinder AMisch_at_condyles_r: xyz_body_rotation=(1.71115 -0.463363 0)
          translation=(-0.0215906 -0.3591881 -0.003006686) quadrant=all radius=0.03812724 length=0.2287634
      WrapCylinder PECT_at_femshaft_r: xyz_body_rotation=(1.81295 0.276344 0)
          translation=(0.005800802 -0.08054656 0.02901531) quadrant=all radius=0.01429772 length=0.04765905
      WrapCylinder Flex_at_femhead_r: translation=(-0.004765905 0 0.00953181) quadrant=all radius=0.02287634
          length=0.05719086
    Body tibia_r: mass=1.277228 mass_center=(0 -0.1519408 0) inertia=(0.01149946 0.001163636 0.01165918 0 0 0)
        meshes=(tibia_r.vtp fibula.vtp)
      WrapCylinder GasLat_at_shank_r: xyz_body_rotation=(2.96723 -0.279725 -1.47812)
          translation=(-0.00602229 -0.0602229 -0.002685616) quadrant=-y radius=0.04476027 length=0.0813823
      WrapCylinder GasMed_at_shank_r: xyz_body_rotation=(2.96723 0.0279725 -1.47812)
          translation=(-0.00602229 -0.0602229 -0.002685616) quadrant=-y radius=0.04801556 length=0.0813823
      WrapCylinder GR_at_condyles_r: xyz_body_rotation=(0 -0.4 0) translation=(-0.002441469 -0.01627646 0) quadrant=all
          radius=0.02929763 length=0.0813823
      WrapCylinder SM_at_condyles_r: xyz_body_rotation=(0 -0.1 0) translation=(-0.000813823 -0.01627646 0) quadrant=all
          radius=0.02807689 length=0.0813823
      WrapCylinder ST_at_condyles_r: xyz_body_rotation=(0 -0.2 0) translation=(-0.001627646 -0.01668337 0) quadrant=all
          radius=0.03458748 length=0.0813823
      WrapCylinder BF140_at_gastroc_r: translation=(-0.0317391 -0.04882938 0) quadrant=y radius=0.02360087
          length=0.1220734
    Body talus_r: mass=0.03444983 mass_center=(0 0 0) inertia=(0.000228164 0.000228164 0.000228164 0 0 0)
        meshes=talus.vtp
    Body calcn_r: mass=0.4306229 mass_center=(0.0813823 0.02441469 0)
        inertia=(0.0003194295 0.0008898394 0.0009354722 0 0 0) meshes=foot.vtp
    Body toes_r: mass=0.07461834 mass_center=(0.02815828 0.004882938 -0.0142419)
        inertia=(2.28164e-5 4.563279e-5 2.28164e-5 0 0 0) meshes=bofoot.vtp
    Body femur_l: mass=5.233933 mass_center=(0 -0.1629333 0) inertia=(0.06921211 0.01814298 0.07298544 0 0 0)
        meshes=femur_l.vtp
      WrapCylinder GasLat_at_condyles_l: translation=(0.004792155 -0.3929567 0) quadrant=all radius=0.02491921
          length=0.0958431
      WrapCylinder Flex_at_femhead_r: translation=(-0.004792155 0 0.00958431) quadrant=all radius=0.02300234
          length=0.05750586
      WrapCylinder GasMed_at_condyles_l: translation=(0.004792155 -0.3929567 0) quadrant=all radius=0.02396078
          length=0.0958431
      WrapCylinder KnExt_at_fem_l: xyz_body_rotation=(0.0623366 -0.0507601 0)
          translation=(-0.001821019 -0.3859908 -0.002004185) quadrant=all radius=0.02875293 length=0.0958431
      WrapCylinder KnExtVL_at_fem_l: xyz_body_rotation=(0.0623366 -0.0507601 0)
          translation=(-0.003833724 -0.3859908 -0.002004185) quadrant=all radius=0.02875293 length=0.0958431
      WrapCylinder AB_at_femshaft_l: xyz_body_rotation=(-1.66157 -0.186644 0)
          translation=(0.01403469 -0.1079145 -0.02239374) quadrant=all radius=0.01581411 length=0.06709017
      WrapCylinder AL_at_femshaft_l: xyz_body_rotation=(-1.77711 -0.136489 0)
          translation=(0.02945517 -0.2222688 -0.01448544) quadrant=all radius=0.01926446 length=0.0958431
      WrapCylinder AMprox_at_femshaft_l: xyz_body_rotation=(-1.61126 -0.18656 0)
          translation=(0.004967538 -0.06986464 -0.02434702) quadrant=all radius=0.02022289 length=0.06709017
      WrapCylinder AMmid_at_femshaft_l: xyz_body_rotation=(-1.61139 -0.13656 0)
          translation=(0.02205589 -0.1540304 -0.01972854) quadrant=all radius=0.02051042 length=0.1150117
      WrapCylinder AMdist_at_femshaft_l: xyz_body_rotation=(-1.71188 -0.186636 0)
          translation=(0.03029265 -0.2498975 -0.008975323) quadrant=all radius=0.0208938 length=0.1916862
      WrapCylinder AMisch_at_condyles_l: xyz_body_rotation=(-1.71115 0.463363 0)
          translation=(-0.02170952 -0.3611665 0.003023246) quadrant=all radius=0.03833724 length=0.2300234
      WrapCylinder PECT_at_femshaft_l: xyz_body_rotation=(-1.81295 -0.276344 0)
          translation=(0.005832752 -0.0809902 -0.02917512) quadrant=all radius=0.01437646 length=0.04792155
      WrapCylinder Flex_at_femhead_l: translation=(-0.004792155 0 -0.00958431) quadrant=all radius=0.02300234
          length=0.05750586
    Body tibia_l: mass=1.262071 mass_center=(0 -0.1513373 0) inertia=(0.01127293 0.001140713 0.01142949 0 0 0)
        meshes=(tibia_l.vtp l_fibula.vtp)
      WrapCylinder GasLat_at_shank_l: xyz_body_rotation=(-2.96723 0.279725 -1.47812)
          translation=(-0.005998373 -0.05998373 0.00267495) quadrant=-y radius=0.04458251 length=0.0810591
      WrapCylinder GasMed_at_shank_l: xyz_body_rotation=(-2.96723 -0.0279725 -1.47812)
          translation=(-0.005998373 -0.05998373 0.00267495) quadrant=-y radius=0.04782487 length=0.0810591
      WrapCylinder GR_at_condyles_l: xyz_body_rotation=(0 0.4 0) translation=(-0.002431773 -0.01621182 0) quadrant=all
          radius=0.02918128 length=0.0810591
      WrapCylinder SM_at_condyles_l: xyz_body_rotation=(0 0.1 0) translation=(-0.000810591 -0.01621182 0) quadrant=all
          radius=0.02796539 length=0.0810591
      WrapCylinder ST_at_condyles_l: xyz_body_rotation=(0 0.2 0) translation=(-0.001621182 -0.01661712 0) quadrant=all
          radius=0.03445012 length=0.0810591
      WrapCylinder BF140_at_gastroc_l: translation=(-0.03161305 -0.04863546 0) quadrant=all radius=0.02350714
          length=0.1215886
    Body talus_l: mass=0.03404102 mass_center=(0 0 0) inertia=(0.0002236692 0.0002236692 0.0002236692 0 0 0)
        meshes=l_talus.vtp
    Body calcn_l: mass=0.4255128 mass_center=(0.0810591 0.02431773 0)
        inertia=(0.0003131368 0.0008723098 0.0009170436 0 0 0) meshes=l_foot.vtp
    Body toes_l: mass=0.07373285 mass_center=(0.02804645 0.004863546 0.01418534)
        inertia=(2.236692e-5 4.473383e-5 2.236692e-5 0 0 0) meshes=l_bofoot.vtp
    Body torso: mass=9.418833 mass_center=(-0.02456967 0.2620765 0) inertia=(0.3472421 0.1779189 0.3370921 0 0 0)
        meshes=(hat_spine.vtp hat_jaw.vtp hat_skull.vtp hat_ribs_scap.vtp)
    Body humerus_r: mass=0.7136118 mass_center=(0 -0.1347253 0) inertia=(0.002813261 0.0009704881 0.003157795 0 0 0)
        meshes=humerus_rv.vtp
    Body ulna_r: mass=0.2132936 mass_center=(0 -0.09870865 0) inertia=(0.0006975457 0.0001455379 0.0007566557 0 0 0)
        meshes=ulna_rv.vtp
    Body radius_r: mass=0.2132936 mass_center=(0 -0.09870865 0) inertia=(0.0006975457 0.0001455379 0.0007566557 0 0 0)
        meshes=radius_rv.vtp
    Body hand_r: mass=0.1606285 mass_center=(0 -0.05576906 0) inertia=(0.0002100644 0.0001288175 0.0003155676 0 0 0)
        meshes=(pisiform_rvs.vtp lunate_rvs.vtp scaphoid_rvs.vtp triquetrum_rvs.vtp hamate_rvs.vtp capitate_rvs.vtp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)
    Body humerus_l: mass=0.7136118 mass_center=(0 -0.1347253 0) inertia=(0.002813261 0.0009704881 0.003157795 0 0 0)
        meshes=humerus_lv.vtp
    Body ulna_l: mass=0.2132936 mass_center=(0 -0.09870865 0) inertia=(0.0006975457 0.0001455379 0.0007566557 0 0 0)
        meshes=ulna_lv.vtp
    Body radius_l: mass=0.2132936 mass_center=(0 -0.09870865 0) inertia=(0.0006975457 0.0001455379 0.0007566557 0 0 0)
        meshes=radius_lv.vtp
    Body hand_l: mass=0.1606285 mass_center=(0 -0.05576906 0) inertia=(0.0002100644 0.0001288175 0.0003155676 0 0 0)
        meshes=(pisiform_lvs.vtp lunate_lvs.vtp scaphoid_lvs.vtp triquetrum_lvs.vtp hamate_lvs.vtp capitate_lvs.vtp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)
  JointSet:
    CustomJoint ground_pelvis: socket_parent_frame=ground_offset socket_child_frame=pelvis_offset
      Coordinate pelvis_tilt: default_value=0 range=(-1.570796 1.570796) clamped=false
      Coordinate pelvis_list: default_value=0 range=(-1.570796 1.570796) clamped=false
      Coordinate pelvis_rotation: default_value=0 range=(-1.570796 1.570796) clamped=false
      Coordinate pelvis_tx: default_value=0 range=(-5 5) clamped=false
      Coordinate pelvis_ty: default_value=0.95 range=(-1 2) clamped=false
      Coordinate pelvis_tz: default_value=0 range=(-3 3) clamped=false
      PhysicalOffsetFrame ground_offset: socket_parent=/ground translation=(0 0 0) [meters]
      PhysicalOffsetFrame pelvis_offset: socket_parent=/bodyset/pelvis translation=(0 0 0)
      SpatialTransform:
        TransformAxis rotation1: coordinates=pelvis_tilt axis=(0 0 1) LinearFunction(coefficients=1 0)
        TransformAxis rotation2: coordinates=pelvis_list axis=(1 0 0) LinearFunction(coefficients=1 0)
        TransformAxis rotation3: coordinates=pelvis_rotation axis=(0 1 0) LinearFunction(coefficients=1 0)
        TransformAxis translation1: coordinates=pelvis_tx axis=(1 0 0) LinearFunction(coefficients=1 0)
        TransformAxis translation2: coordinates=pelvis_ty axis=(0 1 0) LinearFunction(coefficients=1 0)
        TransformAxis translation3: coordinates=pelvis_tz axis=(0 0 1) LinearFunction(coefficients=1 0)
    CustomJoint hip_r: socket_parent_frame=pelvis_offset socket_child_frame=femur_r_offset
      Coordinate hip_flexion_r: default_value=0 range=(-2.094395 2.094395) clamped=false
      Coordinate hip_adduction_r: default_value=0 range=(-2.094395 2.094395) clamped=false
      Coordinate hip_rotation_r: default_value=0 range=(-2.094395 2.094395) clamped=false
      PhysicalOffsetFrame pelvis_offset: socket_parent=/bodyset/pelvis translation=(-0.05790252 -0.05413517 0.06838558)
      PhysicalOffsetFrame femur_r_offset: socket_parent=/bodyset/femur_r translation=(0 0 0)
      SpatialTransform: axes_held_at_zero=(translation1 translation2 translation3)
        TransformAxis rotation1: coordinates=hip_flexion_r axis=(0 0 1) LinearFunction(coefficients=1 0)
        TransformAxis rotation2: coordinates=hip_adduction_r axis=(1 0 0) LinearFunction(coefficients=1 0)
        TransformAxis rotation3: coordinates=hip_rotation_r axis=(0 1 0) LinearFunction(coefficients=1 0)
    CustomJoint knee_r: socket_parent_frame=femur_r_offset socket_child_frame=tibia_r_offset
      Coordinate knee_angle_r: default_value=0 range=(-2.094395 0.1745329) clamped=false
      PhysicalOffsetFrame femur_r_offset: socket_parent=/bodyset/femur_r translation=(0 0 0)
      PhysicalOffsetFrame tibia_r_offset: socket_parent=/bodyset/tibia_r translation=(0 0 0)
      SpatialTransform: axes_held_at_zero=(rotation2 rotation3)
        TransformAxis rotation1: coordinates=knee_angle_r axis=(0 0 1) LinearFunction(coefficients=1 0)
        TransformAxis translation1: coordinates=knee_angle_r axis=(1 0 0)
          PolynomialFunction: coefficients=(0.0004651343 -0.0005050733 -0.00335172 -5.060236e-7)
        TransformAxis translation2: coordinates=knee_angle_r axis=(0 1 0)
          PolynomialFunction: coefficients=(-0.0003968446 -0.001592807 -0.0003265301 -0.3773358)
        TransformAxis translation3: axis=(0 0 1) Constant(value=-3.05331e-8)
    CustomJoint ankle_r: socket_parent_frame=tibia_r_offset socket_child_frame=talus_r_offset
      Coordinate ankle_angle_r: default_value=0 range=(-1.570796 1.570796) clamped=false
      PhysicalOffsetFrame tibia_r_offset: socket_parent=/bodyset/tibia_r translation=(0 -0.3499439 0)
      PhysicalOffsetFrame talus_r_offset: socket_parent=/bodyset/talus_r translation=(0 0 0)
      SpatialTransform: axes_held_at_zero=(rotation2 rotation3 translation1 translation2 translation3)
        TransformAxis rotation1: coordinates=ankle_angle_r axis=(-0.1050135 -0.1740224 0.9791263)
            LinearFunction(coefficients=1 0)
    CustomJoint subtalar_r: socket_parent_frame=talus_r_offset socket_child_frame=calcn_r_offset
      Coordinate subtalar_angle_r: default_value=0 range=(-1.570796 1.570796) clamped=false
      PhysicalOffsetFrame talus_r_offset: socket_parent=/bodyset/talus_r
          translation=(-0.03969015 -0.03413987 0.006445478)
      PhysicalOffsetFrame calcn_r_offset: socket_parent=/bodyset/calcn_r translation=(0 0 0)
      SpatialTransform: axes_held_at_zero=(rotation2 rotation3 translation1 translation2 translation3)
        TransformAxis rotation1: coordinates=subtalar_angle_r axis=(0.7871796 0.6047475 -0.1209495)
            LinearFunction(coefficients=1 0)
    PinJoint mtp_r: socket_parent_frame=calcn_r_offset socket_child_frame=toes_r_offset
      Coordinate mtp_angle_r: default_value=0 range=(-1.570796 1.570796) clamped=false
      PhysicalOffsetFrame calcn_r_offset: socket_parent=/bodyset/calcn_r
          translation=(0.1455116 -0.001627646 0.0008789288)
      PhysicalOffsetFrame toes_r_offset: socket_parent=/bodyset/toes_r translation=(0 0 0)
    CustomJoint hip_l: socket_parent_frame=pelvis_offset socket_child_frame=femur_l_offset
      Coordinate hip_flexion_l: default_value=0 range=(-2.094395 2.094395) clamped=false
      Coordinate hip_adduction_l: default_value=0 range=(-2.094395 2.094395) clamped=false
      Coordinate hip_rotation_l: default_value=0 range=(-2.094395 2.094395) clamped=false
      PhysicalOffsetFrame pelvis_offset: socket_parent=/bodyset/pelvis
          translation=(-0.05790252 -0.05413517 -0.06838558)
      PhysicalOffsetFrame femur_l_offset: socket_parent=/bodyset/femur_l translation=(0 0 0)
      SpatialTransform: axes_held_at_zero=(translation1 translation2 translation3)
        TransformAxis rotation1: coordinates=hip_flexion_l axis=(0 0 1) LinearFunction(coefficients=1 0)
        TransformAxis rotation2: coordinates=hip_adduction_l axis=(-1 0 0) LinearFunction(coefficients=1 0)
        TransformAxis rotation3: coordinates=hip_rotation_l axis=(0 -1 0) LinearFunction(coefficients=1 0)
    CustomJoint knee_l: socket_parent_frame=femur_l_offset socket_child_frame=tibia_l_offset
      Coordinate knee_angle_l: default_value=0 range=(-2.094395 0.1745329) clamped=false
      PhysicalOffsetFrame femur_l_offset: socket_parent=/bodyset/femur_l translation=(0 0 0)
      PhysicalOffsetFrame tibia_l_offset: socket_parent=/bodyset/tibia_l translation=(0 0 0)
      SpatialTransform: axes_held_at_zero=(rotation2 rotation3)
        TransformAxis rotation1: coordinates=knee_angle_l axis=(0 0 1) LinearFunction(coefficients=1 0)
        TransformAxis translation1: coordinates=knee_angle_l axis=(1 0 0)
          PolynomialFunction: coefficients=(-1.902239e-9 -1.183493e-7 4.499875e-5 -3.777988e-7)
        TransformAxis translation2: coordinates=knee_angle_l axis=(0 1 0)
          PolynomialFunction: coefficients=(6.970101e-9 -1.602291e-6 1.883489e-5 -0.3795147)
        TransformAxis translation3: axis=(0 0 1) Constant(value=-4.25877e-8)
    CustomJoint ankle_l: socket_parent_frame=tibia_l_offset socket_child_frame=talus_l_offset
      Coordinate ankle_angle_l: default_value=0 range=(-1.570796 1.570796) clamped=false
      PhysicalOffsetFrame tibia_l_offset: socket_parent=/bodyset/tibia_l translation=(0 -0.3485541 0)
      PhysicalOffsetFrame talus_l_offset: socket_parent=/bodyset/talus_l translation=(0 0 0)
      SpatialTransform: axes_held_at_zero=(rotation2 rotation3 translation1 translation2 translation3)
        TransformAxis rotation1: coordinates=ankle_angle_l axis=(0.1050135 0.1740224 0.9791263)
            LinearFunction(coefficients=1 0)
    CustomJoint subtalar_l: socket_parent_frame=talus_l_offset socket_child_frame=calcn_l_offset
      Coordinate subtalar_angle_l: default_value=0 range=(-1.570796 1.570796) clamped=false
      PhysicalOffsetFrame talus_l_offset: socket_parent=/bodyset/talus_l
          translation=(-0.03953252 -0.03400429 -0.006419881)
      PhysicalOffsetFrame calcn_l_offset: socket_parent=/bodyset/calcn_l translation=(0 0 0)
      SpatialTransform: axes_held_at_zero=(rotation2 rotation3 translation1 translation2 translation3)
        TransformAxis rotation1: coordinates=subtalar_angle_l axis=(-0.7871796 -0.6047475 -0.1209495)
            LinearFunction(coefficients=1 0)
    PinJoint mtp_l: socket_parent_frame=calcn_l_offset socket_child_frame=toes_l_offset
      Coordinate mtp_angle_l: default_value=0 range=(-1.570796 1.570796) clamped=false
      PhysicalOffsetFrame calcn_l_offset: socket_parent=/bodyset/calcn_l
          translation=(0.1449337 -0.001621182 -0.0008754383)
      PhysicalOffsetFrame toes_l_offset: socket_parent=/bodyset/toes_l translation=(0 0 0)
    CustomJoint back: socket_parent_frame=pelvis_offset socket_child_frame=torso_offset
      Coordinate lumbar_extension: default_value=0 range=(-1.570796 1.570796) clamped=true
      Coordinate lumbar_bending: default_value=0 range=(-1.570796 1.570796) clamped=true
      Coordinate lumbar_rotation: default_value=0 range=(-1.570796 1.570796) clamped=true
      PhysicalOffsetFrame pelvis_offset: socket_parent=/bodyset/pelvis translation=(-0.08247219 0.0667476 0)
      PhysicalOffsetFrame torso_offset: socket_parent=/bodyset/torso translation=(0 0 0)
      SpatialTransform: axes_held_at_zero=(translation1 translation2 translation3)
        TransformAxis rotation1: coordinates=lumbar_extension axis=(0 0 1) LinearFunction(coefficients=1 0)
        TransformAxis rotation2: coordinates=lumbar_bending axis=(1 0 0) LinearFunction(coefficients=1 0)
        TransformAxis rotation3: coordinates=lumbar_rotation axis=(0 1 0) LinearFunction(coefficients=1 0)
    CustomJoint acromial_r: socket_parent_frame=torso_offset socket_child_frame=humerus_r_offset
      Coordinate arm_flex_r: default_value=0 range=(-1.570796 1.570796) clamped=true
      Coordinate arm_add_r: default_value=0 range=(-2.094395 1.570796) clamped=true
      Coordinate arm_rot_r: default_value=0 range=(-1.570796 1.570796) clamped=true
      PhysicalOffsetFrame torso_offset: socket_parent=/bodyset/torso translation=(0.00258391 0.3042544 0.1392281)
      PhysicalOffsetFrame humerus_r_offset: socket_parent=/bodyset/humerus_r translation=(0 0 0)
      SpatialTransform: axes_held_at_zero=(translation1 translation2 translation3)
        TransformAxis rotation1: coordinates=arm_flex_r axis=(0 0 1) LinearFunction(coefficients=1 0)
        TransformAxis rotation2: coordinates=arm_add_r axis=(1 0 0) LinearFunction(coefficients=1 0)
        TransformAxis rotation3: coordinates=arm_rot_r axis=(0 1 0) LinearFunction(coefficients=1 0)
    CustomJoint elbow_r: socket_parent_frame=humerus_r_offset socket_child_frame=ulna_r_offset
      Coordinate elbow_flex_r: default_value=0 range=(0 2.618) clamped=true
      PhysicalOffsetFrame humerus_r_offset: socket_parent=/bodyset/humerus_r
          translation=(0.01076479 -0.2344544 -0.007858199)
      PhysicalOffsetFrame ulna_r_offset: socket_parent=/bodyset/ulna_r translation=(0 0 0)
      SpatialTransform: axes_held_at_zero=(rotation2 rotation3 translation1 translation2 translation3)
        TransformAxis rotation1: coordinates=elbow_flex_r axis=(0.226047 0.022269 0.9738618)
            LinearFunction(coefficients=1 0)
    WeldJoint radioulnar_r: socket_parent_frame=ulna_r_offset socket_child_frame=radius_r_offset
      PhysicalOffsetFrame ulna_r_offset: socket_parent=/bodyset/ulna_r
          translation=(-0.005509339 -0.01065259 0.02136169) orientation=(0 1.570796 0) [radians]
      PhysicalOffsetFrame radius_r_offset: socket_parent=/bodyset/radius_r translation=(0 0 0)
    WeldJoint radius_hand_r: socket_parent_frame=radius_r_offset socket_child_frame=hand_r_offset
      PhysicalOffsetFrame radius_r_offset: socket_parent=/bodyset/radius_r
          translation=(-0.007204646 -0.1931512 0.01114644)
      PhysicalOffsetFrame hand_r_offset: socket_parent=/bodyset/hand_r translation=(0 0 0)
    CustomJoint acromial_l: socket_parent_frame=torso_offset socket_child_frame=humerus_l_offset
      Coordinate arm_flex_l: default_value=0 range=(-1.570796 1.570796) clamped=true
      Coordinate arm_add_l: default_value=0 range=(-2.094395 1.570796) clamped=true
      Coordinate arm_rot_l: default_value=0 range=(-1.570796 1.570796) clamped=true
      PhysicalOffsetFrame torso_offset: socket_parent=/bodyset/torso translation=(0.00258391 0.3042544 -0.1392281)
      PhysicalOffsetFrame humerus_l_offset: socket_parent=/bodyset/humerus_l translation=(0 0 0)
      SpatialTransform: axes_held_at_zero=(translation1 translation2 translation3)
        TransformAxis rotation1: coordinates=arm_flex_l axis=(0 0 1) LinearFunction(coefficients=1 0)
        TransformAxis rotation2: coordinates=arm_add_l axis=(-1 0 0) LinearFunction(coefficients=1 0)
        TransformAxis rotation3: coordinates=arm_rot_l axis=(0 -1 0) LinearFunction(coefficients=1 0)
    CustomJoint elbow_l: socket_parent_frame=humerus_l_offset socket_child_frame=ulna_l_offset
      Coordinate elbow_flex_l: default_value=0 range=(0 2.618) clamped=true
      PhysicalOffsetFrame humerus_l_offset: socket_parent=/bodyset/humerus_l
          translation=(0.01076479 -0.2344544 0.007858199)
      PhysicalOffsetFrame ulna_l_offset: socket_parent=/bodyset/ulna_l translation=(0 0 0)
      SpatialTransform: axes_held_at_zero=(rotation2 rotation3 translation1 translation2 translation3)
        TransformAxis rotation1: coordinates=elbow_flex_l axis=(-0.226047 -0.022269 0.9738618)
            LinearFunction(coefficients=1 0)
    WeldJoint radioulnar_l: socket_parent_frame=ulna_l_offset socket_child_frame=radius_l_offset
      PhysicalOffsetFrame ulna_l_offset: socket_parent=/bodyset/ulna_l
          translation=(-0.005509339 -0.01065259 -0.02136169) orientation=(0 -1.570796 0)
      PhysicalOffsetFrame radius_l_offset: socket_parent=/bodyset/radius_l translation=(0 0 0)
    WeldJoint radius_hand_l: socket_parent_frame=radius_l_offset socket_child_frame=hand_l_offset
      PhysicalOffsetFrame radius_l_offset: socket_parent=/bodyset/radius_l
          translation=(-0.007204646 -0.1931512 -0.01114644)
      PhysicalOffsetFrame hand_l_offset: socket_parent=/bodyset/hand_l translation=(0 0 0)
  ForceSet:
    Thelen2003Muscle [values shared by the 92 below unless stated]: optimal_force=1 max_contraction_velocity=10
        FmaxTendonStrain=0.033 FmaxMuscleStrain=0.6 KshapeActive=0.5 KshapePassive=4 Af=0.3 Flen=1.8
        activation_time_constant=0.01 [seconds] deactivation_time_constant=0.04 [seconds]
    Thelen2003Muscle glut_med1_r: max_isometric_force=445.4509 optimal_fiber_length=0.04435683
        tendon_slack_length=0.06466978 pennation_angle_at_optimal=0.1396263 [radians]
      PathPoint P1: pelvis (-0.0366778 0.0210481 0.0932753)
      PathPoint P2: femur_r (-0.0174653 -0.0164084 0.0398644)
      PathWrap: wrap_object=Gmed_at_pelvis_r method=hybrid
    Thelen2003Muscle glut_med2_r: max_isometric_force=311.6525 optimal_fiber_length=0.07106145
        tendon_slack_length=0.04457109 pennation_angle_at_optimal=0
      PathPoint P1: pelvis (-0.0729694 0.0346276 0.0623637)
      PathPoint P2: femur_r (-0.0232935 -0.0129663 0.0359704)
      PathWrap: wrap_object=Gmed_at_pelvis_r method=hybrid
    Thelen2003Muscle glut_med3_r: max_isometric_force=355.1642 optimal_fiber_length=0.04930556
        tendon_slack_length=0.04045193 pennation_angle_at_optimal=0.3316126
      PathPoint P1: pelvis (-0.0880086 -0.00141598 0.0497362)
      PathPoint P2: femur_r (-0.0284948 -0.0119555 0.03436)
      PathWrap: wrap_object=Gmed_at_pelvis_r method=hybrid
    Thelen2003Muscle glut_min1_r: max_isometric_force=146.852 optimal_fiber_length=0.06268799
        tendon_slack_length=0.01475011 pennation_angle_at_optimal=0.1745329
      PathPoint P1: pelvis (-0.0274852 -0.00932797 0.0821884)
      PathPoint P2: femur_r (-0.010796 -0.0138681 0.0393063)
    Thelen2003Muscle glut_min2_r: max_isometric_force=155.0104 optimal_fiber_length=0.0509595
        tendon_slack_length=0.02365977 pennation_angle_at_optimal=0
      PathPoint P1: pelvis (-0.0533527 -0.0009811 0.0717054)
      PathPoint P2: femur_r (-0.0129401 -0.0129978 0.0344088)
    Thelen2003Muscle glut_min3_r: max_isometric_force=175.6785 optimal_fiber_length=0.02679145
        tendon_slack_length=0.03595695 pennation_angle_at_optimal=0.01745329
      PathPoint P1: pelvis (-0.0670967 -0.0249334 0.0590908)
      PathPoint P2: femur_r (-0.0183213 -0.0134114 0.0331012)
    Thelen2003Muscle semimem_r: max_isometric_force=700.5382 optimal_fiber_length=0.06820754
        tendon_slack_length=0.3060813 pennation_angle_at_optimal=0.2617994
      PathPoint P1: pelvis (-0.0708235 -0.118353 0.0599969)
      PathPoint P2: tibia_r (-0.0208935 -0.0390342 -0.0234441)
      PathWrap: wrap_object=SM_at_condyles_r method=hybrid
      PathWrap pathwrap_0: wrap_object=Post_at_pelvis_r method=hybrid
    Thelen2003Muscle semiten_r: max_isometric_force=222.9974 optimal_fiber_length=0.1746213
        tendon_slack_length=0.2219688 pennation_angle_at_optimal=0.08726646
      PathPoint P1: pelvis (-0.079191 -0.116713 0.0566168)
      PathPoint P2: tibia_r (-0.0231356 -0.0203662 -0.029752)
      PathPoint P3: tibia_r (-0.0151603 -0.0494857 -0.0280217)
      PathPoint P4: tibia_r (0.0130233 -0.0698605 -0.0161961)
      PathWrap: wrap_object=ST_at_condyles_r method=hybrid
      PathWrap pathwrap_0: wrap_object=Post_at_pelvis_r method=hybrid
    Thelen2003Muscle bifemlh_r: max_isometric_force=487.3309 optimal_fiber_length=0.0963101
        tendon_slack_length=0.2880467 pennation_angle_at_optimal=0
      PathPoint P1: pelvis (-0.0783916 -0.11786 0.0622231)
      PathPoint P2: tibia_r (-0.0152638 -0.0268754 0.0379086)
      PathPoint P3: tibia_r (-0.00688097 -0.0537313 0.0389045)
      PathWrap: wrap_object=Post_at_pelvis_r method=hybrid
    Thelen2003Muscle bifemsh_r: max_isometric_force=437.2925 optimal_fiber_length=0.1641671
        tendon_slack_length=0.08445593 pennation_angle_at_optimal=0.4014257
      PathPoint P1: femur_r (-0.00566074 -0.200855 0.00881302)
      PathPoint P2: tibia_r (-0.0124217 -0.0262649 0.038732)
      PathPoint P3: tibia_r (-0.00430741 -0.0530627 0.0382945)
      PathWrap: wrap_object=BF140_at_gastroc_r method=hybrid
    Thelen2003Muscle sar_r: max_isometric_force=84.8478 optimal_fiber_length=0.4806218 tendon_slack_length=0.09242727
        pennation_angle_at_optimal=0
      PathPoint P1: pelvis (-9.57213e-5 -0.00373655 0.0902889)
      PathPoint P2: femur_r (-0.00735128 -0.357375 -0.0404571)
      PathPoint P3: tibia_r (-0.012398 -0.0280296 -0.0381331)
      PathPoint P4: tibia_r (0.00139351 -0.0487527 -0.032386)
      PathPoint P5: tibia_r (0.0213574 -0.0692737 -0.0132383)
      PathWrap: wrap_object=Flex_at_femhead_r method=hybrid
    Thelen2003Muscle add_long_r: max_isometric_force=341.0229 optimal_fiber_length=0.1305349
        tendon_slack_length=0.1040496 pennation_angle_at_optimal=0.1047198
      PathPoint P1: pelvis (-0.00393644 -0.0852 0.0199723)
      PathPoint P2: femur_r (-0.0022132 -0.21983 0.00682769)
      PathWrap: wrap_object=AL_at_femshaft_r method=hybrid
    Thelen2003Muscle add_brev_r: max_isometric_force=233.3314 optimal_fiber_length=0.1123388
        tendon_slack_length=0.01689306 pennation_angle_at_optimal=0
      PathPoint P1: pelvis (-0.00669245 -0.0895329 0.0213106)
      PathPoint P2: femur_r (-0.0117471 -0.112909 0.00852008)
      PathWrap: wrap_object=AB_at_femshaft_r method=hybrid
    Thelen2003Muscle add_mag1_r: max_isometric_force=207.2244 optimal_fiber_length=0.09036764
        tendon_slack_length=0.06232251 pennation_angle_at_optimal=0.08726646
      PathPoint P1: pelvis (-0.0130711 -0.0912241 0.020223)
      PathPoint P2: femur_r (-0.0202514 -0.1129 0.0180933)
      PathWrap: wrap_object=AMprox_at_femshaft_r method=hybrid
    Thelen2003Muscle add_mag2_r: max_isometric_force=186.5564 optimal_fiber_length=0.1275963
        tendon_slack_length=0.1265418 pennation_angle_at_optimal=0.05235988
      PathPoint P1: pelvis (-0.0344462 -0.110602 0.0160488)
      PathPoint P2: femur_r (-0.000477764 -0.249041 0.00447434)
      PathWrap: wrap_object=AMdist_at_femshaft_r method=hybrid
      PathWrap pathwrap_0: wrap_object=Post_at_pelvis_r method=hybrid
    Thelen2003Muscle add_mag3_r: max_isometric_force=265.4213 optimal_fiber_length=0.1173011
        tendon_slack_length=0.2229616 pennation_angle_at_optimal=0.08726646
      PathPoint P1: pelvis (-0.0649831 -0.115841 0.0494051)
      PathPoint P2: femur_r (-0.00859755 -0.365201 -0.0280362)
      PathWrap: wrap_object=AMisch_at_condyles_r method=hybrid
      PathWrap pathwrap_0: wrap_object=Post_at_pelvis_r method=hybrid
    Thelen2003Muscle tfl_r: max_isometric_force=126.7278 optimal_fiber_length=0.08494428 tendon_slack_length=0.3800139
        pennation_angle_at_optimal=0.05235988
      PathPoint P1: pelvis (-0.0110132 0.0034177 0.0899362)
      PathPoint P2: femur_r (0.0270791 -0.0911049 0.0399121)
      PathPoint P3: femur_r (0.0105859 -0.371333 0.0367656)
      PathPoint P4: tibia_r (0.00878368 -0.0409381 0.0355056)
    Thelen2003Muscle pect_r: max_isometric_force=144.6764 optimal_fiber_length=0.0861565 tendon_slack_length=0.02843165
        pennation_angle_at_optimal=0
      PathPoint P1: pelvis (-0.0124342 -0.0789757 0.0251475)
      PathPoint P2: femur_r (-0.0166154 -0.065918 0.00616709)
    Thelen2003Muscle grac_r: max_isometric_force=88.11117 optimal_fiber_length=0.3211937 tendon_slack_length=0.1149728
        pennation_angle_at_optimal=0.05235988
      PathPoint P1: pelvis (-0.0460255 -0.117009 0.0260701)
      PathPoint P2: tibia_r (-0.0150209 -0.034254 -0.0317767)
      PathPoint P3: tibia_r (0.0168583 -0.0695225 -0.0148914)
      PathWrap: wrap_object=GR_at_condyles_r method=hybrid
    Thelen2003Muscle glut_max1_r: max_isometric_force=311.6525 optimal_fiber_length=0.1070555
        tendon_slack_length=0.09423903 pennation_angle_at_optimal=0.08726646
      PathPoint P1: pelvis (-0.100366 0.0254703 0.0484736)
      PathPoint P2: pelvis (-0.114022 -0.0157464 0.0644228)
      PathPoint P3: femur_r (-0.0435884 -0.0450841 0.0236054)
      PathPoint P4: femur_r (-0.0352798 -0.0581506 0.0211171)
      PathWrap: wrap_object=Gmax1_at_pelvis_r method=hybrid
    Thelen2003Muscle glut_max2_r: max_isometric_force=445.4509 optimal_fiber_length=0.1030063
        tendon_slack_length=0.08899187 pennation_angle_at_optimal=0
      PathPoint P1: pelvis (-0.102953 -0.00986919 0.0356838)
      PathPoint P2: pelvis (-0.113704 -0.0308701 0.0532714)
      PathPoint P3: femur_r (-0.0388167 -0.069575 0.0177052)
      PathPoint P4: femur_r (-0.0252013 -0.0803706 0.0193656)
      PathWrap: wrap_object=Gmax2_at_pelvis_r method=hybrid
    Thelen2003Muscle glut_max3_r: max_isometric_force=300.2307 optimal_fiber_length=0.09805516
        tendon_slack_length=0.0987361 pennation_angle_at_optimal=0.08726646
      PathPoint P1: pelvis (-0.119355 -0.0389209 0.00845719)
      PathPoint P2: pelvis (-0.110848 -0.0792978 0.0343382)
      PathPoint P3: femur_r (-0.0330564 -0.101419 0.0169045)
      PathPoint P4: femur_r (-0.0176302 -0.109519 0.0170931)
      PathWrap: wrap_object=Gmax3_at_pelvis_r method=hybrid
    Thelen2003Muscle iliacus_r: max_isometric_force=583.6006 optimal_fiber_length=0.07841128
        tendon_slack_length=0.07841128 pennation_angle_at_optimal=0.1221731
      PathPoint P1: pelvis (-0.055632 0.00774465 0.0611813)
      PathPoint P2: pelvis (-0.00745784 -0.0494051 0.058068)
      PathPoint P3: femur_r (0.00576692 -0.0420653 0.000550803)
      PathPoint P4: femur_r (-0.0101408 -0.0570534 0.00124338)
      PathWrap: wrap_object=IL_at_brim_r method=hybrid range=(2 3)
    Thelen2003Muscle psoas_r: max_isometric_force=605.3564 optimal_fiber_length=0.07502102
        tendon_slack_length=0.1200336 pennation_angle_at_optimal=0.1396263
      PathPoint P1: pelvis (-0.0506375 0.0414909 0.0179917)
      PathPoint P2: pelvis (-0.00660177 -0.0494976 0.0527148)
      PathPoint P3: femur_r (0.00581263 -0.0425595 -0.00262852)
      PathPoint P4: femur_r (-0.0101293 -0.0572611 0.000389339)
      PathWrap: wrap_object=PS_at_brim_r method=hybrid range=(2 3)
    Thelen2003Muscle quad_fem_r: max_isometric_force=207.2244 optimal_fiber_length=0.02573539
        tendon_slack_length=0.01143795 pennation_angle_at_optimal=0
      PathPoint P1: pelvis (-0.0665021 -0.108543 0.0566297)
      PathPoint P2: femur_r (-0.0294213 -0.0395824 0.00935929)
    Thelen2003Muscle gem_r: max_isometric_force=89.19897 optimal_fiber_length=0.014233 tendon_slack_length=0.02312863
        pennation_angle_at_optimal=0
      PathPoint P1: pelvis (-0.0825385 -0.0845569 0.0564527)
      PathPoint P2: femur_r (-0.021611 -0.010673 0.0206106)
    Thelen2003Muscle peri_r: max_isometric_force=241.4899 optimal_fiber_length=0.01782929
        tendon_slack_length=0.07886033 pennation_angle_at_optimal=0.1745329
      PathPoint P1: pelvis (-0.10592 -0.0249421 0.015999)
      PathPoint P2: pelvis (-0.089977 -0.0410975 0.0428708)
      PathPoint P3: femur_r (-0.0233301 -0.0104466 0.0271504)
    Thelen2003Muscle rect_fem_r: max_isometric_force=635.8146 optimal_fiber_length=0.1016904
        tendon_slack_length=0.2765266 pennation_angle_at_optimal=0.08726646
      PathPoint P1: pelvis (-0.0145794 -0.0309497 0.0727899)
      MovingPathPoint P2: tibia_r socket_x_coordinate=/jointset/knee_r/knee_angle_r
          socket_y_coordinate=/jointset/knee_r/knee_angle_r socket_z_coordinate=/jointset/knee_r/knee_angle_r
        x_location: PolynomialFunction: coefficients=(0.002818544 0.01253814 0.02236404 0.03847333)
        y_location: PolynomialFunction: coefficients=(0.001180647 0.002617868 0.002073645 0.03440758)
        z_location: PolynomialFunction: coefficients=(-0.0001590725 -0.0007754431 -0.001388931 -0.002483979)
      PathWrap: wrap_object=KnExt_at_fem_r method=hybrid
      PathWrap pathwrap_0: wrap_object=Flex_at_femhead_r method=hybrid
    Thelen2003Muscle vas_med_r: max_isometric_force=703.8016 optimal_fiber_length=0.1126476
        tendon_slack_length=0.1594787 pennation_angle_at_optimal=0.08726646
      PathPoint P1: femur_r (-0.0111407 -0.134181 0.00940228)
      PathPoint P2: femur_r (0.0200199 -0.263563 -0.0141015)
      MovingPathPoint P3: tibia_r socket_x_coordinate=/jointset/knee_r/knee_angle_r
          socket_y_coordinate=/jointset/knee_r/knee_angle_r socket_z_coordinate=/jointset/knee_r/knee_angle_r
        x_location: PolynomialFunction: coefficients=(0.002743808 0.01222239 0.02191671 0.03913535)
        y_location: PolynomialFunction: coefficients=(0.001085673 0.002164328 0.001284251 0.0325454)
        z_location: PolynomialFunction: coefficients=(-0.0001492546 -0.0007305409 -0.001315702 -0.01723329)
      PathWrap: wrap_object=KnExt_at_fem_r method=hybrid
    Thelen2003Muscle vas_int_r: max_isometric_force=742.4182 optimal_fiber_length=0.08805848
        tendon_slack_length=0.1376546 pennation_angle_at_optimal=0.05235988
      PathPoint P1: femur_r (0.0156533 -0.161646 0.0146328)
      PathPoint P2: femur_r (0.0249488 -0.172083 0.0135089)
      MovingPathPoint P3: tibia_r socket_x_coordinate=/jointset/knee_r/knee_angle_r
          socket_y_coordinate=/jointset/knee_r/knee_angle_r socket_z_coordinate=/jointset/knee_r/knee_angle_r
        x_location: PolynomialFunction: coefficients=(0.002930163 0.01299577 0.02297332 0.03573926)
        y_location: PolynomialFunction: coefficients=(0.001374627 0.003533273 0.00363977 0.03571211)
        z_location: PolynomialFunction: coefficients=(-0.0001771491 -0.0008574194 -0.001520816 -0.002061613)
      PathWrap: wrap_object=KnExt_at_fem_r method=hybrid
    Thelen2003Muscle vas_lat_r: max_isometric_force=1017.63 optimal_fiber_length=0.09589617
        tendon_slack_length=0.1792345 pennation_angle_at_optimal=0.08726646
      PathPoint P1: femur_r (-0.0151933 -0.127246 0.0214347)
      PathPoint P2: femur_r (-0.00252968 -0.182961 0.0434742)
      MovingPathPoint P3: tibia_r socket_x_coordinate=/jointset/knee_r/knee_angle_r
          socket_y_coordinate=/jointset/knee_r/knee_angle_r socket_z_coordinate=/jointset/knee_r/knee_angle_r
        x_location: PolynomialFunction: coefficients=(0.00277014 0.01230394 0.02194885 0.03848843)
        y_location: PolynomialFunction: coefficients=(0.001230377 0.002832025 0.00238845 0.03455052)
        z_location: PolynomialFunction: coefficients=(-0.000159997 -0.000778184 -0.001389544 0.01059027)
      PathWrap: wrap_object=KnExtVL_at_fem_r method=hybrid
    Thelen2003Muscle med_gas_r: max_isometric_force=847.3902 optimal_fiber_length=0.0536854
        tendon_slack_length=0.3489551 pennation_angle_at_optimal=0.296706
      PathPoint P1: femur_r (-0.00741382 -0.368007 -0.0150071)
      PathPoint P2: femur_r (-0.0228005 -0.381675 -0.010882)
      PathPoint P3: calcn_r (-0.0014083 -0.00141241 -0.00448771)
      PathWrap: wrap_object=GasMed_at_shank_r method=hybrid
      PathWrap pathwrap_0: wrap_object=GasMed_at_condyles_r method=hybrid
    Thelen2003Muscle lat_gas_r: max_isometric_force=371.4811 optimal_fiber_length=0.05825603
        tendon_slack_length=0.3458952 pennation_angle_at_optimal=0.1396263
      PathPoint P1: femur_r (-0.00969375 -0.360662 0.0227549)
      PathPoint P2: femur_r (-0.0236381 -0.37861 0.0174889)
      PathPoint P3: calcn_r (-0.00314568 -0.000375072 -0.00155063)
      PathWrap: wrap_object=GasLat_at_shank_r method=hybrid
      PathWrap pathwrap_0: wrap_object=GasLat_at_condyles_r method=hybrid
    Thelen2003Muscle soleus_r: max_isometric_force=1930.287 optimal_fiber_length=0.05041318
        tendon_slack_length=0.2520659 pennation_angle_at_optimal=0.4363323
      PathPoint P1: tibia_r (0.00152936 -0.0938283 0.00236283)
      PathPoint P2: calcn_r (-5.43227e-5 -0.000636467 -0.00355362)
    Thelen2003Muscle tib_post_r: max_isometric_force=1588 optimal_fiber_length=0.02522851 tendon_slack_length=0.2522851
        pennation_angle_at_optimal=0.2094395
      PathPoint P1: tibia_r (-0.007649936 -0.1097033 0.001546264)
      PathPoint P2: tibia_r (-0.01171905 -0.3296797 -0.01863655)
      PathPoint P3: calcn_r (0.03393642 0.02718169 -0.02327534)
      PathPoint P4: calcn_r (0.06282714 0.01293979 -0.02286843)
    Thelen2003Muscle flex_dig_r: max_isometric_force=310 optimal_fiber_length=0.02766998 tendon_slack_length=0.3255292
        pennation_angle_at_optimal=0.1221731
      PathPoint P1: tibia_r (-0.006754731 -0.1665082 -0.001464881)
      PathPoint P2: tibia_r (-0.01253287 -0.3296797 -0.01595093)
      PathPoint P3: calcn_r (0.03548268 0.02563542 -0.02278704)
      PathPoint P4: calcn_r (0.05761867 0.01432328 -0.02140354)
      PathPoint P5: calcn_r (0.1349319 -0.006591966 0.009440347)
      PathPoint P6: toes_r (-0.001546264 -0.006347819 0.0119632)
      PathPoint P7: toes_r (0.02319396 -0.005778143 0.01749719)
      PathPoint P8: toes_r (0.03588959 -0.004882938 0.01969452)
    Thelen2003Muscle flex_hal_r: max_isometric_force=322 optimal_fiber_length=0.03499439 tendon_slack_length=0.3092527
        pennation_angle_at_optimal=0.1745329
      PathPoint P1: tibia_r (-0.006429202 -0.1899463 0.01985728)
      PathPoint P2: tibia_r (-0.01513711 -0.3319584 -0.01416052)
      PathPoint P3: calcn_r (0.03043698 0.02246151 -0.01961313)
      PathPoint P4: calcn_r (0.08447483 0.005533996 -0.02083387)
      PathPoint P5: calcn_r (0.1404658 -0.004313262 -0.02189184)
      PathPoint P6: toes_r (0.01261426 -0.005208467 -0.02156631)
      PathPoint P7: toes_r (0.04573685 -0.008300995 -0.0147302)
    Thelen2003Muscle tib_ant_r: max_isometric_force=905 optimal_fiber_length=0.07975465 tendon_slack_length=0.1814825
        pennation_angle_at_optimal=0.08726646
      PathPoint P1: tibia_r (0.01456743 -0.1321649 0.009358964)
      PathPoint P2: tibia_r (0.02677478 -0.3215415 -0.01440467)
      PathPoint P3: calcn_r (0.09489176 0.01448605 -0.0248216)
    Thelen2003Muscle per_brev_r: max_isometric_force=435 optimal_fiber_length=0.04069115 tendon_slack_length=0.1310255
        pennation_angle_at_optimal=0.08726646
      PathPoint P1: tibia_r (-0.005696761 -0.2153376 0.02644925)
      PathPoint P2: tibia_r (-0.0161137 -0.3405035 0.02303119)
      PathPoint P3: tibia_r (-0.01171905 -0.349537 0.02351948)
      PathPoint P4: calcn_r (0.03833106 0.02197322 0.01896208)
      PathPoint P5: calcn_r (0.05509582 0.01782272 0.02791413)
    Thelen2003Muscle per_long_r: max_isometric_force=943 optimal_fiber_length=0.03987733 tendon_slack_length=0.2807689
        pennation_angle_at_optimal=0.1745329
      PathPoint P1: tibia_r (0.0004069115 -0.1276074 0.02946039)
      PathPoint P2: tibia_r (-0.01684614 -0.3422126 0.02327534)
      PathPoint P3: tibia_r (-0.01318393 -0.3514902 0.02351948)
      PathPoint P4: calcn_r (0.03564545 0.01871793 0.01798549)
      PathPoint P5: calcn_r (0.05542135 0.008626524 0.02311257)
      PathPoint P6: calcn_r (0.06933772 0.005615379 0.009603111)
      PathPoint P7: calcn_r (0.09790291 0.006917495 -0.01497434)
    Thelen2003Muscle per_tert_r: max_isometric_force=180 optimal_fiber_length=0.06429202 tendon_slack_length=0.0813823
        pennation_angle_at_optimal=0.2268928
      PathPoint P1: tibia_r (0.000813823 -0.228196 0.01879931)
      PathPoint P2: tibia_r (0.01863655 -0.3311446 0.01293979)
      PathPoint P3: calcn_r (0.06974463 0.01855516 0.02433331)
    Thelen2003Muscle ext_dig_r: max_isometric_force=512 optimal_fiber_length=0.08300995 tendon_slack_length=0.2807689
        pennation_angle_at_optimal=0.1396263
      PathPoint P1: tibia_r (0.002604234 -0.112389 0.02246151)
      PathPoint P2: tibia_r (0.02351948 -0.3260989 0.005859526)
      PathPoint P3: calcn_r (0.07503448 0.03157633 -8.13823e-5)
      PathPoint P4: calcn_r (0.1315138 0.004476026 0.0105797)
      PathPoint P5: toes_r (0.0002441469 0.003824968 0.01245149)
      PathPoint P6: toes_r (0.03605236 -0.0003255292 0.02034558)
    Thelen2003Muscle ext_hal_r: max_isometric_force=162 optimal_fiber_length=0.09033435 tendon_slack_length=0.248216
        pennation_angle_at_optimal=0.1047198
      PathPoint P1: tibia_r (0.0009765876 -0.1438025 0.01855516)
      PathPoint P2: tibia_r (0.02653063 -0.3243085 -0.006917495)
      PathPoint P3: calcn_r (0.07894083 0.03165771 -0.01717167)
      PathPoint P4: calcn_r (0.1052273 0.02514713 -0.02091525)
      PathPoint P5: calcn_r (0.1411169 0.01131214 -0.02278704)
      PathPoint P6: toes_r (0.02425193 0.003336674 -0.01993866)
      PathPoint P7: toes_r (0.04581823 0.002766998 -0.01513711)
    Thelen2003Muscle glut_med1_l: max_isometric_force=445.4509 optimal_fiber_length=0.04368837
        tendon_slack_length=0.06369519 pennation_angle_at_optimal=0.1396263
      PathPoint P1: pelvis (-0.0306226 0.01573 -0.0949278)
      PathPoint P2: femur_l (-0.016236 -0.0174937 -0.0433516)
      PathWrap: wrap_object=Gmed_at_pelvis_l method=hybrid
    Thelen2003Muscle glut_med2_l: max_isometric_force=311.6525 optimal_fiber_length=0.06936513
        tendon_slack_length=0.04350712 pennation_angle_at_optimal=0
      PathPoint P1: pelvis (-0.0703699 0.0325633 -0.0786276)
      PathPoint P2: femur_l (-0.0225726 -0.0162163 -0.0404366)
      PathWrap: wrap_object=Gmed_at_pelvis_l method=hybrid
    Thelen2003Muscle glut_med3_l: max_isometric_force=355.1642 optimal_fiber_length=0.04618097
        tendon_slack_length=0.03788842 pennation_angle_at_optimal=0.3316126
      PathPoint P1: pelvis (-0.0959842 -0.00277257 -0.0618258)
      PathPoint P2: femur_l (-0.0284287 -0.0136286 -0.0360998)
      PathWrap: wrap_object=Gmed_at_pelvis_l method=hybrid
    Thelen2003Muscle glut_min1_l: max_isometric_force=146.852 optimal_fiber_length=0.05942013
        tendon_slack_length=0.01398121 pennation_angle_at_optimal=0.1745329
      PathPoint P1: pelvis (-0.0257857 -0.0168231 -0.0870442)
      PathPoint P2: femur_l (-0.0155567 -0.0136089 -0.037042)
    Thelen2003Muscle glut_min2_l: max_isometric_force=155.0104 optimal_fiber_length=0.05421894
        tendon_slack_length=0.02517308 pennation_angle_at_optimal=0
      PathPoint P1: pelvis (-0.0605773 0.00623089 -0.0760615)
      PathPoint P2: femur_l (-0.0201552 -0.0126123 -0.0352941)
    Thelen2003Muscle glut_min3_l: max_isometric_force=175.6785 optimal_fiber_length=0.02685704
        tendon_slack_length=0.03604498 pennation_angle_at_optimal=0.01745329
      PathPoint P1: pelvis (-0.0741347 -0.0201708 -0.0629467)
      PathPoint P2: femur_l (-0.023795 -0.0118169 -0.0340783)
    Thelen2003Muscle semimem_l: max_isometric_force=700.5382 optimal_fiber_length=0.06418239
        tendon_slack_length=0.2880185 pennation_angle_at_optimal=0.2617994
      PathPoint P1: pelvis (-0.055788 -0.130918 -0.0441645)
      PathPoint P2: tibia_l (-0.027582 -0.0286502 0.0168585)
      PathWrap: wrap_object=SM_at_condyles_l method=hybrid
      PathWrap pathwrap_0: wrap_object=Post_at_pelvis_l method=hybrid
    Thelen2003Muscle semiten_l: max_isometric_force=222.9974 optimal_fiber_length=0.1613164
        tendon_slack_length=0.2050565 pennation_angle_at_optimal=0.08726646
      PathPoint P1: pelvis (-0.0515959 -0.132035 -0.0354556)
      PathPoint P2: femur_l (-0.0260432 -0.38618 0.0329422)
      PathPoint P3: tibia_l (-0.0186256 -0.043981 0.0311473)
      PathPoint P4: tibia_l (0.00415083 -0.0509711 0.0288253)
      PathWrap: wrap_object=ST_at_condyles_l method=hybrid
      PathWrap pathwrap_0: wrap_object=Post_at_pelvis_l method=hybrid
    Thelen2003Muscle bifemlh_l: max_isometric_force=487.3309 optimal_fiber_length=0.09488265
        tendon_slack_length=0.2837775 pennation_angle_at_optimal=0
      PathPoint P1: pelvis (-0.0548834 -0.12848 -0.0497879)
      PathPoint P2: tibia_l (-0.0220247 -0.0259618 -0.0373545)
      PathPoint P3: tibia_l (-0.020609 -0.0549125 -0.0419364)
      PathWrap: wrap_object=Post_at_pelvis_l method=hybrid
    Thelen2003Muscle bifemsh_l: max_isometric_force=437.2925 optimal_fiber_length=0.1856169
        tendon_slack_length=0.0954908 pennation_angle_at_optimal=0.4014257
      PathPoint P1: femur_l (-0.0100465 -0.172556 -0.0139911)
      PathPoint P2: tibia_l (-0.0189315 -0.0258656 -0.0375567)
      PathPoint P3: tibia_l (-0.0173113 -0.0548541 -0.0424476)
      PathWrap: wrap_object=BF140_at_gastroc_l method=hybrid
    Thelen2003Muscle sar_l: max_isometric_force=84.8478 optimal_fiber_length=0.4560336 tendon_slack_length=0.08769877
        pennation_angle_at_optimal=0
      PathPoint P1: pelvis (0.00187443 -0.0169414 -0.0824253)
      PathPoint P2: femur_l (-0.0122634 -0.356872 0.036208)
      PathPoint P3: tibia_l (-0.0131173 -0.0285857 0.0339536)
      PathPoint P4: tibia_l (0.00205532 -0.0388335 0.0313653)
      PathPoint P5: tibia_l (0.019067 -0.050473 0.0161684)
      PathWrap: wrap_object=Flex_at_femhead_l method=hybrid
    Thelen2003Muscle add_long_l: max_isometric_force=341.0229 optimal_fiber_length=0.1284428
        tendon_slack_length=0.1023819 pennation_angle_at_optimal=0.1047198
      PathPoint P1: pelvis (-0.00210757 -0.0889336 -0.0196644)
      PathPoint P2: femur_l (-0.00641016 -0.216863 -0.0103766)
      PathWrap: wrap_object=AL_at_femshaft_l method=hybrid
    Thelen2003Muscle add_brev_l: max_isometric_force=233.3314 optimal_fiber_length=0.1084754
        tendon_slack_length=0.01631208 pennation_angle_at_optimal=0
      PathPoint P1: pelvis (-0.0030071 -0.0864946 -0.0223338)
      PathPoint P2: femur_l (-0.0223016 -0.0809598 -0.0160612)
      PathWrap: wrap_object=AB_at_femshaft_l method=hybrid
    Thelen2003Muscle add_mag1_l: max_isometric_force=207.2244 optimal_fiber_length=0.07598387
        tendon_slack_length=0.05240267 pennation_angle_at_optimal=0.08726646
      PathPoint P1: pelvis (-0.0190122 -0.101165 -0.0175536)
      PathPoint P2: femur_l (-0.0230178 -0.079115 -0.0219659)
      PathWrap: wrap_object=AMprox_at_femshaft_l method=hybrid
    Thelen2003Muscle add_mag2_l: max_isometric_force=186.5564 optimal_fiber_length=0.140694
        tendon_slack_length=0.1395313 pennation_angle_at_optimal=0.05235988
      PathPoint P1: pelvis (-0.0307146 -0.112727 -0.0187086)
      PathPoint P2: femur_l (-0.0046453 -0.271585 -0.00803096)
      PathWrap: wrap_object=AMdist_at_femshaft_l method=hybrid
      PathWrap pathwrap_0: wrap_object=Post_at_pelvis_l method=hybrid
    Thelen2003Muscle add_mag3_l: max_isometric_force=265.4213 optimal_fiber_length=0.1135018
        tendon_slack_length=0.2157401 pennation_angle_at_optimal=0.08726646
      PathPoint P1: pelvis (-0.0500095 -0.125343 -0.047345)
      PathPoint P2: femur_l (-0.0110998 -0.364388 0.0227328)
      PathWrap: wrap_object=AMisch_at_condyles_l method=hybrid
      PathWrap pathwrap_0: wrap_object=Post_at_pelvis_l method=hybrid
    Thelen2003Muscle tfl_l: max_isometric_force=126.7278 optimal_fiber_length=0.08569238 tendon_slack_length=0.3833606
        pennation_angle_at_optimal=0.05235988
      PathPoint P1: pelvis (-0.00815954 0.00411069 -0.0962692)
      PathPoint P2: femur_l (0.0157044 -0.0934058 -0.0507471)
      PathPoint P3: femur_l (-4.08558e-5 -0.381577 -0.04556)
      PathPoint P4: tibia_l (-0.00122208 -0.0388681 -0.0391959)
    Thelen2003Muscle pect_l: max_isometric_force=144.6764 optimal_fiber_length=0.09001376
        tendon_slack_length=0.02970454 pennation_angle_at_optimal=0
      PathPoint P1: pelvis (-0.00786336 -0.0817955 -0.0262546)
      PathPoint P2: femur_l (-0.0148482 -0.068431 -0.0111679)
    Thelen2003Muscle grac_l: max_isometric_force=88.11117 optimal_fiber_length=0.3053794 tendon_slack_length=0.1093119
        pennation_angle_at_optimal=0.05235988
      PathPoint P1: pelvis (-0.0372273 -0.123614 -0.0248504)
      PathPoint P2: tibia_l (-0.0173425 -0.0337831 0.0310285)
      PathPoint P3: tibia_l (0.0123649 -0.0506997 0.0228428)
      PathWrap: wrap_object=GR_at_condyles_l method=hybrid
    Thelen2003Muscle glut_max1_l: max_isometric_force=311.6525 optimal_fiber_length=0.1084336
        tendon_slack_length=0.09545209 pennation_angle_at_optimal=0.08726646
      PathPoint P1: pelvis (-0.103071 0.0132385 -0.0626221)
      PathPoint P2: pelvis (-0.111846 -0.0105642 -0.0739046)
      PathPoint P3: femur_l (-0.0397501 -0.0584846 -0.0275492)
      PathPoint P4: femur_l (-0.0263379 -0.0726993 -0.0278061)
      PathWrap: wrap_object=Gmax1_at_pelvis_l method=hybrid
    Thelen2003Muscle glut_max2_l: max_isometric_force=445.4509 optimal_fiber_length=0.1206228
        tendon_slack_length=0.1042116 pennation_angle_at_optimal=0
      PathPoint P1: pelvis (-0.111034 -0.0115418 -0.0479261)
      PathPoint P2: pelvis (-0.119451 -0.0321935 -0.0501832)
      PathPoint P3: femur_l (-0.0332126 -0.0930654 -0.0285109)
      PathPoint P4: femur_l (-0.0192175 -0.110109 -0.0262039)
      PathWrap: wrap_object=Gmax2_at_pelvis_l method=hybrid
    Thelen2003Muscle glut_max3_l: max_isometric_force=300.2307 optimal_fiber_length=0.1211239
        tendon_slack_length=0.121965 pennation_angle_at_optimal=0.08726646
      PathPoint P1: pelvis (-0.120638 -0.0326019 -0.0172836)
      PathPoint P2: pelvis (-0.101424 -0.0956107 -0.0385577)
      PathPoint P3: femur_l (-0.030104 -0.128507 -0.0260114)
      PathPoint P4: femur_l (-0.013729 -0.145279 -0.0203314)
      PathWrap: wrap_object=Gmax3_at_pelvis_l method=hybrid
    Thelen2003Muscle iliacus_l: max_isometric_force=583.6006 optimal_fiber_length=0.08428009
        tendon_slack_length=0.08428009 pennation_angle_at_optimal=0.1221731
      PathPoint P1: pelvis (-0.0574659 0.0163278 -0.0744542)
      PathPoint P2: pelvis (-0.00954664 -0.0572857 -0.0611241)
      PathPoint P3: femur_l (0.0038174 -0.0474282 -0.00862785)
      PathPoint P4: femur_l (-0.0121062 -0.0563713 -0.00581574)
      PathWrap: wrap_object=IL_at_brim_l method=hybrid range=(2 3)
    Thelen2003Muscle psoas_l: max_isometric_force=605.3564 optimal_fiber_length=0.07925088
        tendon_slack_length=0.1268014 pennation_angle_at_optimal=0.1396263
      PathPoint P1: pelvis (-0.0609578 0.0531157 -0.0324414)
      PathPoint P2: pelvis (-0.00871819 -0.0567668 -0.0566038)
      PathPoint P3: femur_l (0.00705685 -0.0473683 -0.00785795)
      PathPoint P4: femur_l (-0.00798783 -0.0571534 -0.00457176)
      PathWrap: wrap_object=PS_at_brim_l method=hybrid range=(2 3)
    Thelen2003Muscle quad_fem_l: max_isometric_force=207.2244 optimal_fiber_length=0.03214608
        tendon_slack_length=0.01428715 pennation_angle_at_optimal=0
      PathPoint P1: pelvis (-0.0589251 -0.110363 -0.0676125)
      PathPoint P2: femur_l (-0.0301347 -0.0356637 -0.0203127)
    Thelen2003Muscle gem_l: max_isometric_force=89.19897 optimal_fiber_length=0.01435703 tendon_slack_length=0.02333017
        pennation_angle_at_optimal=0
      PathPoint P1: pelvis (-0.071038 -0.0881493 -0.067147)
      PathPoint P2: femur_l (-0.0132068 -0.0124708 -0.0306933)
    Thelen2003Muscle peri_l: max_isometric_force=241.4899 optimal_fiber_length=0.01826154
        tendon_slack_length=0.08077219 pennation_angle_at_optimal=0.1745329
      PathPoint P1: pelvis (-0.0874753 -0.0289269 -0.0190251)
      PathPoint P2: pelvis (-0.0872676 -0.0416587 -0.0469189)
      PathPoint P3: femur_l (-0.0116941 -0.0115757 -0.0363909)
    Thelen2003Muscle rect_fem_l: max_isometric_force=635.8146 optimal_fiber_length=0.1003583
        tendon_slack_length=0.2729042 pennation_angle_at_optimal=0.08726646
      PathPoint P1: pelvis (-0.012435 -0.0363382 -0.0772425)
      MovingPathPoint P2: tibia_l socket_x_coordinate=/jointset/knee_l/knee_angle_l
          socket_y_coordinate=/jointset/knee_l/knee_angle_l socket_z_coordinate=/jointset/knee_l/knee_angle_l
        x_location: PolynomialFunction: coefficients=(-8.64061e-9 3.077908e-6 -0.0004013293 0.03512155)
        y_location: PolynomialFunction: coefficients=(3.615658e-8 -1.347139e-6 2.795348e-6 0.03601078)
        z_location: PolynomialFunction: coefficients=(2.026189e-9 -5.284401e-7 4.579354e-5 -0.002598224)
      PathWrap: wrap_object=KnExt_at_fem_l method=hybrid
      PathWrap pathwrap_0: wrap_object=Flex_at_femhead_l method=hybrid
    Thelen2003Muscle vas_med_l: max_isometric_force=703.8016 optimal_fiber_length=0.1179846
        tendon_slack_length=0.1670344 pennation_angle_at_optimal=0.08726646
      PathPoint P1: femur_l (-0.00940072 -0.126966 -0.0135014)
      PathPoint P2: femur_l (0.0176072 -0.245393 0.0200391)
      MovingPathPoint P3: tibia_l socket_x_coordinate=/jointset/knee_l/knee_angle_l
          socket_y_coordinate=/jointset/knee_l/knee_angle_l socket_z_coordinate=/jointset/knee_l/knee_angle_l
        x_location: PolynomialFunction: coefficients=(-6.200676e-9 2.762728e-6 -0.0003799674 0.03881003)
        y_location: PolynomialFunction: coefficients=(3.430761e-8 -1.441172e-6 2.162143e-5 0.03357749)
        z_location: PolynomialFunction: coefficients=(1.700939e-9 -4.914391e-7 4.347327e-5 0.01161724)
      PathWrap: wrap_object=KnExt_at_fem_l method=hybrid
    Thelen2003Muscle vas_int_l: max_isometric_force=742.4182 optimal_fiber_length=0.09361723
        tendon_slack_length=0.1463442 pennation_angle_at_optimal=0.05235988
      PathPoint P1: femur_l (0.0117256 -0.151499 -0.0174377)
      PathPoint P2: femur_l (0.0228092 -0.164247 -0.0162275)
      MovingPathPoint P3: tibia_l socket_x_coordinate=/jointset/knee_l/knee_angle_l
          socket_y_coordinate=/jointset/knee_l/knee_angle_l socket_z_coordinate=/jointset/knee_l/knee_angle_l
        x_location: PolynomialFunction: coefficients=(-1.121474e-8 3.248647e-6 -0.0004068494 0.03263306)
        y_location: PolynomialFunction: coefficients=(3.621984e-8 -1.127315e-6 -2.063293e-5 0.03659099)
        z_location: PolynomialFunction: coefficients=(2.340902e-9 -5.459406e-7 4.611353e-5 -0.003046464)
      PathWrap: wrap_object=KnExt_at_fem_l method=hybrid
    Thelen2003Muscle vas_lat_l: max_isometric_force=1017.63 optimal_fiber_length=0.1026057 tendon_slack_length=0.191775
        pennation_angle_at_optimal=0.08726646
      PathPoint P1: femur_l (-0.0150084 -0.111762 -0.0272589)
      PathPoint P2: femur_l (0.00747946 -0.168943 -0.0455145)
      MovingPathPoint P3: tibia_l socket_x_coordinate=/jointset/knee_l/knee_angle_l
          socket_y_coordinate=/jointset/knee_l/knee_angle_l socket_z_coordinate=/jointset/knee_l/knee_angle_l
        x_location: PolynomialFunction: coefficients=(-7.220637e-9 2.788334e-6 -0.0003777318 0.03455482)
        y_location: PolynomialFunction: coefficients=(3.384213e-8 -1.32272e-6 1.14113e-5 0.03373997)
        z_location: PolynomialFunction: coefficients=(1.818251e-9 -4.927762e-7 4.304701e-5 -0.01459109)
      PathWrap: wrap_object=KnExtVL_at_fem_l method=hybrid
    Thelen2003Muscle med_gas_l: max_isometric_force=847.3902 optimal_fiber_length=0.05274842
        tendon_slack_length=0.3428648 pennation_angle_at_optimal=0.296706
      PathPoint P1: femur_l (-0.0161974 -0.367819 0.0122928)
      PathPoint P2: femur_l (-0.0267938 -0.382081 0.00749889)
      PathPoint P3: calcn_l (-0.00384421 0.000731142 0.00223293)
      PathWrap: wrap_object=GasMed_at_shank_l method=hybrid
      PathWrap pathwrap_0: wrap_object=GasMed_at_condyles_l method=hybrid
    Thelen2003Muscle lat_gas_l: max_isometric_force=371.4811 optimal_fiber_length=0.05752478
        tendon_slack_length=0.3415534 pennation_angle_at_optimal=0.1396263
      PathPoint P1: femur_l (-0.0140402 -0.365338 -0.0237659)
      PathPoint P2: femur_l (-0.0305247 -0.376633 -0.0168973)
      PathPoint P3: calcn_l (-0.00671337 0.00230919 -0.00029253)
      PathWrap: wrap_object=GasLat_at_shank_l method=hybrid
      PathWrap pathwrap_0: wrap_object=GasLat_at_condyles_l method=hybrid
    Thelen2003Muscle soleus_l: max_isometric_force=1930.287 optimal_fiber_length=0.04704361
        tendon_slack_length=0.2352181 pennation_angle_at_optimal=0.4363323
      PathPoint P1: tibia_l (-0.00868029 -0.109783 0.00396934)
      PathPoint P2: calcn_l (-0.00693909 0.00137986 0.00119745)
    Thelen2003Muscle tib_post_l: max_isometric_force=1588 optimal_fiber_length=0.02512832 tendon_slack_length=0.2512832
        pennation_angle_at_optimal=0.2094395
      PathPoint P1: tibia_l (-0.007619555 -0.1092677 -0.001540123)
      PathPoint P2: tibia_l (-0.01167251 -0.3283704 0.01856253)
      PathPoint P3: calcn_l (0.03380164 0.02707374 0.0231829)
      PathPoint P4: calcn_l (0.06257763 0.0128884 0.02277761)
    Thelen2003Muscle flex_dig_l: max_isometric_force=310 optimal_fiber_length=0.02756009 tendon_slack_length=0.3242364
        pennation_angle_at_optimal=0.1221731
      PathPoint P1: tibia_l (-0.006727905 -0.1658469 0.001459064)
      PathPoint P2: tibia_l (-0.0124831 -0.3283704 0.01588758)
      PathPoint P3: calcn_l (0.03534177 0.02553362 0.02269655)
      PathPoint P4: calcn_l (0.05738984 0.0142664 0.02131854)
      PathPoint P5: calcn_l (0.134396 -0.006565787 -0.009402856)
      PathPoint P6: toes_l (-0.001540123 -0.00632261 -0.01191569)
      PathPoint P7: toes_l (0.02310184 -0.005755196 -0.01742771)
      PathPoint P8: toes_l (0.03574706 -0.004863546 -0.0196163)
    Thelen2003Muscle flex_hal_l: max_isometric_force=322 optimal_fiber_length=0.03485541 tendon_slack_length=0.3080246
        pennation_angle_at_optimal=0.1745329
      PathPoint P1: tibia_l (-0.006403669 -0.1891919 -0.01977842)
      PathPoint P2: tibia_l (-0.01507699 -0.3306401 0.01410428)
      PathPoint P3: calcn_l (0.0303161 0.02237231 0.01953524)
      PathPoint P4: calcn_l (0.08413935 0.005512019 0.02075113)
      PathPoint P5: calcn_l (0.139908 -0.004296132 0.0218049)
      PathPoint P6: toes_l (0.01256416 -0.005187782 0.02148066)
      PathPoint P7: toes_l (0.04555521 -0.008268028 0.0146717)
    Thelen2003Muscle tib_ant_l: max_isometric_force=905 optimal_fiber_length=0.07943792 tendon_slack_length=0.1807618
        pennation_angle_at_optimal=0.08726646
      PathPoint P1: tibia_l (0.01450958 -0.13164 -0.009321796)
      PathPoint P2: tibia_l (0.02666844 -0.3202645 0.01434746)
      PathPoint P3: calcn_l (0.09451491 0.01442852 0.02472303)
    Thelen2003Muscle per_brev_l: max_isometric_force=435 optimal_fiber_length=0.04052955 tendon_slack_length=0.1305052
        pennation_angle_at_optimal=0.08726646
      PathPoint P1: tibia_l (-0.005674137 -0.2144824 -0.02634421)
      PathPoint P2: tibia_l (-0.0160497 -0.3391513 -0.02293973)
      PathPoint P3: tibia_l (-0.01167251 -0.3481488 -0.02342608)
      PathPoint P4: calcn_l (0.03817884 0.02188596 -0.01888677)
      PathPoint P5: calcn_l (0.05487701 0.01775194 -0.02780327)
    Thelen2003Muscle per_long_l: max_isometric_force=943 optimal_fiber_length=0.03971896 tendon_slack_length=0.2796539
        pennation_angle_at_optimal=0.1745329
      PathPoint P1: tibia_l (0.0004052955 -0.1271007 -0.02934339)
      PathPoint P2: tibia_l (-0.01677923 -0.3408535 -0.0231829)
      PathPoint P3: tibia_l (-0.01313157 -0.3500943 -0.02342608)
      PathPoint P4: calcn_l (0.03550389 0.01864359 -0.01791406)
      PathPoint P5: calcn_l (0.05520125 0.008592265 -0.02302078)
      PathPoint P6: calcn_l (0.06906235 0.005593078 -0.009564974)
      PathPoint P7: calcn_l (0.0975141 0.006890024 0.01491487)
    Thelen2003Muscle per_tert_l: max_isometric_force=180 optimal_fiber_length=0.06403669 tendon_slack_length=0.0810591
        pennation_angle_at_optimal=0.2268928
      PathPoint P1: tibia_l (0.000810591 -0.2272897 -0.01872465)
      PathPoint P2: tibia_l (0.01856253 -0.3298295 -0.0128884)
      PathPoint P3: calcn_l (0.06946765 0.01848147 -0.02423667)
    Thelen2003Muscle ext_dig_l: max_isometric_force=512 optimal_fiber_length=0.08268028 tendon_slack_length=0.2796539
        pennation_angle_at_optimal=0.1396263
      PathPoint P1: tibia_l (0.002593891 -0.1119426 -0.02237231)
      PathPoint P2: tibia_l (0.02342608 -0.3248038 -0.005836255)
      PathPoint P3: calcn_l (0.07473649 0.03145093 8.10591e-5)
      PathPoint P4: calcn_l (0.1309915 0.00445825 -0.01053768)
      PathPoint P5: toes_l (0.0002431773 0.003809778 -0.01240204)
      PathPoint P6: toes_l (0.03590918 -0.0003242364 -0.02026477)
    Thelen2003Muscle ext_hal_l: max_isometric_force=162 optimal_fiber_length=0.0899756 tendon_slack_length=0.2472303
        pennation_angle_at_optimal=0.1047198
      PathPoint P1: tibia_l (0.0009727092 -0.1432314 -0.01848147)
      PathPoint P2: tibia_l (0.02642527 -0.3230205 0.006890024)
      PathPoint P3: calcn_l (0.07862733 0.03153199 0.01710347)
      PathPoint P4: calcn_l (0.1048094 0.02504726 0.02083219)
      PathPoint P5: calcn_l (0.1405565 0.01126721 0.02269655)
      PathPoint P6: toes_l (0.02415561 0.003323423 0.01985948)
      PathPoint P7: toes_l (0.04563627 0.002756009 0.01507699)
    Thelen2003Muscle ercspn_r: max_isometric_force=2500 optimal_fiber_length=0.09827868 tendon_slack_length=0.02456967
        pennation_angle_at_optimal=0
      PathPoint P1: pelvis (-0.1146585 0.03595362 0.03570792)
      PathPoint P2: torso (-0.0450444 0.09008879 0.01973763)
    Thelen2003Muscle ercspn_l: max_isometric_force=2500 optimal_fiber_length=0.09827868 tendon_slack_length=0.02456967
        pennation_angle_at_optimal=0
      PathPoint P1: pelvis (-0.1146585 0.03595362 -0.03570792)
      PathPoint P2: torso (-0.0450444 0.09008879 -0.01973763)
    Thelen2003Muscle intobl_r: max_isometric_force=900 optimal_fiber_length=0.0818989 tendon_slack_length=0.0818989
        pennation_angle_at_optimal=0
      PathPoint P1: pelvis (-0.03275956 0.05732923 0.09475703)
      PathPoint P2: torso (0.05732923 0.1310382 0.01228483)
    Thelen2003Muscle intobl_l: max_isometric_force=900 optimal_fiber_length=0.0818989 tendon_slack_length=0.0818989
        pennation_angle_at_optimal=0
      PathPoint P1: pelvis (-0.03275956 0.05732923 -0.09475703)
      PathPoint P2: torso (0.05732923 0.1310382 -0.01228483)
    Thelen2003Muscle extobl_r: max_isometric_force=900 optimal_fiber_length=0.09827868 tendon_slack_length=0.1146585
        pennation_angle_at_optimal=0
      PathPoint P1: pelvis (-0.02456967 -0.0520877 0.00818989)
      PathPoint P2: torso (0.05323428 0.09008879 0.09008879)
    Thelen2003Muscle extobl_l: max_isometric_force=900 optimal_fiber_length=0.09827868 tendon_slack_length=0.1146585
        pennation_angle_at_optimal=0
      PathPoint P1: pelvis (-0.02456967 -0.0520877 -0.00818989)
      PathPoint P2: torso (0.05323428 0.09008879 -0.09008879)
    ActivationCoordinateActuator [values shared by the 8 below unless stated]: min_control=-1 max_control=1
        optimal_force=150 activation_time_constant=0.035 default_activation=0
    ActivationCoordinateActuator actuator_arm_flex_r: coordinate=arm_flex_r
    ActivationCoordinateActuator actuator_arm_add_r: coordinate=arm_add_r
    ActivationCoordinateActuator actuator_arm_rot_r: coordinate=arm_rot_r
    ActivationCoordinateActuator actuator_elbow_flex_r: coordinate=elbow_flex_r
    ActivationCoordinateActuator actuator_arm_flex_l: coordinate=arm_flex_l
    ActivationCoordinateActuator actuator_arm_add_l: coordinate=arm_add_l
    ActivationCoordinateActuator actuator_arm_rot_l: coordinate=arm_rot_l
    ActivationCoordinateActuator actuator_elbow_flex_l: coordinate=elbow_flex_l
    SmoothSphereHalfSpaceForce [values shared by the 12 below unless stated]: socket_half_space=/contactgeometryset/floor
        stiffness=1000000 [N/m^2] dissipation=2 [s/m] static_friction=0.8 dynamic_friction=0.8 viscous_friction=0.5
        transition_velocity=0.2 [m/s]
    SmoothSphereHalfSpaceForce SmoothSphereHalfSpaceForce_s1_r: socket_sphere=/contactgeometryset/s1_r
    SmoothSphereHalfSpaceForce SmoothSphereHalfSpaceForce_s2_r: socket_sphere=/contactgeometryset/s2_r
    SmoothSphereHalfSpaceForce SmoothSphereHalfSpaceForce_s3_r: socket_sphere=/contactgeometryset/s3_r
    SmoothSphereHalfSpaceForce SmoothSphereHalfSpaceForce_s4_r: socket_sphere=/contactgeometryset/s4_r
    SmoothSphereHalfSpaceForce SmoothSphereHalfSpaceForce_s5_r: socket_sphere=/contactgeometryset/s5_r
    SmoothSphereHalfSpaceForce SmoothSphereHalfSpaceForce_s6_r: socket_sphere=/contactgeometryset/s6_r
    SmoothSphereHalfSpaceForce SmoothSphereHalfSpaceForce_s1_l: socket_sphere=/contactgeometryset/s1_l
    SmoothSphereHalfSpaceForce SmoothSphereHalfSpaceForce_s2_l: socket_sphere=/contactgeometryset/s2_l
    SmoothSphereHalfSpaceForce SmoothSphereHalfSpaceForce_s3_l: socket_sphere=/contactgeometryset/s3_l
    SmoothSphereHalfSpaceForce SmoothSphereHalfSpaceForce_s4_l: socket_sphere=/contactgeometryset/s4_l
    SmoothSphereHalfSpaceForce SmoothSphereHalfSpaceForce_s5_l: socket_sphere=/contactgeometryset/s5_l
    SmoothSphereHalfSpaceForce SmoothSphereHalfSpaceForce_s6_l: socket_sphere=/contactgeometryset/s6_l
    ObjectGroup R_hip_abd: members=(glut_max1_r glut_med1_r glut_med2_r glut_med3_r glut_min1_r glut_min2_r glut_min3_r peri_r sar_r tfl_r)
    ObjectGroup R_hip_flex: members=(add_brev_r add_long_r glut_med1_r glut_min1_r grac_r iliacus_r pect_r psoas_r rect_fem_r sar_r tfl_r)
    ObjectGroup R_hip_inrot: members=(glut_med1_r glut_min1_r iliacus_r psoas_r tfl_r)
    ObjectGroup R_hip_exrot: members=(gem_r glut_med3_r glut_min3_r peri_r quad_fem_r)
    ObjectGroup R_hip_ext: members=(add_long_r add_mag1_r add_mag2_r add_mag3_r bifemlh_r glut_max1_r glut_max2_r glut_max3_r glut_med3_r glut_min3_r semimem_r semiten_r)
    ObjectGroup R_hip_add: members=(add_brev_r add_long_r add_mag1_r add_mag2_r add_mag3_r bifemlh_r grac_r pect_r semimem_r semiten_r)
    ObjectGroup R_knee_bend: members=(bifemlh_r bifemsh_r grac_r lat_gas_r med_gas_r sar_r semimem_r semiten_r)
    ObjectGroup R_knee_ext: members=(rect_fem_r vas_int_r vas_lat_r vas_med_r)
    ObjectGroup R_ankle_pf: members=(flex_dig_r flex_hal_r lat_gas_r med_gas_r per_brev_r per_long_r soleus_r tib_post_r)
    ObjectGroup R_inverter: members=(ext_hal_r flex_dig_r flex_hal_r tib_ant_r tib_post_r)
    ObjectGroup R_ankle_df: members=(ext_dig_r ext_hal_r per_tert_r tib_ant_r)
    ObjectGroup R_everter: members=(ext_dig_r per_brev_r per_long_r per_tert_r)
    ObjectGroup L_hip_abd: members=(glut_max1_l glut_med1_l glut_med2_l glut_med3_l glut_min1_l glut_min2_l glut_min3_l peri_l sar_l tfl_l)
    ObjectGroup L_hip_flex: members=(add_brev_l add_long_l glut_med1_l glut_min1_l grac_l iliacus_l pect_l psoas_l rect_fem_l sar_l tfl_l)
    ObjectGroup L_hip_inrot: members=(glut_med1_l glut_min1_l iliacus_l psoas_l tfl_l)
    ObjectGroup L_hip_exrot: members=(gem_l glut_med3_l glut_min3_l peri_l quad_fem_l)
    ObjectGroup L_hip_ext: members=(add_long_l add_mag1_l add_mag2_l add_mag3_l bifemlh_l glut_max1_l glut_max2_l glut_max3_l glut_med3_l glut_min3_l semimem_l semiten_l)
    ObjectGroup L_hip_add: members=(add_brev_l add_long_l add_mag1_l add_mag2_l add_mag3_l bifemlh_l grac_l pect_l semimem_l semiten_l)
    ObjectGroup L_knee_bend: members=(bifemlh_l bifemsh_l grac_l lat_gas_l med_gas_l sar_l semimem_l semiten_l)
    ObjectGroup L_knee_ext: members=(rect_fem_l vas_int_l vas_lat_l vas_med_l)
    ObjectGroup L_ankle_pf: members=(flex_dig_l flex_hal_l lat_gas_l med_gas_l per_brev_l per_long_l soleus_l tib_post_l)
    ObjectGroup L_inverter: members=(ext_hal_l flex_dig_l flex_hal_l tib_ant_l tib_post_l)
    ObjectGroup L_ankle_df: members=(ext_dig_l ext_hal_l per_tert_l tib_ant_l)
    ObjectGroup L_everter: members=(ext_dig_l per_brev_l per_long_l per_tert_l)
    ObjectGroup back_ext: members=(ercspn_l ercspn_r)
    ObjectGroup back_rlb: members=(ercspn_r extobl_r intobl_r)
    ObjectGroup back_introt: members=(ercspn_r extobl_l intobl_r)
    ObjectGroup back_llb: members=(ercspn_l extobl_l intobl_l)
    ObjectGroup back_extrot: members=(ercspn_l extobl_r intobl_l)
    ObjectGroup back_flex: members=(extobl_l extobl_r intobl_l intobl_r)
  MarkerSet:
    Marker C7: torso (-0.07049486 0.3680816 -0.004018427)
    Marker T10: torso (-0.07487721 0.1564673 0.004377274)
    Marker STRN: torso (0.0868312 0.1865005 -0.001947832)
    Marker CLAV: torso (0.03880615 0.3193006 0.001106316)
    Marker RSHO: torso (-0.02449069 0.321818 0.1485962)
    Marker LSHO: torso (-0.02291276 0.3264388 -0.1480672)
    Marker RSTL: calcn_r (0.03400564 0.01520181 -0.03539508)
    Marker RLCA: calcn_r (0.02727309 0.007281688 0.03325577)
    Marker RHEE: calcn_r (-0.01945042 0.02498635 -0.003466626)
    Marker RTOE: toes_r (-0.002225218 0.01751913 0.0002231826)
    Marker RCM5: toes_r (-0.01935765 0.009839892 0.03468236)
    Marker LSTL: calcn_l (0.03571814 0.01254431 0.03652584)
    Marker LLCA: calcn_l (0.02318665 0.009123921 -0.03148649)
    Marker LHEE: calcn_l (-0.01806949 0.02543089 0.001417151)
    Marker LTOE: toes_l (-0.006683953 0.02140822 -0.001556985)
    Marker LCM5: toes_l (-0.01354553 0.009447807 -0.03424097)
    Marker RPSI: pelvis (-0.118607 0.0305633 0.0300995)
    Marker LPSI: pelvis (-0.117976 0.0315638 -0.0361897)
    Marker LASI: pelvis (0.0103369 0.00379648 -0.0905447)
    Marker RASI: pelvis (0.00814202 0.000448614 0.0861264)
    Marker LLAT: pelvis (-0.0496339 0.0560167 -0.111887)
    Marker RLAT: pelvis (-0.0576667 0.0632512 0.105285)
    Marker LKNE: femur_l (0.00882777 -0.368899 -0.0496282)
    Marker LMEK: femur_l (0.0119576 -0.374192 0.0463592)
    Marker LMANK: tibia_l (-0.0072899 -0.337191 0.0322136)
    Marker LLANK: tibia_l (-0.010428 -0.347387 -0.0393578)
    Marker RKNE: femur_r (0.0110382 -0.374969 0.0453247)
    Marker RMEK: femur_r (0.0145174 -0.370752 -0.0510515)
    Marker RMANK: tibia_r (0.00252052 -0.343 -0.0398057)
    Marker RLANK: tibia_r (-0.0135715 -0.357562 0.0270159)
  ContactGeometrySet:
    ContactHalfSpace floor: socket_frame=/ground location=(0 0 0) orientation=(0 0 -1.57)
    ContactSphere s1_r: socket_frame=/bodyset/calcn_r location=(0.0019 -0.01 -0.0038) radius=0.032
    ContactSphere s2_r: socket_frame=/bodyset/calcn_r location=(0.1483 -0.01 -0.0287) radius=0.032
    ContactSphere s3_r: socket_frame=/bodyset/calcn_r location=(0.133 -0.01 0.0516) radius=0.032
    ContactSphere s4_r: socket_frame=/bodyset/calcn_r location=(0.06623 -0.01 0.02636) radius=0.032
    ContactSphere s5_r: socket_frame=/bodyset/toes_r location=(0.06 -0.01 -0.01876) radius=0.032
    ContactSphere s6_r: socket_frame=/bodyset/toes_r location=(0.045 -0.01 0.06186) radius=0.032
    ContactSphere s1_l: socket_frame=/bodyset/calcn_l location=(0.0019 -0.01 0.0038) radius=0.032
    ContactSphere s2_l: socket_frame=/bodyset/calcn_l location=(0.1483 -0.01 0.0287) radius=0.032
    ContactSphere s3_l: socket_frame=/bodyset/calcn_l location=(0.133 -0.01 -0.0516) radius=0.032
    ContactSphere s4_l: socket_frame=/bodyset/calcn_l location=(0.06623 -0.01 -0.02636) radius=0.032
    ContactSphere s5_l: socket_frame=/bodyset/toes_l location=(0.06 -0.01 0.01876) radius=0.032
    ContactSphere s6_l: socket_frame=/bodyset/toes_l location=(0.045 -0.01 -0.06186) radius=0.032
