# OpenSim document version 40000
Model Vitruvian_Man_AdaptedForPredSim_AdaptedForPredSim:
  gravity: 0 -9.80665 0
  length_units: meters
  force_units: N
  credits:
    A planar reduced gait model with 10 degrees of freedom and 18 muscles by Ajay Seth. Closely based on Delp S.L., Loan J.P., Hoy M.G., Zajac F.E., Topp E.L., Rosen J.M., Thelen D.G., Anderson F.C., Seth A. Notes: 3D, 23 DOF gait model created by D.G. Thelen, Univ. of Wisconsin-Madison, and Ajay Seth, Frank C. Anderson, and Scott L. Delp, Stanford University. Lower extremity joint defintions based on Delp et al. (1990). Low back joint and anthropometry based on Anderson and Pandy (1999, 2001). Planar knee model of Yamaguchi and Zajac (1989). Seth replaced tibia translation constraints with a CustomJoint for the knee and removed the patella to eliminate all kinematic constraints; insertions of the quadrucepts are handled with moving points in the tibia frame as defined by Delp 1990. Number of muscles was reduced by Anderson to improve simulation speed for demonstrations and is not intended to be used in research. License: Creative Commons (CCBY 3.0). You are free to distribute, remix, tweak, and build upon this work, even commercially, as long as you credit us for the original creation. http://creativecommons.org/licenses/by/3.0/ More Information: http://simtk-confluence.stanford.edu:8080/display/OpenSim/Gait+2392+and+2354+Models
  publications:
    Delp, S.L., Loan, J.P., Hoy, M.G., Zajac, F.E., Topp E.L., Rosen, J.M.: An interactive graphics-based model of the lower extremity to study orthopaedic surgical procedures, IEEE Transactions on Biomedical Engineering, vol. 37, pp. 757-767, 1990. Yamaguchi G.T., Zajac F.E.: A planar model of the knee joint to characterize the knee extensor mechanism." J . Biomech. vol. 22. pp. 1-10. 1989. Anderson F.C., Pandy M.G.: A dynamic optimization solution for vertical jumping in three dimensions. Computer Methods in Biomechanics and Biomedical Engineering 2:201-231, 1999. Anderson F.C., Pandy M.G.: Dynamic optimization of human walking. Journal of Biomechanical Engineering 123:381-390, 2001.
  Ground
  BodySet:
    Body pelvis: mass=11.78246 [kg] mass_center=(-0.07420002 0 0) inertia=(0.1209186 0.1024515 0.06810495 0 0 0)
        meshes=(sacrum.vtp pelvis.vtp l_pelvis.vtp)
    Body femur_r: mass=9.30571 mass_center=(0 -0.181447 0) inertia=(0.1526102 0.04000461 0.1609302 0 0 0)
        meshes=femur_r.vtp
    Body tibia_r: mass=3.709218 mass_center=(0 -0.202062 0) inertia=(0.0590626 0.005976572 0.05988291 0 0 0)
        meshes=(tibia_r.vtp fibula.vtp)
    Body talus_r: mass=0.09306311 mass_center=(0 0 0) inertia=(0.001012244 0.0009440552 0.0009440552 0 0 0)
        meshes=talus.vtp
    Body calcn_r: mass=1.163289 mass_center=(0.09701305 0.0312878 0)
        inertia=(0.001417142 0.003511343 0.003511343 0 0 0) meshes=foot.vtp
    Body toes_r: mass=0.2015747 mass_center=(0.03356652 0.006257561 -0.01825122)
        inertia=(0.0001012244 0.0001819922 0.0001819922 0 0 0) meshes=bofoot.vtp
    Body femur_l: mass=9.30571 mass_center=(0 -0.181447 0) inertia=(0.1526102 0.04000461 0.1609302 0 0 0)
        meshes=femur_l.vtp
    Body tibia_l: mass=3.709218 mass_center=(0 -0.202062 0) inertia=(0.0590626 0.005976572 0.05988291 0 0 0)
        meshes=(tibia_l.vtp l_fibula.vtp)
    Body talus_l: mass=0.09306311 mass_center=(0 0 0) inertia=(0.001012244 0.0009440552 0.0009440552 0 0 0)
        meshes=l_talus.vtp
    Body calcn_l: mass=1.163289 mass_center=(0.09701305 0.0312878 0)
        inertia=(0.001417142 0.003511343 0.003511343 0 0 0) meshes=l_foot.vtp
    Body toes_l: mass=0.2015747 mass_center=(0.03356652 0.006257561 0.01825122)
        inertia=(0.0001012244 0.0001819922 0.0001819922 0 0 0) meshes=l_bofoot.vtp
    Body torso: mass=26.85421 mass_center=(-0.03136514 0.3345615 0) inertia=(1.537954 0.707487 1.537954 0 0 0)
        meshes=(hat_spine.vtp hat_jaw.vtp hat_skull.vtp hat_ribs.vtp)
    Body humerus_r: mass=2.034592 mass_center=(0 -0.183283 0) inertia=(0.01484468 0.005120957 0.01666268 0 0 0)
        meshes=humerus_rv.vtp
    Body ulna_r: mass=0.6081252 mass_center=(0 -0.1267888 0) inertia=(0.00328125 0.0006846092 0.003559303 0 0 0)
        meshes=ulna_rv.vtp
    Body radius_r: mass=0.6081252 mass_center=(0 -0.1267888 0) inertia=(0.00328125 0.0006846092 0.003559303 0 0 0)
        meshes=radius_rv.vtp
    Body hand_r: mass=0.4579708 mass_center=(0 -0.07163396 0) inertia=(0.0009881414 0.0006059566 0.001484428 0 0 0)
        meshes=(pisiform_rvs.vtp lunate_rvs.vtp scaphoid_rvs.vtp triquetrum_rvs.vtp hamate_rvs.vtp capitate_rvs.vtp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)
    Body humerus_l: mass=2.034592 mass_center=(0 -0.183283 0) inertia=(0.01484468 0.005120957 0.01666268 0 0 0)
        meshes=humerus_lv.vtp
    Body ulna_l: mass=0.6081252 mass_center=(0 -0.1267888 0) inertia=(0.00328125 0.0006846092 0.003559303 0 0 0)
        meshes=ulna_lv.vtp
    Body radius_l: mass=0.6081252 mass_center=(0 -0.1267888 0) inertia=(0.00328125 0.0006846092 0.003559303 0 0 0)
        meshes=radius_lv.vtp
    Body hand_l: mass=0.4579708 mass_center=(0 -0.07163396 0) inertia=(0.0009881414 0.0006059566 0.001484428 0 0 0)
        meshes=(pisiform_lvs.vtp lunate_lvs.vtp scaphoid_lvs.vtp triquetrum_lvs.vtp hamate_lvs.vtp capitate_lvs.vtp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)
  JointSet:
    CustomJoint ground_pelvis: socket_parent_frame=ground_offset socket_child_frame=pelvis_offset
      Coordinate pelvis_tilt: default_value=0 range=(-1.570796 1.570796) clamped=false
      Coordinate pelvis_tx: default_value=0 range=(-5 5) clamped=false
      Coordinate pelvis_ty: default_value=0.95 range=(-1 2) clamped=false
      PhysicalOffsetFrame ground_offset: socket_parent=/ground translation=(0 0 0) [meters]
      PhysicalOffsetFrame pelvis_offset: socket_parent=/bodyset/pelvis translation=(0 0 0)
      SpatialTransform: axes_held_at_zero=(rotation2 rotation3 translation3)
        TransformAxis rotation1: coordinates=pelvis_tilt axis=(0 0 1) LinearFunction(coefficients=1 0)
        TransformAxis translation1: coordinates=pelvis_tx axis=(1 0 0) LinearFunction(coefficients=1 0)
        TransformAxis translation2: coordinates=pelvis_ty axis=(0 1 0) LinearFunction(coefficients=1 0)
    PinJoint hip_r: socket_parent_frame=pelvis_offset socket_child_frame=femur_r_offset
      Coordinate hip_flexion_r: default_value=0 range=(-2.094395 2.094395) clamped=false
      PhysicalOffsetFrame pelvis_offset: socket_parent=/bodyset/pelvis translation=(-0.07420002 -0.06937229 0.08938925)
      PhysicalOffsetFrame femur_r_offset: socket_parent=/bodyset/femur_r translation=(0 0 0)
    CustomJoint knee_r: socket_parent_frame=femur_r_offset socket_child_frame=tibia_r_offset
      Coordinate knee_angle_r: default_value=0 range=(-2.094395 0.1745329) clamped=false
      PhysicalOffsetFrame femur_r_offset: socket_parent=/bodyset/femur_r translation=(0 0 0)
      PhysicalOffsetFrame tibia_r_offset: socket_parent=/bodyset/tibia_r translation=(0 0 0)
      SpatialTransform: axes_held_at_zero=(rotation2 rotation3 translation3)
        TransformAxis rotation1: coordinates=knee_angle_r axis=(0 0 1) LinearFunction(coefficients=1 0)
        TransformAxis translation1: coordinates=knee_angle_r axis=(1 0 0)
          PolynomialFunction: coefficients=(0.001361865 0.008246355 0.008254171 -0.006906452 -0.004289707)
        TransformAxis translation2: coordinates=knee_angle_r axis=(0 1 0)
            PolynomialFunction(coefficients=-0.003682036 0.005244919 -0.3956505)
    PinJoint ankle_r: socket_parent_frame=tibia_r_offset socket_child_frame=talus_r_offset
      Coordinate ankle_angle_r: default_value=0 range=(-1.570796 1.570796) clamped=false
      PhysicalOffsetFrame tibia_r_offset: socket_parent=/bodyset/tibia_r translation=(0 -0.4653812 0)
      PhysicalOffsetFrame talus_r_offset: socket_parent=/bodyset/talus_r translation=(0 0 0)
    WeldJoint subtalar_r: socket_parent_frame=talus_r_offset socket_child_frame=calcn_r_offset
      PhysicalOffsetFrame talus_r_offset: socket_parent=/bodyset/talus_r
          translation=(-0.04731326 -0.04375078 0.00825998) orientation=(-1.76819 0.906223 1.8196) [radians]
      PhysicalOffsetFrame calcn_r_offset: socket_parent=/bodyset/calcn_r translation=(0 0 0)
          orientation=(-1.76819 0.906223 1.8196)
    PinJoint mtp_r: socket_parent_frame=calcn_r_offset socket_child_frame=toes_r_offset
      Coordinate mtp_angle_r: default_value=0 range=(-0.5235988 0.5235988) clamped=true
      PhysicalOffsetFrame calcn_r_offset: socket_parent=/bodyset/calcn_r
          translation=(0.1734593 -0.002085854 0.001126361)
      PhysicalOffsetFrame toes_r_offset: socket_parent=/bodyset/toes_r translation=(0 0 0)
    PinJoint hip_l: socket_parent_frame=pelvis_offset socket_child_frame=femur_l_offset
      Coordinate hip_flexion_l: default_value=0 range=(-2.094395 2.094395) clamped=false
      PhysicalOffsetFrame pelvis_offset: socket_parent=/bodyset/pelvis
          translation=(-0.07420002 -0.06937229 -0.08938925)
      PhysicalOffsetFrame femur_l_offset: socket_parent=/bodyset/femur_l translation=(0 0 0)
    CustomJoint knee_l: socket_parent_frame=femur_l_offset socket_child_frame=tibia_l_offset
      Coordinate knee_angle_l: default_value=0 range=(-2.094395 0.1745329) clamped=false
      PhysicalOffsetFrame femur_l_offset: socket_parent=/bodyset/femur_l translation=(0 0 0)
      PhysicalOffsetFrame tibia_l_offset: socket_parent=/bodyset/tibia_l translation=(0 0 0)
      SpatialTransform: axes_held_at_zero=(rotation2 rotation3 translation3)
        TransformAxis rotation1: coordinates=knee_angle_l axis=(0 0 1) LinearFunction(coefficients=1 0)
        TransformAxis translation1: coordinates=knee_angle_l axis=(1 0 0)
          PolynomialFunction: coefficients=(0.001361865 0.008246355 0.008254171 -0.006906452 -0.004289707)
        TransformAxis translation2: coordinates=knee_angle_l axis=(0 1 0)
            PolynomialFunction(coefficients=-0.003682036 0.005244919 -0.3956505)
    PinJoint ankle_l: socket_parent_frame=tibia_l_offset socket_child_frame=talus_l_offset
      Coordinate ankle_angle_l: default_value=0 range=(-1.570796 1.570796) clamped=false
      PhysicalOffsetFrame tibia_l_offset: socket_parent=/bodyset/tibia_l translation=(0 -0.4653812 0)
      PhysicalOffsetFrame talus_l_offset: socket_parent=/bodyset/talus_l translation=(0 0 0)
    WeldJoint subtalar_l: socket_parent_frame=talus_l_offset socket_child_frame=calcn_l_offset
      PhysicalOffsetFrame talus_l_offset: socket_parent=/bodyset/talus_l
          translation=(-0.04731326 -0.04375078 -0.00825998) orientation=(1.76819 -0.906223 1.8196)
      PhysicalOffsetFrame calcn_l_offset: socket_parent=/bodyset/calcn_l translation=(0 0 0)
          orientation=(1.76819 -0.906223 1.8196)
    PinJoint mtp_l: socket_parent_frame=calcn_l_offset socket_child_frame=toes_l_offset
      Coordinate mtp_angle_l: default_value=0 range=(-0.5235988 0.5235988) clamped=true
      PhysicalOffsetFrame calcn_l_offset: socket_parent=/bodyset/calcn_l
          translation=(0.1734593 -0.002085854 -0.001126361)
      PhysicalOffsetFrame toes_l_offset: socket_parent=/bodyset/toes_l translation=(0 0 0)
    PinJoint back: socket_parent_frame=pelvis_offset socket_child_frame=torso_offset
      Coordinate lumbar_extension: default_value=0 range=(-1.570796 1.570796) clamped=false
      PhysicalOffsetFrame pelvis_offset: socket_parent=/bodyset/pelvis translation=(-0.1056852 0.08553467 0)
      PhysicalOffsetFrame torso_offset: socket_parent=/bodyset/torso translation=(0 0 0)
    PinJoint acromial_r: socket_parent_frame=torso_offset socket_child_frame=humerus_r_offset
      Coordinate arm_flex_r: default_value=0 range=(-1.570796 1.570796) clamped=true
      PhysicalOffsetFrame torso_offset: socket_parent=/bodyset/torso translation=(0.003420966 0.4028175 0.184331)
      PhysicalOffsetFrame humerus_r_offset: socket_parent=/bodyset/humerus_r translation=(0 0 0)
    PinJoint acromial_l: socket_parent_frame=torso_offset socket_child_frame=humerus_l_offset
      Coordinate arm_flex_l: default_value=0 range=(-1.570796 1.570796) clamped=true
      PhysicalOffsetFrame torso_offset: socket_parent=/bodyset/torso translation=(0.003420966 0.4028175 -0.184331)
      PhysicalOffsetFrame humerus_l_offset: socket_parent=/bodyset/humerus_l translation=(0 0 0)
    PinJoint elbow_r: socket_parent_frame=humerus_r_offset socket_child_frame=ulna_r_offset
      Coordinate elbow_flex_r: default_value=0 range=(0 2.618) clamped=true
      PhysicalOffsetFrame humerus_r_offset: socket_parent=/bodyset/humerus_r
          translation=(0.01425204 -0.3104058 -0.01040386)
      PhysicalOffsetFrame ulna_r_offset: socket_parent=/bodyset/ulna_r translation=(0 0 0)
    PinJoint elbow_l: socket_parent_frame=humerus_l_offset socket_child_frame=ulna_l_offset
      Coordinate elbow_flex_l: default_value=0 range=(0 2.618) clamped=true
      PhysicalOffsetFrame humerus_l_offset: socket_parent=/bodyset/humerus_l
          translation=(0.01425204 -0.3104058 0.01040386)
      PhysicalOffsetFrame ulna_l_offset: socket_parent=/bodyset/ulna_l translation=(0 0 0)
    WeldJoint radioulnar_r: socket_parent_frame=ulna_r_offset socket_child_frame=radius_r_offset
      PhysicalOffsetFrame ulna_r_offset: socket_parent=/bodyset/ulna_r
          translation=(-0.007076609 -0.01368299 0.02743856) orientation=(0 1.570796 0)
      PhysicalOffsetFrame radius_r_offset: socket_parent=/bodyset/radius_r translation=(0 0 0)
    WeldJoint radius_hand_r: socket_parent_frame=radius_r_offset socket_child_frame=hand_r_offset
      PhysicalOffsetFrame radius_r_offset: socket_parent=/bodyset/radius_r
          translation=(-0.009254189 -0.2480979 0.01431733)
      PhysicalOffsetFrame hand_r_offset: socket_parent=/bodyset/hand_r translation=(0 0 0)
    WeldJoint radioulnar_l: socket_parent_frame=ulna_l_offset socket_child_frame=radius_l_offset
      PhysicalOffsetFrame ulna_l_offset: socket_parent=/bodyset/ulna_l
          translation=(-0.007076609 -0.01368299 -0.02743856) orientation=(0 -1.570796 0)
      PhysicalOffsetFrame radius_l_offset: socket_parent=/bodyset/radius_l translation=(0 0 0)
    WeldJoint radius_hand_l: socket_parent_frame=radius_l_offset socket_child_frame=hand_l_offset
      PhysicalOffsetFrame radius_l_offset: socket_parent=/bodyset/radius_l
          translation=(-0.009254189 -0.2480979 -0.01431733)
      PhysicalOffsetFrame hand_l_offset: socket_parent=/bodyset/hand_l translation=(0 0 0)
  ForceSet:
    Millard2012EquilibriumMuscle [values shared by the 18 below unless stated]: optimal_force=1
        max_contraction_velocity=10 activation_time_constant=0.01 [seconds] deactivation_time_constant=0.04 [seconds]
        minimum_activation=0.01
      ActiveForceLengthCurve: minimum_value=0
      ForceVelocityCurve: concentric_slope_at_vmax=0 concentric_slope_near_vmax=0.25 isometric_slope=5
          eccentric_slope_at_vmax=0 eccentric_slope_near_vmax=0.15 max_eccentric_velocity_force_multiplier=1.4
      FiberForceLengthCurve
      TendonForceLengthCurve
    Millard2012EquilibriumMuscle hamstrings_r: max_isometric_force=2700 optimal_fiber_length=0.1167249
        tendon_slack_length=0.32529 pennation_angle_at_optimal=0 [radians]
      PathPoint bifemlh_r-P1: pelvis (-0.1321957 -0.1076477 0.0743376)
      PathPoint bifemlh_r-P2: tibia_r (-0.03257669 -0.03896215 0.03185156)
      PathPoint bifemlh_r-P3: tibia_r (-0.0253254 -0.06093247 0.03712227)
    Millard2012EquilibriumMuscle bifemsh_r: max_isometric_force=804 optimal_fiber_length=0.1853157
        tendon_slack_length=0.09533583 pennation_angle_at_optimal=0.4014257
      PathPoint P1: femur_r (0.005336676 -0.2253145 0.02497565)
      PathPoint P2: tibia_r (-0.03257669 -0.03896215 0.03185156)
      PathPoint P3: tibia_r (-0.0253254 -0.06093247 0.03712227)
    Millard2012EquilibriumMuscle glut_max_r: max_isometric_force=1944 optimal_fiber_length=0.1557253
        tendon_slack_length=0.10843 pennation_angle_at_optimal=0
      PathPoint P1: pelvis (-0.1415782 0.01847129 0.06027084)
      PathPoint P2: pelvis (-0.1444119 -0.05457427 0.09784644)
      PathPoint P3: femur_r (-0.04546848 -0.05656877 0.03127292)
      PathPoint P4: femur_r (-0.01665043 -0.1084413 0.04472135)
    Millard2012EquilibriumMuscle iliopsoas_r: max_isometric_force=2342 optimal_fiber_length=0.1054619
        tendon_slack_length=0.168739 pennation_angle_at_optimal=0.1396263
      PathPoint psoas_r-P1: pelvis (-0.06790298 0.09309111 0.03093832)
      PathPoint psoas_r-P2: pelvis (-0.02497822 -0.05982179 0.08125322)
      ConditionalPathPoint psoas_r-P3: pelvis (-0.03022575 -0.08448517 0.08735524)
          socket_coordinate=/jointset/hip_r/hip_flexion_r range=(-1.5708 0.785398) [radians]
      PathPoint psoas_r-P4: femur_r (0.001707736 -0.0541139 0.004055874)
      PathPoint psoas_r-P5: femur_r (-0.0200659 -0.06371992 0.01110029)
    Millard2012EquilibriumMuscle rect_fem_r: max_isometric_force=1269 optimal_fiber_length=0.1214351
        tendon_slack_length=0.3302183 pennation_angle_at_optimal=0.08726646
      PathPoint P1: pelvis (-0.0309604 -0.03263961 0.1036273)
      ConditionalPathPoint P2: femur_r (0.035649 -0.4301361 0.002027937)
          socket_coordinate=/jointset/knee_r/knee_angle_r range=(-2.61799 -1.45997)
      MovingPathPoint P3: tibia_r socket_x_coordinate=/jointset/knee_r/knee_angle_r
          socket_y_coordinate=/jointset/knee_r/knee_angle_r socket_z_coordinate=/jointset/knee_r/knee_angle_r
        x_location: MultiplierFunction: scale=1.082282
          SimmSpline: x=(-2.0944 -1.99997 -1.5708 -1.45752 -1.39626 -1.0472 -0.698132 -0.526391 -0.349066 -0.174533 0 0.00017453 0.00034907 0.0279253 0.0872665 0.174533 2.0944)
              y=(0.0155805 0.0179938 0.0275081 0.0296564 0.0307615 0.0365695 0.0422074 0.0450902 0.048391 0.0534299 0.0617576 0.0617669 0.0617762 0.0633083 0.066994 0.0733035 0.0573481)
        y_location: MultiplierFunction: scale=1.082282
          SimmSpline: x=(-2.0944 -1.99997 -1.5708 -1.45752 -1.39626 -1.0472 -0.698132 -0.526391 -0.349066 -0.174533 0 0.00017453 0.00034907 0.0279253 0.0872665 0.174533 2.0944)
              y=(0.0234116 0.0237613 0.0251141 0.0252795 0.0253146 0.0249184 0.0242373 0.0238447 0.0234197 0.0227644 0.020984 0.0209814 0.0209788 0.0205225 0.0191754 0.0159554 -0.0673774)
        z_location: MultiplierFunction: scale=1.082282
          SimmSpline: x=(-2.0944 0.1745) y=(0.0014 0.0014)
    Millard2012EquilibriumMuscle vasti_r: max_isometric_force=5000 optimal_fiber_length=0.09272171
        tendon_slack_length=0.1449443 pennation_angle_at_optimal=0.05235988
      PathPoint vas_int_r-P1: femur_r (0.03095272 -0.2053553 0.03308739)
      PathPoint vas_int_r-P2: femur_r (0.03575573 -0.2224327 0.03041906)
      ConditionalPathPoint vas_int_r-P3: femur_r (0.0366096 -0.4301361 0.005870344)
          socket_coordinate=/jointset/knee_r/knee_angle_r range=(-2.61799 -1.42)
      MovingPathPoint vas_int_r-P4: tibia_r socket_x_coordinate=/jointset/knee_r/knee_angle_r
          socket_y_coordinate=/jointset/knee_r/knee_angle_r socket_z_coordinate=/jointset/knee_r/knee_angle_r
        x_location: MultiplierFunction: scale=1.082282
          SimmSpline: x=(-2.0944 -1.99997 -1.5708 -1.45752 -1.39626 -1.0472 -0.698132 -0.526391 -0.349066 -0.174533 0 0.00017453 0.00034907 0.0279253 0.0872665 0.174533 2.0944)
              y=(0.0082733 0.0106866 0.0202042 0.022353 0.0234583 0.0292715 0.0349465 0.037871 0.0412569 0.0465287 0.0554632 0.0554735 0.0554837 0.0571717 0.061272 0.0684368 0.0648818)
        y_location: MultiplierFunction: scale=1.082282
          SimmSpline: x=(-2.0944 -1.99997 -1.5708 -1.45752 -1.39626 -1.0472 -0.698132 -0.526391 -0.349066 -0.174533 0 0.00017453 0.00034907 0.0279253 0.0872665 0.174533 2.0944)
              y=(0.025599 0.0259487 0.0273124 0.0274796 0.0275151 0.0271363 0.0265737 0.0263073 0.0261187 0.0260129 0.0252923 0.0252911 0.0252898 0.0250526 0.0242191 0.0218288 -0.0685706)
        z_location: MultiplierFunction: scale=1.082282
          SimmSpline: x=(-2.0944 2.0944) y=(0.0018 0.0018)
    Millard2012EquilibriumMuscle gastroc_r: max_isometric_force=2600 optimal_fiber_length=0.06482664
        tendon_slack_length=0.4213731 pennation_angle_at_optimal=0.296706
      PathPoint med_gas_r-P1: femur_r (-0.02027937 -0.419356 -0.02508238)
      ConditionalPathPoint med_gas_r-P2: femur_r (-0.03202006 -0.4292822 -0.02753725)
          socket_coordinate=/jointset/knee_r/knee_angle_r range=(-0.785398 0.174533)
      PathPoint med_gas_r-P3: calcn_r (0 0.03233073 -0.005527512)
    Millard2012EquilibriumMuscle soleus_r: max_isometric_force=5587 optimal_fiber_length=0.0538998
        tendon_slack_length=0.269499 pennation_angle_at_optimal=0.4363323
      PathPoint P1: tibia_r (-0.002597477 -0.1659138 0.007684201)
      PathPoint P2: calcn_r (0 0.03233073 -0.005527512)
    Millard2012EquilibriumMuscle tib_ant_r: max_isometric_force=1500 optimal_fiber_length=0.1046194
        tendon_slack_length=0.2380625 pennation_angle_at_optimal=0.08726646
      PathPoint P1: tibia_r (0.01937285 -0.1757626 0.01244624)
      PathPoint P2: tibia_r (0.03560707 -0.4276096 -0.01915639)
      PathPoint P3: calcn_r (0.1131172 0.0185641 -0.03180927)
    Millard2012EquilibriumMuscle hamstrings_l: max_isometric_force=2700 optimal_fiber_length=0.1167249
        tendon_slack_length=0.32529 pennation_angle_at_optimal=0
      PathPoint bifemlh_l-P1: pelvis (-0.1321957 -0.1076477 -0.0743376)
      PathPoint bifemlh_l-P2: tibia_l (-0.03257669 -0.03896215 -0.03185156)
      PathPoint bifemlh_l-P3: tibia_l (-0.0253254 -0.06093247 -0.03712227)
    Millard2012EquilibriumMuscle bifemsh_l: max_isometric_force=804 optimal_fiber_length=0.1853157
        tendon_slack_length=0.09533583 pennation_angle_at_optimal=0.4014257
      PathPoint P1: femur_l (0.005336676 -0.2253145 -0.02497565)
      PathPoint P2: tibia_l (-0.03257669 -0.03896215 -0.03185156)
      PathPoint P3: tibia_l (-0.0253254 -0.06093247 -0.03712227)
    Millard2012EquilibriumMuscle glut_max_l: max_isometric_force=1944 optimal_fiber_length=0.1557253
        tendon_slack_length=0.10843 pennation_angle_at_optimal=0
      PathPoint P1: pelvis (-0.1415782 0.01847129 -0.06027084)
      PathPoint P2: pelvis (-0.1444119 -0.05457427 -0.09784644)
      PathPoint P3: femur_l (-0.04546848 -0.05656877 -0.03127292)
      PathPoint P4: femur_l (-0.01665043 -0.1084413 -0.04472135)
    Millard2012EquilibriumMuscle iliopsoas_l: max_isometric_force=2342 optimal_fiber_length=0.1054619
        tendon_slack_length=0.168739 pennation_angle_at_optimal=0.1396263
      PathPoint psoas_l-P1: pelvis (-0.06790298 0.09309111 -0.03093832)
      PathPoint psoas_l-P2: pelvis (-0.02497822 -0.05982179 -0.08125322)
      ConditionalPathPoint psoas_l-P3: pelvis (-0.03022575 -0.08448517 -0.08735524)
          socket_coordinate=/jointset/hip_l/hip_flexion_l range=(-1.5708 0.785398)
      PathPoint psoas_l-P4: femur_l (0.001707736 -0.0541139 -0.004055874)
      PathPoint psoas_l-P5: femur_l (-0.0200659 -0.06371992 -0.01110029)
    Millard2012EquilibriumMuscle rect_fem_l: max_isometric_force=1269 optimal_fiber_length=0.1214351
        tendon_slack_length=0.3302183 pennation_angle_at_optimal=0.08726646
      PathPoint P1: pelvis (-0.0309604 -0.03263961 -0.1036273)
      ConditionalPathPoint P2: femur_l (0.035649 -0.4301361 -0.002027937)
          socket_coordinate=/jointset/knee_l/knee_angle_l range=(-2.61799 -1.45997)
      MovingPathPoint P3: tibia_l socket_x_coordinate=/jointset/knee_l/knee_angle_l
          socket_y_coordinate=/jointset/knee_l/knee_angle_l socket_z_coordinate=/jointset/knee_l/knee_angle_l
        x_location: MultiplierFunction: scale=1.082282
          SimmSpline: x=(-2.0944 -1.99997 -1.5708 -1.45752 -1.39626 -1.0472 -0.698132 -0.526391 -0.349066 -0.174533 0 0.00017453 0.00034907 0.0279253 0.0872665 0.174533 2.0944)
              y=(0.0155805 0.0179938 0.0275081 0.0296564 0.0307615 0.0365695 0.0422074 0.0450902 0.048391 0.0534299 0.0617576 0.0617669 0.0617762 0.0633083 0.066994 0.0733035 0.0573481)
        y_location: MultiplierFunction: scale=1.082282
          SimmSpline: x=(-2.0944 -1.99997 -1.5708 -1.45752 -1.39626 -1.0472 -0.698132 -0.526391 -0.349066 -0.174533 0 0.00017453 0.00034907 0.0279253 0.0872665 0.174533 2.0944)
              y=(0.0234116 0.0237613 0.0251141 0.0252795 0.0253146 0.0249184 0.0242373 0.0238447 0.0234197 0.0227644 0.020984 0.0209814 0.0209788 0.0205225 0.0191754 0.0159554 -0.0673774)
        z_location: MultiplierFunction: scale=1.082282
          SimmSpline: x=(-2.0944 0.1745) y=(-0.0014 -0.0014)
    Millard2012EquilibriumMuscle vasti_l: max_isometric_force=5000 optimal_fiber_length=0.09272171
        tendon_slack_length=0.1449443 pennation_angle_at_optimal=0.05235988
      PathPoint vas_int_l-P1: femur_l (0.03095272 -0.2053553 -0.03308739)
      PathPoint vas_int_l-P2: femur_l (0.03575573 -0.2224327 -0.03041906)
      ConditionalPathPoint vas_int_l-P3: femur_l (0.0366096 -0.4301361 -0.005870344)
          socket_coordinate=/jointset/knee_l/knee_angle_l range=(-2.61799 -1.42)
      MovingPathPoint vas_int_l-P4: tibia_l socket_x_coordinate=/jointset/knee_l/knee_angle_l
          socket_y_coordinate=/jointset/knee_l/knee_angle_l socket_z_coordinate=/jointset/knee_l/knee_angle_l
        x_location: MultiplierFunction: scale=1.082282
          SimmSpline: x=(-2.0944 -1.99997 -1.5708 -1.45752 -1.39626 -1.0472 -0.698132 -0.526391 -0.349066 -0.174533 0 0.00017453 0.00034907 0.0279253 0.0872665 0.174533 2.0944)
              y=(0.0082733 0.0106866 0.0202042 0.022353 0.0234583 0.0292715 0.0349465 0.037871 0.0412569 0.0465287 0.0554632 0.0554735 0.0554837 0.0571717 0.061272 0.0684368 0.0648818)
        y_location: MultiplierFunction: scale=1.082282
          SimmSpline: x=(-2.0944 -1.99997 -1.5708 -1.45752 -1.39626 -1.0472 -0.698132 -0.526391 -0.349066 -0.174533 0 0.00017453 0.00034907 0.0279253 0.0872665 0.174533 2.0944)
              y=(0.025599 0.0259487 0.0273124 0.0274796 0.0275151 0.0271363 0.0265737 0.0263073 0.0261187 0.0260129 0.0252923 0.0252911 0.0252898 0.0250526 0.0242191 0.0218288 -0.0685706)
        z_location: MultiplierFunction: scale=1.082282
          SimmSpline: x=(-2.0944 2.0944) y=(-0.0018 -0.0018)
    Millard2012EquilibriumMuscle gastroc_l: max_isometric_force=2600 optimal_fiber_length=0.06482664
        tendon_slack_length=0.4213731 pennation_angle_at_optimal=0.296706
      PathPoint med_gas_l-P1: femur_l (-0.02027937 -0.419356 0.02508238)
      ConditionalPathPoint med_gas_l-P2: femur_l (-0.03202006 -0.4292822 0.02753725)
          socket_coordinate=/jointset/knee_l/knee_angle_l range=(-0.785398 0.174533)
      PathPoint med_gas_l-P3: calcn_l (0 0.03233073 0.005527512)
    Millard2012EquilibriumMuscle soleus_l: max_isometric_force=5587 optimal_fiber_length=0.0538998
        tendon_slack_length=0.269499 pennation_angle_at_optimal=0.4363323
      PathPoint P1: tibia_l (-0.002597477 -0.1659138 -0.007684201)
      PathPoint P2: calcn_l (0 0.03233073 0.005527512)
    Millard2012EquilibriumMuscle tib_ant_l: max_isometric_force=1500 optimal_fiber_length=0.1046194
        tendon_slack_length=0.2380625 pennation_angle_at_optimal=0.08726646
      PathPoint P1: tibia_l (0.01937285 -0.1757626 -0.01244624)
      PathPoint P2: tibia_l (0.03560707 -0.4276096 0.01915639)
      PathPoint P3: calcn_l (0.1131172 0.0185641 0.03180927)
    ActivationCoordinateActuator [values shared by the 5 below unless stated]: min_control=-1 max_control=1
        optimal_force=150 activation_time_constant=0.035 default_activation=0
    ActivationCoordinateActuator actuator_arm_flex_r: coordinate=arm_flex_r
    ActivationCoordinateActuator actuator_elbow_flex_r: coordinate=elbow_flex_r
    ActivationCoordinateActuator actuator_arm_flex_l: coordinate=arm_flex_l
    ActivationCoordinateActuator actuator_elbow_flex_l: coordinate=elbow_flex_l
    ActivationCoordinateActuator actuator_lumbar_extension: coordinate=lumbar_extension optimal_force=300
    SmoothSphereHalfSpaceForce [values shared by the 6 below unless stated]: socket_half_space=/contactgeometryset/floor
        stiffness=1000000 [N/m^2] dissipation=2 [s/m] static_friction=0.8 dynamic_friction=0.8 viscous_friction=0.5
        transition_velocity=0.2 [m/s]
    SmoothSphereHalfSpaceForce SmoothSphereHalfSpaceForce_s1_r: socket_sphere=/contactgeometryset/s1_r
    SmoothSphereHalfSpaceForce SmoothSphereHalfSpaceForce_s2_r: socket_sphere=/contactgeometryset/s2_r
    SmoothSphereHalfSpaceForce SmoothSphereHalfSpaceForce_s3_r: socket_sphere=/contactgeometryset/s3_r
    SmoothSphereHalfSpaceForce SmoothSphereHalfSpaceForce_s1_l: socket_sphere=/contactgeometryset/s1_l
    SmoothSphereHalfSpaceForce SmoothSphereHalfSpaceForce_s2_l: socket_sphere=/contactgeometryset/s2_l
    SmoothSphereHalfSpaceForce SmoothSphereHalfSpaceForce_s3_l: socket_sphere=/contactgeometryset/s3_l
  MarkerSet:
    Marker top_of_head: torso (0.009075611 0.6757821 0.01047284)
    Marker sole_r: calcn_r (-0.01228375 -0.03451796 -1.392262e-18)
    Marker fingertip_r: hand_r (0.005444793 -0.149641 0.0001734298)
    Marker toe_r: calcn_r (0.2448527 0.0009535577 -0.01226267)
  ContactGeometrySet:
    ContactHalfSpace floor: socket_frame=/ground location=(0 0 0) orientation=(0 0 -1.570796)
    ContactSphere s1_r: socket_frame=/bodyset/calcn_r location=(0.004 0 0) radius=0.035
    ContactSphere s2_r: socket_frame=/bodyset/toes_r location=(0 0 0) radius=0.03
    ContactSphere s3_r: socket_frame=/bodyset/toes_r location=(0.05 0 0) radius=0.015
    ContactSphere s1_l: socket_frame=/bodyset/calcn_l location=(0.004 0 0) radius=0.035
    ContactSphere s2_l: socket_frame=/bodyset/toes_l location=(0 0 0) radius=0.03
    ContactSphere s3_l: socket_frame=/bodyset/toes_l location=(0.05 0 0) radius=0.015
