# OpenSim document version 40000
AnalyzeTool 3DGaitModel2392-scaled:
  model_file: false
  replace_force_set: false
  output_precision: 8
  initial_time: 0
  final_time: 91.51
  solve_for_equilibrium_for_auxiliary_states: false
  maximum_number_of_integrator_steps: 20000
  maximum_integrator_step_size: 1
  minimum_integrator_step_size: 1e-8
  integrator_error_tolerance: 1e-5
  lowpass_cutoff_frequency_for_coordinates: -1
  AnalysisSet Analyses:
    BodyKinematics: start_time=0 end_time=91.51 step_interval=1 in_degrees=true bodies=all
        express_results_in_body_local_frame=false
