# OpenSim document version 40500
Model DHondt2025:
  assembly_accuracy: 0.0001
  gravity: 0 -9.80665 0
  length_units: meters
  force_units: N
  credits:
    Delp S.L., Loan J.P., Hoy M.G., Zajac F.E., Topp E.L., Rosen J.M., Thelen D.G., Anderson F.C., Seth A., Hamner S.R., D'Hondt L.
  publications:
    Notes: 3D, 23 DOF gait model created by D.G. Thelen, Univ. of Wisconsin-Madison, and Samuel Hamner, Ajay Seth, Frank C. Anderson, and Scott L. Delp, Stanford University. Lower extremity joint defintions based on Delp et al. (1990). Low back joint and anthropometry based on Anderson and Pandy (1999, 2001). Planar knee model of Yamaguchi and Zajac (1989). Seth removed the patella to avoid kinematic constraints; insertions of the quadrucepts are hand0led with moving points in the tibia frame. Hamner added arms adapted from Holzbaur et al., 2005. D'Hondt updated foot model, and added midtarsal and tarsometatarsal joints, foot ligaments and FDB muscle; foot joints and ligaments adapted from Malaquias et al. (2017). D’Hondt, L., Groote, F.D., Afschrift, M.: A dynamic foot model for predictive simulations of gait reveals causal relations between foot structure and whole body mechanics. PLOS Computational Biology, 2024. Malaquias, T.M., Silveira, C., Aerts, W., De Groote, F., Dereymaeker, G., Vander Sloten, J., Jonkers, I: Extended foot-ankle musculoskeletal models for application in movement analysis. Comput. Methods Biomech. Biomed. Engin., 2017. Hamner, S.R., Seth, A, Delp, S.L.: Muscle contributions to propulsion and support during running. Journal of Biomechanics, 2010. Delp, S.L., Loan, J.P., Hoy, M.G., Zajac, F.E., Topp E.L., Rosen, J.M.: An interactive graphics-based model of the lower extremity to study orthopaedic surgical procedures, IEEE Transactions on Biomedical Engineering, vol. 37, pp. 757-767, 1990. Yamaguchi G.T., Zajac F.E.: A planar model of the knee joint to characterize the knee extensor mechanism." J . Biomech. vol. 21. pp. 1-10. 1989. Anderson F.C., Pandy M.G.: A dynamic optimization solution for vertical jumping in three dimensions. Computer Methods in Biomechanics and Biomedical Engineering 2:201-231, 1999. Anderson F.C., Pandy M.G.: Dynamic optimization of human walking. Journal of Biomechanical Engineering 123:381-390, 2001. Holzbaur, KR, WM Murray and SL Delp, 2005. A model of the upper extremity for simulating musculoskeletal surgery and analyzing neuromuscular control. Ann Biomed Eng 33(6): 829-840.
  Ground
  BodySet:
    Body pelvis: mass=11.27586 [kg] mass_center=(-0.0682778 0 0) inertia=(0.09459246 0.09459246 0.05170279 0 0 0)
        meshes=(sacrum.vtp pelvis.vtp l_pelvis.vtp)
    Body femur_r: mass=6.353356 mass_center=(0 -0.1704667 0) inertia=(0.09196371 0.02410699 0.09697741 0 0 0)
        meshes=femur_r.vtp
    Body tibia_r: mass=2.731943 mass_center=(0 -0.1752504 0) inertia=(0.03272367 0.003312959 0.03272367 0 0 0)
        meshes=(tibia_r.vtp fibula_r.vtp)
    Body talus_r: mass=0.05677708 mass_center=(0 0 0) inertia=(0.0007735165 0.0007202672 0.0007735165 0 0 0)
        meshes=model_r_talus.stl
    Body calcn_r: mass=0.3033498 mass_center=(0.03570389 0.007511644 -0.004421387)
        inertia=(0.0004068616 0 0.0004068616 0 0 0) meshes=model_r_calcaneus_2.stl
    Body midfoot_r: mass=0.1463667 mass_center=(0.01395438 -0.006397697 -0.00260127)
        inertia=(0.0002181236 0 0.0002181236 0 0 0) meshes=model_r_midfoot.stl
    Body forefoot_r: mass=0.2471253 mass_center=(0.03109281 -0.008181545 -0.0004746148)
        inertia=(0.0005399815 0.0005220392 0.0005220392 0 0 0) meshes=model_r_forefoot.stl
      WrapCylinder MetatarsalHead_r: translation=(0.065 -0.015 -0.02) quadrant=-y radius=0.0095 length=0.05
    Body toes_r: mass=0.1358508 mass_center=(0.03543282 0.007087905 -0.0200725)
        inertia=(8.946198e-5 0.0001211356 0.0001211356 0 0 0) meshes=model_r_toes.stl
    Body femur_l: mass=6.353356 mass_center=(0 -0.1704667 0) inertia=(0.09196371 0.02410699 0.09697741 0 0 0)
        meshes=femur_l.vtp
    Body tibia_l: mass=2.731943 mass_center=(0 -0.1752504 0) inertia=(0.03272367 0.003312959 0.03272367 0 0 0)
        meshes=(tibia_l.vtp fibula_l.vtp)
    Body talus_l: mass=0.05677708 mass_center=(0 0 0) inertia=(0.0007735165 0.0007202672 0.0007735165 0 0 0)
        meshes=model_l_talus.stl
    Body calcn_l: mass=0.3033498 mass_center=(0.03570389 0.007511644 0.004421387)
        inertia=(0.0004068616 0 0.0004068616 0 0 0) meshes=model_l_calcaneus_2.stl
    Body midfoot_l: mass=0.1463667 mass_center=(0.01395438 -0.006397697 0.00260127)
        inertia=(0.0002181236 0 0.0002181236 0 0 0) meshes=model_l_midfoot.stl
    Body forefoot_l: mass=0.2471253 mass_center=(0.03109281 -0.008181545 0.0004746148)
        inertia=(0.0005399815 0.0005220392 0.0005220392 0 0 0) meshes=model_l_forefoot.stl
      WrapCylinder MetatarsalHead_l: translation=(0.065 -0.015 0.02) quadrant=-y radius=0.0095 length=0.05
    Body toes_l: mass=0.1358508 mass_center=(0.03543282 0.007087905 0.0200725)
        inertia=(8.946198e-5 0.0001211356 0.0001211356 0 0 0) meshes=model_l_toes.stl
    Body torso: mass=24.56173 mass_center=(-0.02676027 -0.06 0) inertia=(1.201918 0.591436 1.201918 0 0 0)
        meshes=(thorax.vtp groundspine.vtp ground_jaw.vtp ground_skull.vtp)
      WrapEllipsoid Thorax_r: xyz_body_rotation=(-0.17 -0.0383972 0.212232)
          translation=(-0.0208993 -0.139362 0.06300231) quadrant=all dimensions=(0.07036149 0.1614302 0.06363967)
      WrapEllipsoid ScapulothoracicEllipsoid_r: xyz_body_rotation=(0 -0.87 0)
          translation=(-0.02795097 -0.01643463 -0.06326084) quadrant=all dimensions=(0.07736641 0.1899861 0.07807181)
      WrapEllipsoid Thorax_l: xyz_body_rotation=(0.17 0.0383972 0.212232)
          translation=(-0.02089933 -0.139362 -0.06300233) quadrant=all dimensions=(0.07036149 0.1614302 0.06363967)
      WrapEllipsoid ScapulothoracicEllipsoid_l: xyz_body_rotation=(0 0.87 0)
          translation=(-0.02795094 -0.01643463 0.0632608) quadrant=all dimensions=(0.07736641 0.1899861 0.07807181)
    Body clavicle_r: mass=0.1737511 mass_center=(-0.01054531 0.006053003 0.04875619)
        inertia=(0.0002006067 0.0002006067 4.049763e-5 -1.730404e-5 -6.041361e-5 4.639163e-5)
        meshes=clavicle_r_FullBody.obj
      PhysicalOffsetFrame cp_in_clavicle: socket_parent=.. translation=(-0.02777722 0.01922746 0.1080515) [meters]
    Body scapula_r: mass=0.4592507 mass_center=(-0.05195379 -0.03327885 -0.03934551)
        inertia=(0.000714005 0.0006414128 0.000714005 0.0002645682 0.0002282314 0.0001344865)
        meshes=scapula_r_FullBody.obj
      PhysicalOffsetFrame cp_in_scapula: socket_parent=.. translation=(-0.01289114 0.0001044971 -0.01370782)
      WrapCylinder Subscapuralis_r: xyz_body_rotation=(1 -1 1) translation=(-0.02384522 -0.03704849 -0.02555242)
          quadrant=-y radius=0.01172531 length=0.08134191
      WrapCylinder Tmajscapula_r: xyz_body_rotation=(-1.4854 -0.3354 -0.8754)
          translation=(-0.08483217 -0.1008916 -0.04507672) quadrant=-y radius=0.007110348 length=0.04777471
      WrapEllipsoid deltsca_r: xyz_body_rotation=(1.4823 0.1606 -0.4472)
          translation=(-0.03258387 -0.03173041 -0.03985827) quadrant=all dimensions=(0.03821616 0.08319628 0.02854218)
      WrapCylinder Infra_r: xyz_body_rotation=(1.87 -0.543 -2.355) translation=(-0.05521213 -0.04360559 -0.041073)
          quadrant=-y radius=0.0185071 length=0.09606517
    Body humerus_r: mass=1.77894 mass_center=(0.01806103 -0.1401084 -0.01275061)
        inertia=(0.01092753 0.002272031 0.01092753 -0.0003094001 -0.0002070745 0.0001094556)
        meshes=humerus_r_FullBody.obj
      WrapSphere hhead_r: translation=(-0.003200184 0.004900309 -0.002000114) quadrant=all radius=0.02454115
      WrapSphere hheadsupraTminor_r: translation=(-0.0008000461 0.004800299 0.002300119) quadrant=all radius=0.02347414
      WrapEllipsoid hheadInfra_r: xyz_body_rotation=(0.1419 0.13474 0.28117)
          translation=(0.0001000051 0.001000063 -0.004800249) quadrant=all
          dimensions=(0.02982691 0.02336724 0.03022723)
      WrapCylinder TRI_r: xyz_body_rotation=(-0.14015 -0.10528 0.160985)
          translation=(0.00280016 -0.2919167 -0.01190068) quadrant=y radius=0.01600091 length=0.04000229
      WrapEllipsoid BIC_r: xyz_body_rotation=(-0.07163088 0.137532 0.0307178)
          translation=(0.001900109 -0.2890165 -0.0140008) quadrant=x dimensions=(0.01500086 0.01500086 0.1000057)
    Body ulna_r: mass=0.8916288 mass_center=(0.009426922 -0.09307606 0.02356245)
        inertia=(0.004108923 0.0008752241 0.003752153 0.0002405538 -5.780427e-5 0.00082892) meshes=ulna_r_FullBody.obj
    Body radius_r: mass=0.1884416 mass_center=(0.0326227 -0.1761218 0.01513274)
        inertia=(0.0003329344 6.724727e-5 3.056073e-5 2.28788e-5 -3.218517e-6 4.871803e-5) meshes=radius_r_FullBody.obj
    Body hand_r: mass=0.3812013 mass_center=(0 -0.06606471 0) inertia=(0.000699579 0.0004290019 0.001050937 0 0 0)
        meshes=(pisiform_rvs.vtp lunate_rvs.vtp scaphoid_rvs.vtp triquetrum_rvs.vtp hamate_rvs.vtp capitate_rvs.vtp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)
    Body clavicle_l: mass=0.1737511 mass_center=(-0.01054531 0.006053003 -0.04875619)
        inertia=(0.0002006067 0.0002006067 4.049763e-5 -1.730404e-5 -6.041361e-5 4.639163e-5)
        meshes=clavicle_l_FullBody.obj
      PhysicalOffsetFrame cp_in_clavicle: socket_parent=.. translation=(-0.02777722 0.01922746 -0.1080515)
    Body scapula_l: mass=0.4592507 mass_center=(-0.05195379 -0.03327885 0.03934551)
        inertia=(0.000714005 0.0006414128 0.000714005 0.0002645682 0.0002282314 0.0001344865)
        meshes=scapula_l_FullBody.obj
      PhysicalOffsetFrame cp_in_scapula: socket_parent=.. translation=(-0.01289114 0.0001044971 0.01370782)
      WrapCylinder Subscapuralis_l: xyz_body_rotation=(-0.9999964 0.9999992 0.9999954)
          translation=(-0.02384514 -0.03704855 0.02555246) quadrant=-y radius=0.01172531 length=0.0813419
      WrapCylinder Tmajscapula_l: xyz_body_rotation=(1.485399 0.3353991 -0.8753974)
          translation=(-0.08483221 -0.1008916 0.04507669) quadrant=-y radius=0.007110348 length=0.04777471
      WrapEllipsoid deltsca_l: xyz_body_rotation=(-1.482301 -0.1605996 -0.4472026)
          translation=(-0.03258388 -0.03173045 0.03985829) quadrant=all dimensions=(0.03821615 0.08319632 0.02854218)
      WrapCylinder Infra_l: xyz_body_rotation=(-1.869999 0.5430014 -2.355003)
          translation=(-0.05521208 -0.04360563 0.04107303) quadrant=-y radius=0.0185071 length=0.09606517
    Body humerus_l: mass=1.77894 mass_center=(0.01806103 -0.1401084 0.01275061)
        inertia=(0.01092753 0.002272031 0.01092753 -0.0003094001 -0.0002070745 0.0001094556)
        meshes=humerus_l_FullBody.obj
      WrapSphere hhead_l: xyz_body_rotation=(-3.084233e-7 -2.552584e-6 -6.712281e-7)
          translation=(-0.003200022 0.004900259 0.002000211) quadrant=all radius=0.02454115
      WrapSphere hheadsupraTminor_l: xyz_body_rotation=(-3.084233e-7 -2.552584e-6 -6.712281e-7)
          translation=(-0.0007998716 0.004800253 -0.002300016) quadrant=all radius=0.02347414
      WrapEllipsoid hheadInfra_l: xyz_body_rotation=(-0.1419004 -0.1347424 0.281169)
          translation=(0.0001001593 0.001000013 0.004800355) quadrant=all dimensions=(0.02982691 0.02336724 0.03022723)
      WrapCylinder TRI_l: xyz_body_rotation=(0.1401497 0.1052774 0.1609847)
          translation=(0.002800098 -0.2919168 0.01190088) quadrant=y radius=0.01600091 length=0.04000229
      WrapEllipsoid BIC_l: xyz_body_rotation=(0.07163052 -0.1375346 0.03071731)
          translation=(0.001900045 -0.2890164 0.01400099) quadrant=x dimensions=(0.01500086 0.01500086 0.1000057)
    Body ulna_l: mass=0.8916288 mass_center=(0.009426922 -0.09307606 -0.02356245)
        inertia=(0.004108923 0.0008752241 0.003752153 0.0002405538 -5.780427e-5 0.00082892) meshes=ulna_l_FullBody.obj
    Body radius_l: mass=0.1884416 mass_center=(0.0326227 -0.1761218 -0.01513274)
        inertia=(0.0003329344 6.724727e-5 3.056073e-5 2.28788e-5 -3.218517e-6 4.871803e-5) meshes=radius_l_FullBody.obj
    Body hand_l: mass=0.3812013 mass_center=(0 -0.06606471 0) inertia=(0.000699579 0.0004290019 0.001050937 0 0 0)
        meshes=(pisiform_lvs.vtp lunate_lvs.vtp scaphoid_lvs.vtp triquetrum_lvs.vtp hamate_lvs.vtp capitate_lvs.vtp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)
  JointSet:
    CustomJoint ground_pelvis: socket_parent_frame=ground_offset socket_child_frame=pelvis_offset
      Coordinate pelvis_tilt: default_value=1.52397e-16 range=(-1.570796 1.570796) clamped=true
      Coordinate pelvis_list: default_value=3.971116e-16 range=(-1.570796 1.570796) clamped=true
      Coordinate pelvis_rotation: default_value=-4.12078e-15 range=(-1.570796 1.570796) clamped=true
      Coordinate pelvis_tx: default_value=0 range=(-5 5) clamped=true
      Coordinate pelvis_ty: default_value=0.9039965 range=(-1 2) clamped=true
      Coordinate pelvis_tz: default_value=0 range=(-3 3) clamped=true
      PhysicalOffsetFrame ground_offset: socket_parent=/ground translation=(0 0 0)
      PhysicalOffsetFrame pelvis_offset: socket_parent=/bodyset/pelvis translation=(0 0 0)
      SpatialTransform:
        TransformAxis rotation1: coordinates=pelvis_tilt axis=(0 0 1) LinearFunction(coefficients=1 0)
        TransformAxis rotation2: coordinates=pelvis_list axis=(1 0 0) LinearFunction(coefficients=1 0)
        TransformAxis rotation3: coordinates=pelvis_rotation axis=(0 1 0) LinearFunction(coefficients=1 0)
        TransformAxis translation1: coordinates=pelvis_tx axis=(1 0 0) LinearFunction(coefficients=1 0)
        TransformAxis translation2: coordinates=pelvis_ty axis=(0 1 0) LinearFunction(coefficients=1 0)
        TransformAxis translation3: coordinates=pelvis_tz axis=(0 0 1) LinearFunction(coefficients=1 0)
    CustomJoint hip_r: socket_parent_frame=pelvis_offset socket_child_frame=femur_r_offset
      Coordinate hip_flexion_r: default_value=0 range=(-0.8727 0.8727) clamped=true
      Coordinate hip_adduction_r: default_value=0 range=(-0.5236 0.5236) clamped=true
      Coordinate hip_rotation_r: default_value=0 range=(-0.5236 0.5236) clamped=true
      PhysicalOffsetFrame pelvis_offset: socket_parent=/bodyset/pelvis translation=(-0.0682778 -0.0638354 0.08233069)
      PhysicalOffsetFrame femur_r_offset: socket_parent=/bodyset/femur_r translation=(0 0 0)
      SpatialTransform: axes_held_at_zero=(translation1 translation2 translation3)
        TransformAxis rotation1: coordinates=hip_flexion_r axis=(0 0 1) LinearFunction(coefficients=1 0)
        TransformAxis rotation2: coordinates=hip_adduction_r axis=(1 0 0) LinearFunction(coefficients=1 0)
        TransformAxis rotation3: coordinates=hip_rotation_r axis=(0 1 0) LinearFunction(coefficients=1 0)
    CustomJoint knee_r: socket_parent_frame=femur_r_offset socket_child_frame=tibia_r_offset
      Coordinate knee_angle_r: default_value=0 range=(-2.094395 0.1745329) clamped=true
      PhysicalOffsetFrame femur_r_offset: socket_parent=/bodyset/femur_r translation=(-0.005013725 -0.3965857 0)
      PhysicalOffsetFrame tibia_r_offset: socket_parent=/bodyset/tibia_r translation=(0 0 0)
      SpatialTransform: axes_held_at_zero=(rotation2 rotation3 translation1 translation2 translation3)
        TransformAxis rotation1: coordinates=knee_angle_r axis=(0 0 1) LinearFunction(coefficients=1 0)
    CustomJoint ankle_r: socket_parent_frame=tibia_r_offset socket_child_frame=talus_r_offset
      Coordinate ankle_angle_r: default_value=0 range=(-0.5236 0.5236) clamped=true
      PhysicalOffsetFrame tibia_r_offset: socket_parent=/bodyset/tibia_r translation=(0 -0.4036298 0)
      PhysicalOffsetFrame talus_r_offset: socket_parent=/bodyset/talus_r translation=(0 0 0)
      SpatialTransform: axes_held_at_zero=(rotation2 rotation3 translation1 translation2 translation3)
        TransformAxis rotation1: coordinates=ankle_angle_r axis=(-0.1050135 -0.1740224 0.9791263)
            LinearFunction(coefficients=1 0)
    CustomJoint subtalar_r: socket_parent_frame=talus_r_offset socket_child_frame=calcn_r_offset
      Coordinate subtalar_angle_r: default_value=0 range=(-0.5236 0.5236) clamped=true
      PhysicalOffsetFrame talus_r_offset: socket_parent=/bodyset/talus_r
          translation=(-0.04395062 -0.05996309 0.007903289)
      PhysicalOffsetFrame calcn_r_offset: socket_parent=/bodyset/calcn_r translation=(0 0 0)
      SpatialTransform: axes_held_at_zero=(rotation2 rotation3 translation1 translation2 translation3)
        TransformAxis rotation1: coordinates=subtalar_angle_r axis=(0.7871796 0.6047475 -0.1209495)
            LinearFunction(coefficients=1 0)
    CustomJoint midtarsal_r: socket_parent_frame=calcn_r_offset socket_child_frame=midfoot_r_offset
      Coordinate mtj_angle_r: default_value=0 range=(-1.570796 1.570796) clamped=false
      PhysicalOffsetFrame calcn_r_offset: socket_parent=/bodyset/calcn_r
          translation=(0.07723074 0.02919002 -0.007434893)
      PhysicalOffsetFrame midfoot_r_offset: socket_parent=/bodyset/midfoot_r translation=(0 0 0)
      SpatialTransform: axes_held_at_zero=(rotation2 rotation3 translation1 translation2 translation3)
        TransformAxis rotation1: coordinates=mtj_angle_r axis=(-0.2258 -0.4041 0.8864) LinearFunction(coefficients=1 0)
    WeldJoint tarsometatarsal_r: socket_parent_frame=midfoot_r_offset socket_child_frame=forefoot_r_offset
      PhysicalOffsetFrame midfoot_r_offset: socket_parent=/bodyset/midfoot_r
          translation=(0.02300583 -0.01558453 0.005244348)
      PhysicalOffsetFrame forefoot_r_offset: socket_parent=/bodyset/forefoot_r translation=(0 0 0)
    CustomJoint mtp_r: socket_parent_frame=forefoot_r_offset socket_child_frame=toes_r_offset
      Coordinate mtp_angle_r: default_value=0 range=(-0.3491 0.8727) clamped=false
      PhysicalOffsetFrame forefoot_r_offset: socket_parent=/bodyset/forefoot_r
          translation=(0.06194209 -0.01664216 0.003289906)
      PhysicalOffsetFrame toes_r_offset: socket_parent=/bodyset/toes_r translation=(0 0 0)
      SpatialTransform: axes_held_at_zero=(rotation2 rotation3 translation1 translation2 translation3)
        TransformAxis rotation1: coordinates=mtp_angle_r axis=(-0.282997 0.0424223 0.958182)
            LinearFunction(coefficients=1 0)
    CustomJoint hip_l: socket_parent_frame=pelvis_offset socket_child_frame=femur_l_offset
      Coordinate hip_flexion_l: default_value=0 range=(-0.8727 0.8727) clamped=true
      Coordinate hip_adduction_l: default_value=0 range=(-0.5236 0.5236) clamped=true
      Coordinate hip_rotation_l: default_value=0 range=(-0.5236 0.5236) clamped=true
      PhysicalOffsetFrame pelvis_offset: socket_parent=/bodyset/pelvis translation=(-0.0682778 -0.0638354 -0.08233069)
      PhysicalOffsetFrame femur_l_offset: socket_parent=/bodyset/femur_l translation=(0 0 0)
      SpatialTransform: axes_held_at_zero=(translation1 translation2 translation3)
        TransformAxis rotation1: coordinates=hip_flexion_l axis=(0 0 1) LinearFunction(coefficients=1 0)
        TransformAxis rotation2: coordinates=hip_adduction_l axis=(-1 0 0) LinearFunction(coefficients=1 0)
        TransformAxis rotation3: coordinates=hip_rotation_l axis=(0 -1 0) LinearFunction(coefficients=1 0)
    CustomJoint knee_l: socket_parent_frame=femur_l_offset socket_child_frame=tibia_l_offset
      Coordinate knee_angle_l: default_value=0 range=(-2.094395 0.1745329) clamped=true
      PhysicalOffsetFrame femur_l_offset: socket_parent=/bodyset/femur_l translation=(-0.005013725 -0.3965857 0)
      PhysicalOffsetFrame tibia_l_offset: socket_parent=/bodyset/tibia_l translation=(0 0 0)
      SpatialTransform: axes_held_at_zero=(rotation2 rotation3 translation1 translation2 translation3)
        TransformAxis rotation1: coordinates=knee_angle_l axis=(0 0 1) LinearFunction(coefficients=1 0)
    CustomJoint ankle_l: socket_parent_frame=tibia_l_offset socket_child_frame=talus_l_offset
      Coordinate ankle_angle_l: default_value=0 range=(-0.5236 0.5236) clamped=true
      PhysicalOffsetFrame tibia_l_offset: socket_parent=/bodyset/tibia_l translation=(0 -0.4036298 0)
      PhysicalOffsetFrame talus_l_offset: socket_parent=/bodyset/talus_l translation=(0 0 0)
      SpatialTransform: axes_held_at_zero=(rotation2 rotation3 translation1 translation2 translation3)
        TransformAxis rotation1: coordinates=ankle_angle_l axis=(0.1050135 0.1740224 0.9791263)
            LinearFunction(coefficients=1 0)
    CustomJoint subtalar_l: socket_parent_frame=talus_l_offset socket_child_frame=calcn_l_offset
      Coordinate subtalar_angle_l: default_value=0 range=(-0.5236 0.5236) clamped=true
      PhysicalOffsetFrame talus_l_offset: socket_parent=/bodyset/talus_l
          translation=(-0.04395062 -0.05996309 -0.007903289)
      PhysicalOffsetFrame calcn_l_offset: socket_parent=/bodyset/calcn_l translation=(0 0 0)
      SpatialTransform: axes_held_at_zero=(rotation2 rotation3 translation1 translation2 translation3)
        TransformAxis rotation1: coordinates=subtalar_angle_l axis=(-0.7871796 -0.6047475 -0.1209495)
            LinearFunction(coefficients=1 0)
    CustomJoint midtarsal_l: socket_parent_frame=calcn_l_offset socket_child_frame=midfoot_l_offset
      Coordinate mtj_angle_l: default_value=0 range=(-1.570796 1.570796) clamped=false
      PhysicalOffsetFrame calcn_l_offset: socket_parent=/bodyset/calcn_l
          translation=(0.07723074 0.02919002 0.007434893)
      PhysicalOffsetFrame midfoot_l_offset: socket_parent=/bodyset/midfoot_l translation=(0 0 0)
      SpatialTransform: axes_held_at_zero=(rotation2 rotation3 translation1 translation2 translation3)
        TransformAxis rotation1: coordinates=mtj_angle_l axis=(0.2258 0.4041 0.8864) LinearFunction(coefficients=1 0)
    WeldJoint tarsometatarsal_l: socket_parent_frame=midfoot_l_offset socket_child_frame=forefoot_l_offset
      PhysicalOffsetFrame midfoot_l_offset: socket_parent=/bodyset/midfoot_l
          translation=(0.02300583 -0.01558453 -0.005244348)
      PhysicalOffsetFrame forefoot_l_offset: socket_parent=/bodyset/forefoot_l translation=(0 0 0)
    CustomJoint mtp_l: socket_parent_frame=forefoot_l_offset socket_child_frame=toes_l_offset
      Coordinate mtp_angle_l: default_value=0 range=(-0.3491 0.8727) clamped=false
      PhysicalOffsetFrame forefoot_l_offset: socket_parent=/bodyset/forefoot_l
          translation=(0.06194209 -0.01664216 -0.003289906)
      PhysicalOffsetFrame toes_l_offset: socket_parent=/bodyset/toes_l translation=(0 0 0)
      SpatialTransform: axes_held_at_zero=(rotation2 rotation3 translation1 translation2 translation3)
        TransformAxis rotation1: coordinates=mtp_angle_l axis=(0.282997 -0.0424223 0.958182)
            LinearFunction(coefficients=1 0)
    CustomJoint back: socket_parent_frame=pelvis_offset socket_child_frame=torso_offset
      Coordinate lumbar_extension: default_value=5.2868e-18 range=(-0.5236 0.5236) clamped=true
      Coordinate lumbar_bending: default_value=-8.190767e-18 range=(-0.5236 0.5236) clamped=true
      Coordinate lumbar_rotation: default_value=-1.38432e-18 range=(-0.5236 0.5236) clamped=true
      PhysicalOffsetFrame pelvis_offset: socket_parent=/bodyset/pelvis translation=(-0.09529801 0.07712798 0)
      PhysicalOffsetFrame torso_offset: socket_parent=/bodyset/torso translation=(0 -0.3664557 0)
      SpatialTransform: axes_held_at_zero=(translation1 translation2 translation3)
        TransformAxis rotation1: coordinates=lumbar_extension axis=(0 0 1) LinearFunction(coefficients=1 0)
        TransformAxis rotation2: coordinates=lumbar_bending axis=(1 0 0) LinearFunction(coefficients=1 0)
        TransformAxis rotation3: coordinates=lumbar_rotation axis=(0 1 0) LinearFunction(coefficients=1 0)
    CustomJoint sternoclavicular_r: socket_parent_frame=thorax_offset socket_child_frame=clavicle_offset
      Coordinate clav_prot_r: default_value=-0.4065684 range=(-1.047198 -0.3560472) clamped=true
      Coordinate clav_elev_r: default_value=-0.09104413 range=(-0.1884956 0.3560472) clamped=true
      PhysicalOffsetFrame thorax_offset: socket_parent=/bodyset/torso translation=(0.006008559 0.006583357 0.02291936)
      PhysicalOffsetFrame clavicle_offset: socket_parent=/bodyset/clavicle_r translation=(0 0 0)
      SpatialTransform: axes_held_at_zero=(rotation3 translation1 translation2 translation3)
        TransformAxis rotation1: coordinates=clav_prot_r axis=(0.0153 0.9892987 -0.1451)
            LinearFunction(coefficients=1 0)
        TransformAxis rotation2: coordinates=clav_elev_r axis=(-0.9944725 0 -0.104997) LinearFunction(coefficients=1 0)
    CustomJoint scapulothoracic_r: socket_parent_frame=thorax_offset socket_child_frame=scapula_offset
      Coordinate scapula_abduction_r: default_value=-0.2471134 range=(-0.7958701 0.2513274) clamped=true
      Coordinate scapula_winging_r: default_value=0.1014265 range=(-0.3560472 0.1884956) clamped=true
      Coordinate scapula_elevation_r: default_value=-0.07749789 range=(-0.1675516 0.1675516) clamped=true
      Coordinate scapula_upward_rot_r: default_value=0.204367 range=(0.1047198 1.80118) clamped=true
      PhysicalOffsetFrame thorax_offset: socket_parent=/bodyset/torso translation=(-0.02795097 -0.01643463 0.06326084)
          orientation=(0 -0.87 0) [radians]
      PhysicalOffsetFrame scapula_offset: socket_parent=/bodyset/scapula_r
          translation=(-0.05682703 -0.03708848 -0.0503852) orientation=(-0.5181 -1.1416 -0.2854)
      SpatialTransform:
        TransformAxis rotation1: coordinates=(scapula_abduction_r scapula_winging_r) axis=(0 1 0)
          MultivariatePolynomialFunction: coefficients=(0 1 1) dimension=2 order=1
        TransformAxis rotation2: coordinates=scapula_elevation_r axis=(-1 0 0) LinearFunction(coefficients=1 0)
        TransformAxis rotation3: coordinates=scapula_upward_rot_r axis=(0 0 1) LinearFunction(coefficients=1 0)
        TransformAxis translation1: coordinates=(scapula_abduction_r scapula_elevation_r) axis=(1 0 0)
          MultiplierFunction: scale=0.9499734
            MultivariatePolynomialFunction: coefficients=(0 0 0 0 0.08948008 0 0.01523016 0 0 -0.0230507) dimension=2
                order=3
        TransformAxis translation2: coordinates=(scapula_abduction_r scapula_elevation_r) axis=(0 1 0)
          MultiplierFunction: scale=0.9499734
            MultivariatePolynomialFunction: coefficients=(0 0.08948354 0 0.009987164 0 0 0 0 -0.05685687 0) dimension=2
                order=3
        TransformAxis translation3: coordinates=(scapula_abduction_r scapula_elevation_r) axis=(0 0 1)
          MultiplierFunction: scale=0.900054
            MultivariatePolynomialFunction: coefficients=(0.08420966 0 -0.01775182 0 0 0 0 -0.04106754 0 0) dimension=2
                order=3
    CustomJoint glenohumeral_r: socket_parent_frame=scapula_offset socket_child_frame=humerus_offset
      Coordinate plane_elv_r: default_value=-0.4491651 range=(-1.047198 1.507964) clamped=true
      Coordinate shoulder_elev_r: default_value=0.3134224 range=(-0.02094395 1.9059) clamped=true
      Coordinate axial_rot_r: default_value=0.6342254 range=(-0.7120943 1.487021) clamped=true
      PhysicalOffsetFrame scapula_offset: socket_parent=/bodyset/scapula_r
          translation=(-0.009072194 -0.03230039 0.008097625)
      PhysicalOffsetFrame humerus_offset: socket_parent=/bodyset/humerus_r translation=(0 0 0)
      SpatialTransform: axes_held_at_zero=(translation1 translation2 translation3)
        TransformAxis rotation1: coordinates=plane_elv_r axis=(0 1 0) LinearFunction(coefficients=1 0)
        TransformAxis rotation2: coordinates=shoulder_elev_r axis=(-1 0 0) LinearFunction(coefficients=1 0)
        TransformAxis rotation3: coordinates=axial_rot_r axis=(-0.0846 0.9947 -0.0584) LinearFunction(coefficients=1 0)
    CustomJoint elbow_r: socket_parent_frame=humerus_offset socket_child_frame=ulna_offset
      Coordinate elbow_flexion_r: default_value=0.1791433 range=(0 2.268928) clamped=true
      PhysicalOffsetFrame humerus_offset: socket_parent=/bodyset/humerus_r
          translation=(0.006100353 -0.2904178 -0.01230059)
      PhysicalOffsetFrame ulna_offset: socket_parent=/bodyset/ulna_r translation=(0 0 0)
      SpatialTransform: axes_held_at_zero=(rotation1 rotation2 translation1 translation2 translation3)
        TransformAxis rotation3: coordinates=elbow_flexion_r axis=(0.04940001 0.03660001 0.9981083)
            LinearFunction(coefficients=1 0)
    CustomJoint radioulnar_r: socket_parent_frame=ulna_offset socket_child_frame=radius_offset
      Coordinate pro_sup_r: default_value=0 range=(-1.570796 1.570796) clamped=true
      PhysicalOffsetFrame ulna_offset: socket_parent=/bodyset/ulna_r translation=(0.000388019 -0.01115846 0.01939998)
      PhysicalOffsetFrame radius_offset: socket_parent=/bodyset/radius_r translation=(0 0 0)
      SpatialTransform: axes_held_at_zero=(rotation1 rotation3 translation1 translation2 translation3)
        TransformAxis rotation2: coordinates=pro_sup_r axis=(0.01716099 0.9926656 -0.119668)
            LinearFunction(coefficients=1 0)
    WeldJoint rc_r: socket_parent_frame=radius_offset socket_child_frame=hand_offset
      PhysicalOffsetFrame radius_offset: socket_parent=/bodyset/radius_r translation=(0.01746086 -0.2347515 0.02425119)
          orientation=(0 1.570796 0)
      PhysicalOffsetFrame hand_offset: socket_parent=/bodyset/hand_r translation=(0 0 0)
    CustomJoint sternoclavicular_l: socket_parent_frame=thorax_offset socket_child_frame=clavicle_offset
      Coordinate clav_prot_l: default_value=-0.4065684 range=(-1.047198 -0.3560472) clamped=true
      Coordinate clav_elev_l: default_value=-0.09104413 range=(-0.1884956 0.3560472) clamped=true
      PhysicalOffsetFrame thorax_offset: socket_parent=/bodyset/torso translation=(0.006008559 0.006583357 -0.02291936)
      PhysicalOffsetFrame clavicle_offset: socket_parent=/bodyset/clavicle_l translation=(0 0 0)
      SpatialTransform: axes_held_at_zero=(rotation3 translation1 translation2 translation3)
        TransformAxis rotation1: coordinates=clav_prot_l axis=(-0.0153 -0.9892987 -0.1451)
            LinearFunction(coefficients=1 0)
        TransformAxis rotation2: coordinates=clav_elev_l axis=(0.9944725 0 -0.104997) LinearFunction(coefficients=1 0)
    CustomJoint scapulothoracic_l: socket_parent_frame=thorax_offset socket_child_frame=scapula_offset
      Coordinate scapula_abduction_l: default_value=-0.2471134 range=(-0.7958701 0.2513274) clamped=true
      Coordinate scapula_winging_l: default_value=0.1014265 range=(-0.3560472 0.1884956) clamped=true
      Coordinate scapula_elevation_l: default_value=-0.07749789 range=(-0.1675516 0.1675516) clamped=true
      Coordinate scapula_upward_rot_l: default_value=0.204367 range=(0.1047198 1.80118) clamped=true
      PhysicalOffsetFrame thorax_offset: socket_parent=/bodyset/torso translation=(-0.02795097 -0.01643463 -0.06326084)
          orientation=(0 4.011593 0)
      PhysicalOffsetFrame scapula_offset: socket_parent=/bodyset/scapula_l
          translation=(-0.05682703 -0.03708848 0.0503852) orientation=(-2.623494 -1.141597 -2.856194)
      SpatialTransform:
        TransformAxis rotation1: coordinates=(scapula_abduction_l scapula_winging_l) axis=(0 1 0)
          MultivariatePolynomialFunction: coefficients=(0 -1 -1) dimension=2 order=1
        TransformAxis rotation2: coordinates=scapula_elevation_l axis=(-1 0 0) LinearFunction(coefficients=1 0)
        TransformAxis rotation3: coordinates=scapula_upward_rot_l axis=(0 0 -1) LinearFunction(coefficients=1 0)
        TransformAxis translation1: coordinates=(scapula_abduction_l scapula_elevation_l) axis=(1 0 0)
          MultiplierFunction: scale=0.9499734
            MultivariatePolynomialFunction: coefficients=(0 0 0 0 -0.08948008 0 -0.01523016 0 0 0.0230507) dimension=2
                order=3
        TransformAxis translation2: coordinates=(scapula_abduction_l scapula_elevation_l) axis=(0 1 0)
          MultiplierFunction: scale=0.9499734
            MultivariatePolynomialFunction: coefficients=(0 0.08948354 0 0.009987164 0 0 0 0 -0.05685687 0) dimension=2
                order=3
        TransformAxis translation3: coordinates=(scapula_abduction_l scapula_elevation_l) axis=(0 0 1)
          MultiplierFunction: scale=0.900054
            MultivariatePolynomialFunction: coefficients=(0.08420966 0 -0.01775182 0 0 -0.04106754) dimension=2 order=2
    CustomJoint glenohumeral_l: socket_parent_frame=scapula_offset socket_child_frame=humerus_offset
      Coordinate plane_elv_l: default_value=-0.4491651 range=(-1.047198 1.507964) clamped=true
      Coordinate shoulder_elev_l: default_value=0.3134224 range=(-0.02094395 1.9059) clamped=true
      Coordinate axial_rot_l: default_value=0.6342254 range=(-0.7120943 1.487021) clamped=true
      PhysicalOffsetFrame scapula_offset: socket_parent=/bodyset/scapula_l
          translation=(-0.009072194 -0.03230039 -0.008097625)
      PhysicalOffsetFrame humerus_offset: socket_parent=/bodyset/humerus_l translation=(0 0 0)
      SpatialTransform: axes_held_at_zero=(translation1 translation2 translation3)
        TransformAxis rotation1: coordinates=plane_elv_l axis=(0 -1 0) LinearFunction(coefficients=1 0)
        TransformAxis rotation2: coordinates=shoulder_elev_l axis=(1 0 0) LinearFunction(coefficients=1 0)
        TransformAxis rotation3: coordinates=axial_rot_l axis=(0.0846 -0.9947 -0.0584) LinearFunction(coefficients=1 0)
    CustomJoint elbow_l: socket_parent_frame=humerus_offset socket_child_frame=ulna_offset
      Coordinate elbow_flexion_l: default_value=0.1791433 range=(0 2.268928) clamped=true
      PhysicalOffsetFrame humerus_offset: socket_parent=/bodyset/humerus_l
          translation=(0.006100353 -0.2904178 0.01230059)
      PhysicalOffsetFrame ulna_offset: socket_parent=/bodyset/ulna_l translation=(0 0 0)
      SpatialTransform: axes_held_at_zero=(rotation1 rotation2 translation1 translation2 translation3)
        TransformAxis rotation3: coordinates=elbow_flexion_l axis=(-0.04940001 -0.03660001 0.9981083)
            LinearFunction(coefficients=1 0)
    CustomJoint radioulnar_l: socket_parent_frame=ulna_offset socket_child_frame=radius_offset
      Coordinate pro_sup_l: default_value=0 range=(-1.570796 1.570796) clamped=true
      PhysicalOffsetFrame ulna_offset: socket_parent=/bodyset/ulna_l translation=(0.000388019 -0.01115846 -0.01939998)
      PhysicalOffsetFrame radius_offset: socket_parent=/bodyset/radius_l translation=(0 0 0)
      SpatialTransform: axes_held_at_zero=(rotation1 rotation3 translation1 translation2 translation3)
        TransformAxis rotation2: coordinates=pro_sup_l axis=(-0.01716099 -0.9926656 -0.119668)
            LinearFunction(coefficients=1 0)
    WeldJoint rc_l: socket_parent_frame=radius_offset socket_child_frame=hand_offset
      PhysicalOffsetFrame radius_offset: socket_parent=/bodyset/radius_l
          translation=(0.01746086 -0.2347515 -0.02425119) orientation=(0 -1.570796 0)
      PhysicalOffsetFrame hand_offset: socket_parent=/bodyset/hand_l translation=(0 0 0)
  ConstraintSet:
    PointConstraint AC_r: socket_body_1=/bodyset/clavicle_r socket_body_2=/bodyset/scapula_r
        location_body_1=(-0.02777722 0.01922746 0.1080065) location_body_2=(-0.01289114 0.0001044971 -0.01370782)
    PointConstraint AC_l: socket_body_1=/bodyset/clavicle_l socket_body_2=/bodyset/scapula_l
        location_body_1=(-0.02777722 0.01922746 -0.1080065) location_body_2=(-0.01289114 0.0001044971 0.01370782)
  ForceSet:
    Ligament [values shared by the 26 below unless stated]:
      force_length_curve: SimmSpline: x=(-5 0.998 0.999 1 1.01 1.03 1.05 1.07 1.09 1.11 1.13 1.15 1.16 1.19 1.2 1.3 1.4 1.5 1.6 1.61 1.62 5)
          y=(0 0 0 0 0.558937 2.08342 3.8798 5.99658 8.49091 11.4301 14.8936 18.9747 21.2807 29.4506 32.6525 84.343 201.778 468.577 1000 1000 1000 1000)
    Ligament PlantarFascia_r: resting_length=0.146 pcsa_force=70
      PathPoint PlantarFascia_r_P1: calcn_r (0.03236061 -0.016 -0.0152083)
      PathPoint PlantarFascia_r_P3: toes_r (0.015 -0.002727308 -0.01425658)
      PathWrap: wrap_object=MetatarsalHead_r method=hybrid range=(1 2)
      force_length_curve: SimmSpline: x=(-5 0.998 0.999 1 1.01 1.03 1.05 1.07 1.09 1.11 1.13 1.15 1.16 1.19 1.2 1.21 5)
          y=(0 0 0 0 3.30315 12.454 26.7329 49.3972 85.8627 145.2 242.715 404.425 522.232 1000 1000 1000 1000)
    Ligament PlantarFascia_l: resting_length=0.146 pcsa_force=70
      PathPoint PlantarFascia_l_P1: calcn_l (0.03236061 -0.016 0.0152083)
      PathPoint PlantarFascia_l_P3: toes_l (0.015 -0.002727308 0.01425658)
      PathWrap: wrap_object=MetatarsalHead_l method=hybrid range=(1 2)
      force_length_curve: SimmSpline: x=(-5 0.998 0.999 1 1.01 1.03 1.05 1.07 1.09 1.11 1.13 1.15 1.16 1.19 1.2 1.21 5)
          y=(0 0 0 0 3.30315 12.454 26.7329 49.3972 85.8627 145.2 242.715 404.425 522.232 1000 1000 1000 1000)
    SmoothSphereHalfSpaceForce [values shared by the 10 below unless stated]: socket_half_space=/contactgeometryset/floor
        stiffness=10000000 [N/m^2] dissipation=2 [s/m] static_friction=0.8 dynamic_friction=0.8 viscous_friction=0.5
        transition_velocity=0.2 [m/s]
    SmoothSphereHalfSpaceForce SmoothSphereHalfSpaceForce_heel_r: socket_sphere=/contactgeometryset/heel_r
    SmoothSphereHalfSpaceForce SmoothSphereHalfSpaceForce_hindfoot_lat_r: socket_sphere=/contactgeometryset/hindfoot_lat_r
    SmoothSphereHalfSpaceForce SmoothSphereHalfSpaceForce_forefoot_lat_r: socket_sphere=/contactgeometryset/forefoot_lat_r
    SmoothSphereHalfSpaceForce SmoothSphereHalfSpaceForce_forefoot_med_r: socket_sphere=/contactgeometryset/forefoot_med_r
    SmoothSphereHalfSpaceForce SmoothSphereHalfSpaceForce_hallux_r: socket_sphere=/contactgeometryset/hallux_r
    SmoothSphereHalfSpaceForce SmoothSphereHalfSpaceForce_heel_l: socket_sphere=/contactgeometryset/heel_l
    SmoothSphereHalfSpaceForce SmoothSphereHalfSpaceForce_hindfoot_lat_l: socket_sphere=/contactgeometryset/hindfoot_lat_l
    SmoothSphereHalfSpaceForce SmoothSphereHalfSpaceForce_forefoot_lat_l: socket_sphere=/contactgeometryset/forefoot_lat_l
    SmoothSphereHalfSpaceForce SmoothSphereHalfSpaceForce_forefoot_med_l: socket_sphere=/contactgeometryset/forefoot_med_l
    SmoothSphereHalfSpaceForce SmoothSphereHalfSpaceForce_hallux_l: socket_sphere=/contactgeometryset/hallux_l
    Ligament LongPlantar1_r: resting_length=0.0839187 pcsa_force=55.25649
      PathPoint LongPlantar1_r_P1: calcn_r (0.03589548 -0.01009525 0.002007521)
      PathPoint LongPlantar1_r_P2: midfoot_r (0.01075295 -0.02746301 0.008329021)
      PathPoint LongPlantar1_r_P3: forefoot_r (0.01167925 0.003254473 -0.005738154)
    Ligament LongPlantar2_r: resting_length=0.07947708 pcsa_force=41.44236
      PathPoint LongPlantar2_r_P1: calcn_r (0.03589548 -0.01009525 0.002007521)
      PathPoint LongPlantar2_r_P2: midfoot_r (0.006133939 -0.02925719 0.01380518)
      PathPoint LongPlantar2_r_P3: forefoot_r (0.01020248 -0.003156263 0.0008897153)
    Ligament LongPlantar3_r: resting_length=0.07391022 pcsa_force=27.62824
      PathPoint LongPlantar3_r_P1: calcn_r (0.03589548 -0.01009525 0.002007521)
      PathPoint LongPlantar3_r_P2: midfoot_r (0.002403368 -0.02989403 0.01847163)
      PathPoint LongPlantar3_r_P3: forefoot_r (0.005828051 -0.008381537 0.009197185)
    Ligament LongPlantar4_r: resting_length=0.06631394 pcsa_force=13.81412
      PathPoint LongPlantar4_r_P1: calcn_r (0.03589548 -0.01009525 0.002007521)
      PathPoint LongPlantar4_r_P2: midfoot_r (-0.000493096 -0.02994688 0.02301719)
      PathPoint LongPlantar4_r_P3: forefoot_r (-0.003005385 -0.01785188 0.02293082)
    Ligament CalcaneoNavicularPlantar1Mus_r: resting_length=0.02035184 pcsa_force=10.60192
      PathPoint CalcaneoNavicularPlantar1Mus_r_P1: calcn_r (0.05700244 0.02975214 -0.02664983)
      PathPoint CalcaneoNavicularPlantar1Mus_r_P2: midfoot_r (-0.003795571 0.004174652 -0.02251366)
    Ligament CalcaneoNavicularPlantar2Mus_r: resting_length=0.01247982 pcsa_force=12.31771
      PathPoint CalcaneoNavicularPlantar2Mus_r_P1: calcn_r (0.06076957 0.02739884 -0.02214051)
      PathPoint CalcaneoNavicularPlantar2Mus_r_P2: midfoot_r (-0.00414355 0.000223865 -0.01382777)
    Ligament CalcaneoNavicularPlantar3Mus_r: resting_length=0.01089342 pcsa_force=12.31771
      PathPoint CalcaneoNavicularPlantar3Mus_r_P1: calcn_r (0.06282662 0.02579832 -0.01616542)
      PathPoint CalcaneoNavicularPlantar3Mus_r_P2: midfoot_r (-0.00471086 -0.001053918 -0.004545871)
    Ligament CalcaneoCuboidPlantar1Mus_r: resting_length=0.01814505 pcsa_force=15.39714
      PathPoint CalcaneoCuboidPlantar1Mus_r_P1: calcn_r (0.05880577 0.003139706 0.004295305)
      PathPoint CalcaneoCuboidPlantar1Mus_r_P2: midfoot_r (-0.001177797 -0.02483123 0.01406038)
    Ligament CalcaneoCuboidPlantar2Mus_r: resting_length=0.02368999 pcsa_force=15.39714
      PathPoint CalcaneoCuboidPlantar2Mus_r_P1: calcn_r (0.0596257 0.007034532 -0.004939869)
      PathPoint CalcaneoCuboidPlantar2Mus_r_P2: midfoot_r (0.003586828 -0.01923292 0.007414827)
    Ligament CalcaneoCuboidDorsalMus_r: resting_length=0.02627193 pcsa_force=10.60192
      PathPoint CalcaneoCuboidDorsalMus_r_P1: calcn_r (0.0632319 0.02105247 0.02000256)
      PathPoint CalcaneoCuboidDorsalMus_r_P2: midfoot_r (0.01130647 -0.001704713 0.02488336)
    Ligament CalcaneoNavicularBifurcateMus_r: resting_length=0.01750523 pcsa_force=10.60192
      PathPoint CalcaneoNavicularBifurcateMus_r_P1: calcn_r (0.06418684 0.03740483 0.01006243)
      PathPoint CalcaneoNavicularBifurcateMus_r_P2: midfoot_r (0.00185655 0.01369042 0.01055085)
    Ligament CalcaneoCuboidBifurcateMus_r: resting_length=0.01493449 pcsa_force=10.60192
      PathPoint CalcaneoCuboidBifurcateMus_r_P1: calcn_r (0.06418684 0.03740483 0.01006243)
      PathPoint CalcaneoCuboidBifurcateMus_r_P2: midfoot_r (0.0001909117 0.002712556 0.02177442)
    Ligament LongPlantar1_l: resting_length=0.0839187 pcsa_force=55.25649
      PathPoint LongPlantar1_l_P1: calcn_l (0.03589548 -0.01009525 -0.002007521)
      PathPoint LongPlantar1_l_P2: midfoot_l (0.01075295 -0.02746301 -0.008329021)
      PathPoint LongPlantar1_l_P3: forefoot_l (0.01167925 0.003254473 0.005738154)
    Ligament LongPlantar2_l: resting_length=0.07947708 pcsa_force=41.44236
      PathPoint LongPlantar2_l_P1: calcn_l (0.03589548 -0.01009525 -0.002007521)
      PathPoint LongPlantar2_l_P2: midfoot_l (0.006133939 -0.02925719 -0.01380518)
      PathPoint LongPlantar2_l_P3: forefoot_l (0.01020248 -0.003156263 -0.0008897153)
    Ligament LongPlantar3_l: resting_length=0.07391022 pcsa_force=27.62824
      PathPoint LongPlantar3_l_P1: calcn_l (0.03589548 -0.01009525 -0.002007521)
      PathPoint LongPlantar3_l_P2: midfoot_l (0.002403368 -0.02989403 -0.01847163)
      PathPoint LongPlantar3_l_P3: forefoot_l (0.005828051 -0.008381537 -0.009197185)
    Ligament LongPlantar4_l: resting_length=0.06631394 pcsa_force=13.81412
      PathPoint LongPlantar4_l_P1: calcn_l (0.03589548 -0.01009525 -0.002007521)
      PathPoint LongPlantar4_l_P2: midfoot_l (-0.000493096 -0.02994688 -0.02301719)
      PathPoint LongPlantar4_l_P3: forefoot_l (-0.003005385 -0.01785188 -0.02293082)
    Ligament CalcaneoNavicularPlantar1Mus_l: resting_length=0.02035184 pcsa_force=10.60192
      PathPoint CalcaneoNavicularPlantar1Mus_l_P1: calcn_l (0.05700244 0.02975214 0.02664983)
      PathPoint CalcaneoNavicularPlantar1Mus_l_P2: midfoot_l (-0.003795571 0.004174652 0.02251366)
    Ligament CalcaneoNavicularPlantar2Mus_l: resting_length=0.01247982 pcsa_force=12.31771
      PathPoint CalcaneoNavicularPlantar2Mus_rl_P1: calcn_l (0.06076957 0.02739884 0.02214051)
      PathPoint CalcaneoNavicularPlantar2Mus_rl_P2: midfoot_l (-0.00414355 0.000223865 0.01382777)
    Ligament CalcaneoNavicularPlantar3Mus_l: resting_length=0.01089342 pcsa_force=12.31771
      PathPoint CalcaneoNavicularPlantar3Mus_l_P1: calcn_l (0.06282662 0.02579832 0.01616542)
      PathPoint CalcaneoNavicularPlantar3Mus_l_P2: midfoot_l (-0.00471086 -0.001053918 0.004545871)
    Ligament CalcaneoCuboidPlantar1Mus_l: resting_length=0.01814505 pcsa_force=15.39714
      PathPoint CalcaneoCuboidPlantar1Mus_l_P1: calcn_l (0.05880577 0.003139706 -0.004295305)
      PathPoint CalcaneoCuboidPlantar1Mus_l_P2: midfoot_l (-0.001177797 -0.02483123 -0.01406038)
    Ligament CalcaneoCuboidPlantar2Mus_l: resting_length=0.02368999 pcsa_force=15.39714
      PathPoint CalcaneoCuboidPlantar2Mus_l_P1: calcn_l (0.0596257 0.007034532 0.004939869)
      PathPoint CalcaneoCuboidPlantar2Mus_l_P2: midfoot_l (0.003586828 -0.01923292 -0.007414827)
    Ligament CalcaneoCuboidDorsalMus_l: resting_length=0.02627193 pcsa_force=10.60192
      PathPoint CalcaneoCuboidDorsalMus_l_P1: calcn_l (0.0632319 0.02105247 -0.02000256)
      PathPoint CalcaneoCuboidDorsalMus_l_P2: midfoot_l (0.01130647 -0.001704713 -0.02488336)
    Ligament CalcaneoNavicularBifurcateMus_l: resting_length=0.01750523 pcsa_force=10.60192
      PathPoint CalcaneoNavicularBifurcateMus_l_P1: calcn_l (0.06418684 0.03740483 -0.01006243)
      PathPoint CalcaneoNavicularBifurcateMus_l_P2: midfoot_l (0.00185655 0.01369042 -0.01055085)
    Ligament CalcaneoCuboidBifurcateMus_l: resting_length=0.01493449 pcsa_force=10.60192
      PathPoint CalcaneoCuboidBifurcateMus_l_P1: calcn_l (0.06418684 0.03740483 -0.01006243)
      PathPoint CalcaneoCuboidBifurcateMus_l_P2: midfoot_l (0.0001909117 0.002712556 -0.02177442)
    ActivationCoordinateActuator actuator_elbow_flexion_r: min_control=-1 max_control=1 coordinate=elbow_flexion_r
        optimal_force=50 activation_time_constant=0.035 default_activation=0
    ActivationCoordinateActuator actuator_elbow_flexion_l: min_control=-1 max_control=1 coordinate=elbow_flexion_l
        optimal_force=50 activation_time_constant=0.035 default_activation=0
    ActivationCoordinateActuator actuator_pro_sup_r: min_control=-1 max_control=1 coordinate=pro_sup_r optimal_force=50
        activation_time_constant=0.035 default_activation=0
    ActivationCoordinateActuator actuator_pro_sup_l: min_control=-1 max_control=1 coordinate=pro_sup_l optimal_force=50
        activation_time_constant=0.035 default_activation=0
    DeGrooteFregly2016Muscle [values shared by the 166 below unless stated]: min_control=0.01 max_control=1
        max_contraction_velocity=10 activation_time_constant=0.01 deactivation_time_constant=0.04
        default_activation=0.05
    DeGrooteFregly2016Muscle glut_med1_r: max_isometric_force=819 optimal_fiber_length=0.05207765
        tendon_slack_length=0.07592629 pennation_angle_at_optimal=0.1396263 [radians] fiber_damping=0
        passive_fiber_strain_at_one_norm_force=0.6 tendon_strain_at_one_norm_force=0.033
      PathPoint P1: pelvis (-0.03940218 0.02935849 0.119207)
      PathPoint P2: femur_r (-0.02185984 -0.01173212 0.05565235)
    DeGrooteFregly2016Muscle glut_med2_r: max_isometric_force=573 optimal_fiber_length=0.08239993
        tendon_slack_length=0.0516828 pennation_angle_at_optimal=0 fiber_damping=0
        passive_fiber_strain_at_one_norm_force=0.6 tendon_strain_at_one_norm_force=0.033
      PathPoint P1: pelvis (-0.08257075 0.04297542 0.07552732)
      PathPoint P2: femur_r (-0.02587082 -0.005815921 0.05284466)
    DeGrooteFregly2016Muscle glut_med3_r: max_isometric_force=653 optimal_fiber_length=0.06321903
        tendon_slack_length=0.05186701 pennation_angle_at_optimal=0.3316126 fiber_damping=0
        passive_fiber_strain_at_one_norm_force=0.6 tendon_strain_at_one_norm_force=0.033
      PathPoint P1: pelvis (-0.11811 0.01014027 0.06389256)
      PathPoint P2: femur_r (-0.03098482 -0.004712902 0.05194219)
    DeGrooteFregly2016Muscle glut_min1_r: max_isometric_force=270 optimal_fiber_length=0.06657439
        tendon_slack_length=0.01566456 pennation_angle_at_optimal=0.1745329 fiber_damping=0
        passive_fiber_strain_at_one_norm_force=0.6 tendon_strain_at_one_norm_force=0.033
      PathPoint P1: pelvis (-0.04510005 -0.007725918 0.1041212)
      PathPoint P2: femur_r (-0.007219764 -0.01042855 0.05615372)
    DeGrooteFregly2016Muscle glut_min2_r: max_isometric_force=285 optimal_fiber_length=0.05494212
        tendon_slack_length=0.02550884 pennation_angle_at_optimal=0 fiber_damping=0
        passive_fiber_strain_at_one_norm_force=0.6 tendon_strain_at_one_norm_force=0.033
      PathPoint P1: pelvis (-0.06113133 -0.006277308 0.09771224)
      PathPoint P2: femur_r (-0.009626352 -0.01042855 0.05615372)
    DeGrooteFregly2016Muscle glut_min3_r: max_isometric_force=323 optimal_fiber_length=0.03735129
        tendon_slack_length=0.05012937 pennation_angle_at_optimal=0.01745329 fiber_damping=0
        passive_fiber_strain_at_one_norm_force=0.6 tendon_strain_at_one_norm_force=0.033
      PathPoint P1: pelvis (-0.08054269 -0.00608416 0.08440129)
      PathPoint P2: femur_r (-0.01353706 -0.008322784 0.05515098)
    DeGrooteFregly2016Muscle semimem_r: max_isometric_force=1288 optimal_fiber_length=0.07982444
        tendon_slack_length=0.3582122 pennation_angle_at_optimal=0.2617994 fiber_damping=0
        passive_fiber_strain_at_one_norm_force=0.6 tendon_strain_at_one_norm_force=0.033
      PathPoint P1: pelvis (-0.1151162 -0.09413065 0.0705086)
      ConditionalPathPoint P2: tibia_r (-0.03267435 -0.03303194 -0.01775494)
          socket_coordinate=/jointset/knee_r/knee_angle_r range=(-0.5585054 0.1745329) [radians]
      PathPoint P3: tibia_r (-0.02535079 -0.04478413 -0.01837463)
    DeGrooteFregly2016Muscle semiten_r: max_isometric_force=410 optimal_fiber_length=0.1991746
        tendon_slack_length=0.2531796 pennation_angle_at_optimal=0.08726646 fiber_damping=0
        passive_fiber_strain_at_one_norm_force=0.6 tendon_strain_at_one_norm_force=0.033
      PathPoint P1: pelvis (-0.1220212 -0.1061155 0.05954432)
      ConditionalPathPoint P2: tibia_r (-0.03946273 -0.02683669 -0.02137916)
          socket_coordinate=/jointset/knee_r/knee_angle_r range=(-0.3316126 0.1745329)
      PathPoint P3: tibia_r (-0.03119086 -0.04958076 -0.02148245)
      PathPoint P4: tibia_r (-0.01060977 -0.07002508 -0.02300349)
      PathPoint P5: tibia_r (0.002535079 -0.08973723 -0.01812112)
    DeGrooteFregly2016Muscle bifemlh_r: max_isometric_force=896 optimal_fiber_length=0.1086275
        tendon_slack_length=0.324886 pennation_angle_at_optimal=0 fiber_damping=0
        passive_fiber_strain_at_one_norm_force=0.6 tendon_strain_at_one_norm_force=0.033
      PathPoint P1: pelvis (-0.1216446 -0.09905593 0.06846759)
      PathPoint P2: tibia_r (-0.02826143 -0.03379226 0.02763236)
      PathPoint P3: tibia_r (-0.02197068 -0.05284734 0.03220489)
    DeGrooteFregly2016Muscle bifemsh_r: max_isometric_force=804 optimal_fiber_length=0.1706233
        tendon_slack_length=0.08777732 pennation_angle_at_optimal=0.4014257 fiber_damping=0
        passive_fiber_strain_at_one_norm_force=0.6 tendon_strain_at_one_norm_force=0.033
      PathPoint P1: femur_r (0.005013725 -0.2116795 0.02346423)
      PathPoint P2: tibia_r (-0.02826143 -0.03379226 0.02763236)
      PathPoint P3: tibia_r (-0.02197068 -0.05284734 0.03220489)
    DeGrooteFregly2016Muscle sar_r: max_isometric_force=156 optimal_fiber_length=0.5133807
        tendon_slack_length=0.09872705 pennation_angle_at_optimal=0 fiber_damping=0
        passive_fiber_strain_at_one_norm_force=0.6 tendon_strain_at_one_norm_force=0.033
      PathPoint P1: pelvis (-0.01477582 -0.001255462 0.1224607)
      PathPoint P2: femur_r (-0.003008235 -0.3577794 -0.04221557)
      PathPoint P3: tibia_r (-0.005257941 -0.03933044 -0.03746283)
      PathPoint P4: tibia_r (0.005633508 -0.0552879 -0.03596056)
      PathPoint P5: tibia_r (0.02281571 -0.07884861 -0.02366074)
    DeGrooteFregly2016Muscle add_long_r: max_isometric_force=627 optimal_fiber_length=0.1383124
        tendon_slack_length=0.110249 pennation_angle_at_optimal=0.1047198 fiber_damping=0
        passive_fiber_strain_at_one_norm_force=0.6 tendon_strain_at_one_norm_force=0.033
      PathPoint P1: pelvis (-0.03051738 -0.08073584 0.01666334)
      PathPoint P2: femur_r (0.005013725 -0.2116795 0.02346423)
    DeGrooteFregly2016Muscle add_brev_r: max_isometric_force=429 optimal_fiber_length=0.133193
        tendon_slack_length=0.02002903 pennation_angle_at_optimal=0 fiber_damping=0
        passive_fiber_strain_at_one_norm_force=0.6 tendon_strain_at_one_norm_force=0.033
      PathPoint P1: pelvis (-0.05668892 -0.08836519 0.01617034)
      PathPoint P2: femur_r (0.0009024705 -0.1199283 0.0294807)
    DeGrooteFregly2016Muscle add_mag1_r: max_isometric_force=381 optimal_fiber_length=0.08753669
        tendon_slack_length=0.06037013 pennation_angle_at_optimal=0.08726646 fiber_damping=0
        passive_fiber_strain_at_one_norm_force=0.6 tendon_strain_at_one_norm_force=0.033
      PathPoint P1: pelvis (-0.07069215 -0.1133778 0.02514291)
      PathPoint P2: femur_r (-0.004512353 -0.1214324 0.03399306)
    DeGrooteFregly2016Muscle add_mag2_r: max_isometric_force=343 optimal_fiber_length=0.1222252
        tendon_slack_length=0.1212151 pennation_angle_at_optimal=0.05235988 fiber_damping=0
        passive_fiber_strain_at_one_norm_force=0.6 tendon_strain_at_one_norm_force=0.033
      PathPoint P1: pelvis (-0.08025297 -0.1151162 0.03036869)
      PathPoint P2: femur_r (0.005414823 -0.2291272 0.02276231)
    DeGrooteFregly2016Muscle add_mag3_r: max_isometric_force=488 optimal_fiber_length=0.1319552
        tendon_slack_length=0.2508156 pennation_angle_at_optimal=0.08726646 fiber_damping=0
        passive_fiber_strain_at_one_norm_force=0.6 tendon_strain_at_one_norm_force=0.033
      PathPoint P1: pelvis (-0.1072744 -0.1102199 0.04813634)
      PathPoint P2: femur_r (0.007019215 -0.3847533 -0.02667302)
    DeGrooteFregly2016Muscle tfl_r: max_isometric_force=233 optimal_fiber_length=0.09421791
        tendon_slack_length=0.4215012 pennation_angle_at_optimal=0.05235988 fiber_damping=0
        passive_fiber_strain_at_one_norm_force=0.6 tendon_strain_at_one_norm_force=0.033
      PathPoint P1: pelvis (-0.03003451 0.02066683 0.1223621)
      PathPoint P2: femur_r (0.0294807 -0.09977313 0.05986388)
      PathPoint P3: femur_r (0.005414823 -0.4060115 0.035798)
      PathPoint P4: tibia_r (0.005633508 -0.04571342 0.02788587)
    DeGrooteFregly2016Muscle pect_r: max_isometric_force=266 optimal_fiber_length=0.09978509
        tendon_slack_length=0.03292908 pennation_angle_at_optimal=0 fiber_damping=0
        passive_fiber_strain_at_one_norm_force=0.6 tendon_strain_at_one_norm_force=0.033
      PathPoint P1: pelvis (-0.04162338 -0.07416881 0.04446843)
      PathPoint P2: femur_r (-0.01223349 -0.08242564 0.02536945)
    DeGrooteFregly2016Muscle grac_r: max_isometric_force=162 optimal_fiber_length=0.3495839
        tendon_slack_length=0.1251351 pennation_angle_at_optimal=0.05235988 fiber_damping=0
        passive_fiber_strain_at_one_norm_force=0.6 tendon_strain_at_one_norm_force=0.033
      PathPoint P1: pelvis (-0.0714744 -0.1146333 0.02754874)
      ConditionalPathPoint P2: tibia_r (-0.02494705 -0.0299437 -0.03543477)
          socket_coordinate=/jointset/knee_r/knee_angle_r range=(-0.4363323 0.1745329)
      PathPoint P3: tibia_r (-0.01824318 -0.04836987 -0.03361327)
      PathPoint P4: tibia_r (0.005633508 -0.07847314 -0.02140733)
    DeGrooteFregly2016Muscle glut_max1_r: max_isometric_force=573 optimal_fiber_length=0.1389936
        tendon_slack_length=0.1223535 pennation_angle_at_optimal=0.08726646 fiber_damping=0
        passive_fiber_strain_at_one_norm_force=0.6 tendon_strain_at_one_norm_force=0.033
      PathPoint P1: pelvis (-0.1154059 0.05910327 0.06901974)
      PathPoint P2: pelvis (-0.124677 0.001158888 0.08735928)
      PathPoint P3: femur_r (-0.04582545 -0.02486808 0.03930761)
      PathPoint P4: femur_r (-0.02777604 -0.05675537 0.04712902)
    DeGrooteFregly2016Muscle glut_max2_r: max_isometric_force=819 optimal_fiber_length=0.1447585
        tendon_slack_length=0.1250634 pennation_angle_at_optimal=0 fiber_damping=0
        passive_fiber_strain_at_one_norm_force=0.6 tendon_strain_at_one_norm_force=0.033
      PathPoint P1: pelvis (-0.1302783 0.01699702 0.05551159)
      PathPoint P2: pelvis (-0.1328858 -0.05021847 0.09012007)
      PathPoint P3: femur_r (-0.04271694 -0.05314549 0.02938043)
      PathPoint P4: femur_r (-0.01564282 -0.1018789 0.04201502)
    DeGrooteFregly2016Muscle glut_max3_r: max_isometric_force=552 optimal_fiber_length=0.1421178
        tendon_slack_length=0.1431047 pennation_angle_at_optimal=0.08726646 fiber_damping=0
        passive_fiber_strain_at_one_norm_force=0.6 tendon_strain_at_one_norm_force=0.033
      PathPoint P1: pelvis (-0.1502691 -0.03032423 0.005718779)
      PathPoint P2: pelvis (-0.1476616 -0.1015958 0.03973565)
      PathPoint P3: femur_r (-0.02998208 -0.1043858 0.01353706)
      PathPoint P4: femur_r (-0.00601647 -0.1422895 0.04121282)
    DeGrooteFregly2016Muscle iliacus_r: max_isometric_force=1073 optimal_fiber_length=0.09767838
        tendon_slack_length=0.09767838 pennation_angle_at_optimal=0.1221731 fiber_damping=0
        passive_fiber_strain_at_one_norm_force=0.6 tendon_strain_at_one_norm_force=0.033
      PathPoint P1: pelvis (-0.06509086 0.0352495 0.08420409)
      PathPoint P2: pelvis (-0.02491609 -0.05311569 0.0799643)
      ConditionalPathPoint P3: pelvis (-0.0278133 -0.07774205 0.0804573)
          socket_coordinate=/jointset/hip_r/hip_flexion_r range=(-1.570796 0.7853982)
      PathPoint P4: femur_r (0.001704667 -0.05444906 0.005715647)
      PathPoint P5: femur_r (-0.01935298 -0.06227047 0.01293541)
    DeGrooteFregly2016Muscle psoas_r: max_isometric_force=1113 optimal_fiber_length=0.09749959
        tendon_slack_length=0.1559993 pennation_angle_at_optimal=0.1396263 fiber_damping=0
        passive_fiber_strain_at_one_norm_force=0.6 tendon_strain_at_one_norm_force=0.033
      PathPoint P1: pelvis (-0.06248336 0.08566112 0.02849529)
      PathPoint P2: pelvis (-0.02298461 -0.05504717 0.07483712)
      ConditionalPathPoint P3: pelvis (-0.0278133 -0.07774205 0.0804573)
          socket_coordinate=/jointset/hip_r/hip_flexion_r range=(-1.570796 0.7853982)
      PathPoint P4: femur_r (0.001604392 -0.05083917 0.003810431)
      PathPoint P5: femur_r (-0.01885161 -0.05986388 0.01042855)
    DeGrooteFregly2016Muscle quad_fem_r: max_isometric_force=381 optimal_fiber_length=0.0534126
        tendon_slack_length=0.02373893 pennation_angle_at_optimal=0 fiber_damping=0
        passive_fiber_strain_at_one_norm_force=0.6 tendon_strain_at_one_norm_force=0.033
      PathPoint P1: pelvis (-0.1103841 -0.1111566 0.05127181)
      PathPoint P2: femur_r (-0.03820459 -0.03599855 0.03670047)
    DeGrooteFregly2016Muscle gem_r: max_isometric_force=164 optimal_fiber_length=0.02370322
        tendon_slack_length=0.03851773 pennation_angle_at_optimal=0 fiber_damping=0
        passive_fiber_strain_at_one_norm_force=0.6 tendon_strain_at_one_norm_force=0.033
      PathPoint P1: pelvis (-0.1094183 -0.07919066 0.07040014)
      PathPoint P2: femur_r (-0.01423898 -0.003309059 0.04442161)
    DeGrooteFregly2016Muscle peri_r: max_isometric_force=444 optimal_fiber_length=0.02549223
        tendon_slack_length=0.1127541 pennation_angle_at_optimal=0.1745329 fiber_damping=0
        passive_fiber_strain_at_one_norm_force=0.6 tendon_strain_at_one_norm_force=0.033
      PathPoint P1: pelvis (-0.1348173 0.0002897219 0.02317091)
      PathPoint P2: pelvis (-0.1152128 -0.02665442 0.06477996)
      PathPoint P3: femur_r (-0.01484063 -0.003609882 0.04381996)
    DeGrooteFregly2016Muscle rect_fem_r: max_isometric_force=1169 optimal_fiber_length=0.1143024
        tendon_slack_length=0.3108223 pennation_angle_at_optimal=0.08726646 fiber_damping=0
        passive_fiber_strain_at_one_norm_force=0.6 tendon_strain_at_one_norm_force=0.033
      PathPoint P1: pelvis (-0.02848932 -0.03003451 0.09544445)
      ConditionalPathPoint P2: femur_r (0.03349168 -0.4041063 0.001905216)
          socket_coordinate=/jointset/knee_r/knee_angle_r range=(-2.617994 -1.459968)
      MovingPathPoint P3: tibia_r socket_x_coordinate=/jointset/knee_r/knee_angle_r
          socket_y_coordinate=/jointset/knee_r/knee_angle_r socket_z_coordinate=/jointset/knee_r/knee_angle_r
        x_location: MultiplierFunction: scale=0.9389181
          SimmSpline: x=(-2.0944 -1.99997 -1.5708 -1.45752 -1.39626 -1.0472 -0.698132 -0.526391 -0.349066 -0.174533 0 0.00017453 0.00034907 0.0279253 0.0872665 0.174533 2.0944)
              y=(0.0155805 0.0179938 0.0275081 0.0296564 0.0307615 0.0365695 0.0422074 0.0450902 0.048391 0.0534299 0.0617576 0.0617669 0.0617762 0.0633083 0.066994 0.0733035 0.0573481)
        y_location: MultiplierFunction: scale=0.9386739
          SimmSpline: x=(-2.0944 -1.99997 -1.5708 -1.45752 -1.39626 -1.0472 -0.698132 -0.526391 -0.349066 -0.174533 0 0.00017453 0.00034907 0.0279253 0.0872665 0.174533 2.0944)
              y=(0.0234116 0.0237613 0.0251141 0.0252795 0.0253146 0.0249184 0.0242373 0.0238447 0.0234197 0.0227644 0.020984 0.0209814 0.0209788 0.0205225 0.0191754 0.0159554 -0.0673774)
        z_location: MultiplierFunction: scale=0.9389181
          SimmSpline: x=(-2.0944 0.1745) y=(0.0014 0.0014)
    DeGrooteFregly2016Muscle vas_med_r: max_isometric_force=1294 optimal_fiber_length=0.08962777
        tendon_slack_length=0.1268888 pennation_angle_at_optimal=0.08726646 fiber_damping=0
        passive_fiber_strain_at_one_norm_force=0.6 tendon_strain_at_one_norm_force=0.033
      PathPoint P1: femur_r (0.01403843 -0.2104762 0.01885161)
      PathPoint P2: femur_r (0.03569772 -0.2776601 0.0009024705)
      ConditionalPathPoint P3: femur_r (0.03710157 -0.4059112 -0.01253431)
          socket_coordinate=/jointset/knee_r/knee_angle_r range=(-2.617994 -1.210037)
      ConditionalPathPoint P4: femur_r (0.02747521 -0.426668 -0.01313596)
          socket_coordinate=/jointset/knee_r/knee_angle_r range=(-2.617994 -1.780061)
      MovingPathPoint P5: tibia_r socket_x_coordinate=/jointset/knee_r/knee_angle_r
          socket_y_coordinate=/jointset/knee_r/knee_angle_r socket_z_coordinate=/jointset/knee_r/knee_angle_r
        x_location: MultiplierFunction: scale=0.9389181
          SimmSpline: x=(-2.0944 -1.99997 -1.5708 -1.45752 -1.39626 -1.0472 -0.698132 -0.526391 -0.349066 -0.174533 0 0.00017453 0.00034907 0.0279253 0.0872665 0.174533 2.0944)
              y=(0.00981097 0.0122243 0.0217371 0.0238851 0.0249902 0.0307959 0.0364187 0.0392871 0.0425654 0.0475764 0.0559586 0.0559681 0.0559776 0.0575419 0.0613368 0.0679503 0.0629332)
        y_location: MultiplierFunction: scale=0.9386739
          SimmSpline: x=(-2.0944 -1.99997 -1.5708 -1.45752 -1.39626 -1.0472 -0.698132 -0.526391 -0.349066 -0.174533 0 0.00017453 0.00034907 0.0279253 0.0872665 0.174533 2.0944)
              y=(0.0224154 0.0227651 0.0241265 0.0242933 0.0243287 0.0239462 0.0233593 0.0230677 0.0228342 0.0226362 0.0217917 0.0217903 0.0217889 0.0215365 0.0206842 0.0183269 -0.0656205)
        z_location: MultiplierFunction: scale=0.9389181
          SimmSpline: x=(-2.0944 2.0944) y=(-0.0146 -0.0146)
    DeGrooteFregly2016Muscle vas_int_r: max_isometric_force=1365 optimal_fiber_length=0.08785513
        tendon_slack_length=0.1373368 pennation_angle_at_optimal=0.05235988 fiber_damping=0
        passive_fiber_strain_at_one_norm_force=0.6 tendon_strain_at_one_norm_force=0.033
      PathPoint P1: femur_r (0.02907961 -0.1929281 0.0310851)
      PathPoint P2: femur_r (0.03359196 -0.2089721 0.02857823)
      ConditionalPathPoint P3: femur_r (0.03439416 -0.4041063 0.005515098)
          socket_coordinate=/jointset/knee_r/knee_angle_r range=(-2.617994 -1.42)
      MovingPathPoint P4: tibia_r socket_x_coordinate=/jointset/knee_r/knee_angle_r
          socket_y_coordinate=/jointset/knee_r/knee_angle_r socket_z_coordinate=/jointset/knee_r/knee_angle_r
        x_location: MultiplierFunction: scale=0.9389181
          SimmSpline: x=(-2.0944 -1.99997 -1.5708 -1.45752 -1.39626 -1.0472 -0.698132 -0.526391 -0.349066 -0.174533 0 0.00017453 0.00034907 0.0279253 0.0872665 0.174533 2.0944)
              y=(0.0082733 0.0106866 0.0202042 0.022353 0.0234583 0.0292715 0.0349465 0.037871 0.0412569 0.0465287 0.0554632 0.0554735 0.0554837 0.0571717 0.061272 0.0684368 0.0648818)
        y_location: MultiplierFunction: scale=0.9386739
          SimmSpline: x=(-2.0944 -1.99997 -1.5708 -1.45752 -1.39626 -1.0472 -0.698132 -0.526391 -0.349066 -0.174533 0 0.00017453 0.00034907 0.0279253 0.0872665 0.174533 2.0944)
              y=(0.025599 0.0259487 0.0273124 0.0274796 0.0275151 0.0271363 0.0265737 0.0263073 0.0261187 0.0260129 0.0252923 0.0252911 0.0252898 0.0250526 0.0242191 0.0218288 -0.0685706)
        z_location: MultiplierFunction: scale=0.9389181
          SimmSpline: x=(-2.0944 2.0944) y=(0.0018 0.0018)
    DeGrooteFregly2016Muscle vas_lat_r: max_isometric_force=1871 optimal_fiber_length=0.08448281
        tendon_slack_length=0.1579024 pennation_angle_at_optimal=0.08726646 fiber_damping=0
        passive_fiber_strain_at_one_norm_force=0.6 tendon_strain_at_one_norm_force=0.033
      PathPoint P1: femur_r (0.004813176 -0.1859089 0.0349958)
      PathPoint P2: femur_r (0.02697384 -0.2598112 0.04101227)
      ConditionalPathPoint P3: femur_r (0.0361991 -0.4041063 0.02055627)
          socket_coordinate=/jointset/knee_r/knee_angle_r range=(-2.617994 -1.210037)
      ConditionalPathPoint P4: femur_r (0.02536945 -0.4254647 0.01845051)
          socket_coordinate=/jointset/knee_r/knee_angle_r range=(-2.617994 -1.920037)
      MovingPathPoint P5: tibia_r socket_x_coordinate=/jointset/knee_r/knee_angle_r
          socket_y_coordinate=/jointset/knee_r/knee_angle_r socket_z_coordinate=/jointset/knee_r/knee_angle_r
        x_location: MultiplierFunction: scale=0.9389181
          SimmSpline: x=(-2.0944 -1.99997 -1.5708 -1.45752 -1.39626 -1.0472 -0.698132 -0.526391 -0.349066 -0.174533 0 0.00017453 0.00034907 0.0279253 0.0872665 0.174533 2.0944)
              y=(0.0142897 0.016703 0.0262145 0.0283623 0.0294674 0.0352709 0.0408785 0.0437291 0.0469704 0.0518742 0.0599557 0.0599647 0.0599738 0.0614577 0.0650351 0.0711867 0.0583766)
        y_location: MultiplierFunction: scale=0.9386739
          SimmSpline: x=(-2.0944 -1.99997 -1.5708 -1.45752 -1.39626 -1.0472 -0.698132 -0.526391 -0.349066 -0.174533 0 0.00017453 0.00034907 0.0279253 0.0872665 0.174533 2.0944)
              y=(0.0215318 0.0218815 0.0232362 0.0234019 0.0234371 0.0230439 0.0223842 0.0220151 0.0216359 0.0210971 0.0195864 0.0195842 0.019582 0.01919 0.018008 0.0151073 -0.0653421)
        z_location: MultiplierFunction: scale=0.9389181
          SimmSpline: x=(-2.0944 2.0944) y=(0.0165 0.0165)
    DeGrooteFregly2016Muscle med_gas_r: max_isometric_force=1870 optimal_fiber_length=0.05709447
        tendon_slack_length=0.3711141 pennation_angle_at_optimal=0.296706 fiber_damping=0
        passive_fiber_strain_at_one_norm_force=0.6 tendon_strain_at_one_norm_force=0.033
      PathPoint P1: femur_r (-0.01905216 -0.3939785 -0.02356451)
      ConditionalPathPoint P2: femur_r (-0.03008235 -0.4033041 -0.02587082)
          socket_coordinate=/jointset/knee_r/knee_angle_r range=(-0.7853982 0.1745329)
      PathPoint P3: calcn_r (0 0.04431122 -0.005288817)
    DeGrooteFregly2016Muscle lat_gas_r: max_isometric_force=820 optimal_fiber_length=0.06087252
        tendon_slack_length=0.3614306 pennation_angle_at_optimal=0.1396263 fiber_damping=0
        passive_fiber_strain_at_one_norm_force=0.6 tendon_strain_at_one_norm_force=0.033
      PathPoint P1: femur_r (-0.02206039 -0.3956832 0.02727467)
      ConditionalPathPoint P2: femur_r (-0.03008235 -0.402903 0.02747521)
          socket_coordinate=/jointset/knee_r/knee_angle_r range=(-0.7853982 0.1745329)
      PathPoint P3: calcn_r (0 0.04431122 -0.005288817)
    DeGrooteFregly2016Muscle soleus_r: max_isometric_force=4259 optimal_fiber_length=0.04779569
        tendon_slack_length=0.2389785 pennation_angle_at_optimal=0.4363323 fiber_damping=0
        passive_fiber_strain_at_one_norm_force=0.6 tendon_strain_at_one_norm_force=0.033
      PathPoint P1: tibia_r (-0.002253403 -0.1438987 0.006666318)
      PathPoint P2: calcn_r (0 0.04431122 -0.005288817)
    DeGrooteFregly2016Muscle tib_post_r: max_isometric_force=1588 optimal_fiber_length=0.03007615
        tendon_slack_length=0.3007615 pennation_angle_at_optimal=0.2094395 fiber_damping=0
        passive_fiber_strain_at_one_norm_force=0.6 tendon_strain_at_one_norm_force=0.033
      PathPoint P1: tibia_r (-0.00882583 -0.1265332 0.001783944)
      PathPoint P2: tibia_r (-0.01352042 -0.3802568 -0.02150122)
      PathPoint P3: calcn_r (0.03757927 0.04774177 -0.02853965)
      PathPoint P4: midfoot_r (0.0005721473 0.001013649 -0.0233426)
    DeGrooteFregly2016Muscle flex_dig_r: max_isometric_force=310 optimal_fiber_length=0.03252889
        tendon_slack_length=0.3826929 pennation_angle_at_optimal=0.1221731 fiber_damping=0
        passive_fiber_strain_at_one_norm_force=0.6 tendon_strain_at_one_norm_force=0.033
      PathPoint P1: tibia_r (-0.00779302 -0.1920527 -0.001690053)
      PathPoint P2: tibia_r (-0.01445934 -0.3802568 -0.01840279)
      PathPoint P3: calcn_r (0.03929151 0.04502592 -0.02794092)
      PathPoint P4: midfoot_r (-0.01342709 -0.004032687 -0.01880961)
      PathPoint P5: forefoot_r (0.04917931 -0.02518359 0.01376607)
      PathPoint P6: toes_r (-0.001712245 -0.01114927 0.01466898)
      PathPoint P7: toes_r (0.02568367 -0.0101487 0.02145463)
      PathPoint P8: toes_r (0.0397421 -0.008576365 0.02414894)
    DeGrooteFregly2016Muscle flex_hal_r: max_isometric_force=322 optimal_fiber_length=0.04093934
        tendon_slack_length=0.3617895 pennation_angle_at_optimal=0.1745329 fiber_damping=0
        passive_fiber_strain_at_one_norm_force=0.6 tendon_strain_at_one_norm_force=0.033
      PathPoint P1: tibia_r (-0.007417453 -0.2190865 0.0229096)
      PathPoint P2: tibia_r (-0.01746388 -0.3828851 -0.01633717)
      PathPoint P3: calcn_r (0.03370419 0.03945128 -0.02404915)
      PathPoint P4: midfoot_r (0.0163119 -0.01947014 -0.01811109)
      PathPoint P5: forefoot_r (0.05530735 -0.023 -0.027)
      PathPoint P6: toes_r (0.01396831 -0.009148123 -0.03044408)
      PathPoint P7: toes_r (0.0506464 -0.01457982 -0.03006181)
      PathWrap: wrap_object=MetatarsalHead_r method=hybrid range=(5 6)
    DeGrooteFregly2016Muscle tib_ant_r: max_isometric_force=905 optimal_fiber_length=0.09434574
        tendon_slack_length=0.2146847 pennation_angle_at_optimal=0.08726646 fiber_damping=0
        passive_fiber_strain_at_one_norm_force=0.6 tendon_strain_at_one_norm_force=0.033
      PathPoint P1: tibia_r (0.01680663 -0.1524406 0.01079756)
      PathPoint P2: tibia_r (0.0308904 -0.3708701 -0.01661885)
      PathPoint P3: midfoot_r (0.04497376 0.009615513 -0.02084099)
    DeGrooteFregly2016Muscle per_brev_r: max_isometric_force=435 optimal_fiber_length=0.05484301
        tendon_slack_length=0.1765945 pennation_angle_at_optimal=0.08726646 fiber_damping=0
        passive_fiber_strain_at_one_norm_force=0.6 tendon_strain_at_one_norm_force=0.033
      PathPoint P1: tibia_r (-0.006572426 -0.2483731 0.03051484)
      PathPoint P2: tibia_r (-0.01859058 -0.3927412 0.02657138)
      PathPoint P3: tibia_r (-0.01352042 -0.4031605 0.02713473)
      PathPoint P4: calcn_r (0.04244565 0.03859364 0.02325084)
      PathPoint P5: forefoot_r (-0.02268535 -0.009356485 0.03123189)
    DeGrooteFregly2016Muscle per_long_r: max_isometric_force=943 optimal_fiber_length=0.04948137
        tendon_slack_length=0.3483892 pennation_angle_at_optimal=0.1745329 fiber_damping=0
        passive_fiber_strain_at_one_norm_force=0.6 tendon_strain_at_one_norm_force=0.033
      PathPoint P1: tibia_r (0.000469459 -0.1471841 0.03398883)
      PathPoint P2: tibia_r (-0.0194356 -0.3947124 0.02685306)
      PathPoint P3: tibia_r (-0.01521047 -0.4054133 0.02713473)
      PathPoint P4: calcn_r (0.03947175 0.03287607 0.02205337)
      PathPoint P5: midfoot_r (0.002770918 -0.03247213 0.02700875)
      PathPoint P6: midfoot_r (0.01787321 -0.02342133 0.0098603)
      PathPoint P7: forefoot_r (0.0169679 -0.005211676 -0.02000093)
    DeGrooteFregly2016Muscle per_tert_r: max_isometric_force=180 optimal_fiber_length=0.08792177
        tendon_slack_length=0.1112934 pennation_angle_at_optimal=0.2268928 fiber_damping=0
        passive_fiber_strain_at_one_norm_force=0.6 tendon_strain_at_one_norm_force=0.033
      PathPoint P1: tibia_r (0.0009389181 -0.2632042 0.02168901)
      PathPoint P2: tibia_r (0.02150122 -0.3819464 0.0149288)
      PathPoint P3: forefoot_r (-0.002914804 0.0006694051 0.03094893)
    DeGrooteFregly2016Muscle ext_dig_r: max_isometric_force=512 optimal_fiber_length=0.09708468
        tendon_slack_length=0.3283747 pennation_angle_at_optimal=0.1396263 fiber_damping=0
        passive_fiber_strain_at_one_norm_force=0.6 tendon_strain_at_one_norm_force=0.033
      PathPoint P1: tibia_r (0.003004538 -0.1296309 0.02591414)
      PathPoint P2: tibia_r (0.02713473 -0.3761267 0.00676021)
      PathPoint P3: midfoot_r (0.005858191 0.02627047 0.007335104)
      PathPoint P4: forefoot_r (0.04539435 -0.005743826 0.01516312)
      PathPoint P5: toes_r (0.0002703544 0.006718153 0.01526772)
      PathPoint P6: toes_r (0.03992234 -0.0005717577 0.02494725)
    DeGrooteFregly2016Muscle ext_hal_r: max_isometric_force=162 optimal_fiber_length=0.1050929
        tendon_slack_length=0.2887688 pennation_angle_at_optimal=0.1047198 fiber_damping=0
        passive_fiber_strain_at_one_norm_force=0.6 tendon_strain_at_one_norm_force=0.033
      PathPoint P1: tibia_r (0.001126702 -0.1658637 0.02140733)
      PathPoint P2: tibia_r (0.03060873 -0.3740616 -0.007980804)
      PathPoint P3: midfoot_r (0.01018386 0.02641341 -0.01362059)
      PathPoint P4: forefoot_r (0.01628619 0.03056279 -0.02345523)
      PathPoint P5: forefoot_r (0.05602829 0.006263085 -0.02575037)
      PathPoint P6: toes_r (0.02685521 0.005860516 -0.02844831)
      PathPoint P7: toes_r (0.05073651 0.00485994 -0.02256075)
    DeGrooteFregly2016Muscle FDB_r: max_isometric_force=600 optimal_fiber_length=0.023 tendon_slack_length=0.123
        pennation_angle_at_optimal=0.3491 fiber_damping=0 passive_fiber_strain_at_one_norm_force=0.6
        tendon_strain_at_one_norm_force=0.033
      PathPoint FDB_r_P1: calcn_r (0.03236061 -0.016 -0.0152083)
      PathPoint FDB_r_P3: toes_r (0.015 -0.002727308 -0.01425658)
      PathWrap: wrap_object=MetatarsalHead_r method=hybrid range=(1 2)
    DeGrooteFregly2016Muscle glut_med1_l: max_isometric_force=819 optimal_fiber_length=0.05207765
        tendon_slack_length=0.07592629 pennation_angle_at_optimal=0.1396263 fiber_damping=0
        passive_fiber_strain_at_one_norm_force=0.6 tendon_strain_at_one_norm_force=0.033
      PathPoint P1: pelvis (-0.03940218 0.02935849 -0.119207)
      PathPoint P2: femur_l (-0.02185984 -0.01173212 -0.05565235)
    DeGrooteFregly2016Muscle glut_med2_l: max_isometric_force=573 optimal_fiber_length=0.08239993
        tendon_slack_length=0.0516828 pennation_angle_at_optimal=0 fiber_damping=0
        passive_fiber_strain_at_one_norm_force=0.6 tendon_strain_at_one_norm_force=0.033
      PathPoint P1: pelvis (-0.08257075 0.04297542 -0.07552732)
      PathPoint P2: femur_l (-0.02587082 -0.005815921 -0.05284466)
    DeGrooteFregly2016Muscle glut_med3_l: max_isometric_force=653 optimal_fiber_length=0.06321903
        tendon_slack_length=0.05186701 pennation_angle_at_optimal=0.3316126 fiber_damping=0
        passive_fiber_strain_at_one_norm_force=0.6 tendon_strain_at_one_norm_force=0.033
      PathPoint P1: pelvis (-0.11811 0.01014027 -0.06389256)
      PathPoint P2: femur_l (-0.03098482 -0.004712902 -0.05194219)
    DeGrooteFregly2016Muscle glut_min1_l: max_isometric_force=270 optimal_fiber_length=0.06657439
        tendon_slack_length=0.01566456 pennation_angle_at_optimal=0.1745329 fiber_damping=0
        passive_fiber_strain_at_one_norm_force=0.6 tendon_strain_at_one_norm_force=0.033
      PathPoint P1: pelvis (-0.04510005 -0.007725918 -0.1041212)
      PathPoint P2: femur_l (-0.007219764 -0.01042855 -0.05615372)
    DeGrooteFregly2016Muscle glut_min2_l: max_isometric_force=285 optimal_fiber_length=0.05494212
        tendon_slack_length=0.02550884 pennation_angle_at_optimal=0 fiber_damping=0
        passive_fiber_strain_at_one_norm_force=0.6 tendon_strain_at_one_norm_force=0.033
      PathPoint P1: pelvis (-0.06113133 -0.006277308 -0.09771224)
      PathPoint P2: femur_l (-0.009626352 -0.01042855 -0.05615372)
    DeGrooteFregly2016Muscle glut_min3_l: max_isometric_force=323 optimal_fiber_length=0.03735129
        tendon_slack_length=0.05012937 pennation_angle_at_optimal=0.01745329 fiber_damping=0
        passive_fiber_strain_at_one_norm_force=0.6 tendon_strain_at_one_norm_force=0.033
      PathPoint P1: pelvis (-0.08054269 -0.00608416 -0.08440129)
      PathPoint P2: femur_l (-0.01353706 -0.008322784 -0.05515098)
    DeGrooteFregly2016Muscle semimem_l: max_isometric_force=1288 optimal_fiber_length=0.07982444
        tendon_slack_length=0.3582122 pennation_angle_at_optimal=0.2617994 fiber_damping=0
        passive_fiber_strain_at_one_norm_force=0.6 tendon_strain_at_one_norm_force=0.033
      PathPoint P1: pelvis (-0.1151162 -0.09413065 -0.0705086)
      ConditionalPathPoint P2: tibia_l (-0.03267435 -0.03303194 0.01775494)
          socket_coordinate=/jointset/knee_l/knee_angle_l range=(-0.5585054 0.1745329)
      PathPoint P3: tibia_l (-0.02535079 -0.04478413 0.01837463)
    DeGrooteFregly2016Muscle semiten_l: max_isometric_force=410 optimal_fiber_length=0.1991746
        tendon_slack_length=0.2531796 pennation_angle_at_optimal=0.08726646 fiber_damping=0
        passive_fiber_strain_at_one_norm_force=0.6 tendon_strain_at_one_norm_force=0.033
      PathPoint P1: pelvis (-0.1220212 -0.1061155 -0.05954432)
      ConditionalPathPoint P2: tibia_l (-0.03946273 -0.02683669 0.02137916)
          socket_coordinate=/jointset/knee_l/knee_angle_l range=(-0.3316126 0.1745329)
      PathPoint P3: tibia_l (-0.03119086 -0.04958076 0.02148245)
      PathPoint P4: tibia_l (-0.01060977 -0.07002508 0.02300349)
      PathPoint P5: tibia_l (0.002535079 -0.08973723 0.01812112)
    DeGrooteFregly2016Muscle bifemlh_l: max_isometric_force=896 optimal_fiber_length=0.1086275
        tendon_slack_length=0.324886 pennation_angle_at_optimal=0 fiber_damping=0
        passive_fiber_strain_at_one_norm_force=0.6 tendon_strain_at_one_norm_force=0.033
      PathPoint P1: pelvis (-0.1216446 -0.09905593 -0.06846759)
      PathPoint P2: tibia_l (-0.02826143 -0.03379226 -0.02763236)
      PathPoint P3: tibia_l (-0.02197068 -0.05284734 -0.03220489)
    DeGrooteFregly2016Muscle bifemsh_l: max_isometric_force=804 optimal_fiber_length=0.1706233
        tendon_slack_length=0.08777732 pennation_angle_at_optimal=0.4014257 fiber_damping=0
        passive_fiber_strain_at_one_norm_force=0.6 tendon_strain_at_one_norm_force=0.033
      PathPoint P1: femur_l (0.005013725 -0.2116795 -0.02346423)
      PathPoint P2: tibia_l (-0.02826143 -0.03379226 -0.02763236)
      PathPoint P3: tibia_l (-0.02197068 -0.05284734 -0.03220489)
    DeGrooteFregly2016Muscle sar_l: max_isometric_force=156 optimal_fiber_length=0.5133807
        tendon_slack_length=0.09872705 pennation_angle_at_optimal=0 fiber_damping=0
        passive_fiber_strain_at_one_norm_force=0.6 tendon_strain_at_one_norm_force=0.033
      PathPoint P1: pelvis (-0.01477582 -0.001255462 -0.1224607)
      PathPoint P2: femur_l (-0.003008235 -0.3577794 0.04221557)
      PathPoint P3: tibia_l (-0.005257941 -0.03933044 0.03746283)
      PathPoint P4: tibia_l (0.005633508 -0.0552879 0.03596056)
      PathPoint P5: tibia_l (0.02281571 -0.07884861 0.02366074)
    DeGrooteFregly2016Muscle add_long_l: max_isometric_force=627 optimal_fiber_length=0.1383124
        tendon_slack_length=0.110249 pennation_angle_at_optimal=0.1047198 fiber_damping=0
        passive_fiber_strain_at_one_norm_force=0.6 tendon_strain_at_one_norm_force=0.033
      PathPoint P1: pelvis (-0.03051738 -0.08073584 -0.01666334)
      PathPoint P2: femur_l (0.005013725 -0.2116795 -0.02346423)
    DeGrooteFregly2016Muscle add_brev_l: max_isometric_force=429 optimal_fiber_length=0.133193
        tendon_slack_length=0.02002903 pennation_angle_at_optimal=0 fiber_damping=0
        passive_fiber_strain_at_one_norm_force=0.6 tendon_strain_at_one_norm_force=0.033
      PathPoint P1: pelvis (-0.05668892 -0.08836519 -0.01617034)
      PathPoint P2: femur_l (0.0009024705 -0.1199283 -0.0294807)
    DeGrooteFregly2016Muscle add_mag1_l: max_isometric_force=381 optimal_fiber_length=0.08753669
        tendon_slack_length=0.06037013 pennation_angle_at_optimal=0.08726646 fiber_damping=0
        passive_fiber_strain_at_one_norm_force=0.6 tendon_strain_at_one_norm_force=0.033
      PathPoint P1: pelvis (-0.07069215 -0.1133778 -0.02514291)
      PathPoint P2: femur_l (-0.004512353 -0.1214324 -0.03399306)
    DeGrooteFregly2016Muscle add_mag2_l: max_isometric_force=343 optimal_fiber_length=0.1222252
        tendon_slack_length=0.1212151 pennation_angle_at_optimal=0.05235988 fiber_damping=0
        passive_fiber_strain_at_one_norm_force=0.6 tendon_strain_at_one_norm_force=0.033
      PathPoint P1: pelvis (-0.08025297 -0.1151162 -0.03036869)
      PathPoint P2: femur_l (0.005414823 -0.2291272 -0.02276231)
    DeGrooteFregly2016Muscle add_mag3_l: max_isometric_force=488 optimal_fiber_length=0.1319552
        tendon_slack_length=0.2508156 pennation_angle_at_optimal=0.08726646 fiber_damping=0
        passive_fiber_strain_at_one_norm_force=0.6 tendon_strain_at_one_norm_force=0.033
      PathPoint P1: pelvis (-0.1072744 -0.1102199 -0.04813634)
      PathPoint P2: femur_l (0.007019215 -0.3847533 0.02667302)
    DeGrooteFregly2016Muscle tfl_l: max_isometric_force=233 optimal_fiber_length=0.09421791
        tendon_slack_length=0.4215012 pennation_angle_at_optimal=0.05235988 fiber_damping=0
        passive_fiber_strain_at_one_norm_force=0.6 tendon_strain_at_one_norm_force=0.033
      PathPoint P1: pelvis (-0.03003451 0.02066683 -0.1223621)
      PathPoint P2: femur_l (0.0294807 -0.09977313 -0.05986388)
      PathPoint P3: femur_l (0.005414823 -0.4060115 -0.035798)
      PathPoint P4: tibia_l (0.005633508 -0.04571342 -0.02788587)
    DeGrooteFregly2016Muscle pect_l: max_isometric_force=266 optimal_fiber_length=0.09978509
        tendon_slack_length=0.03292908 pennation_angle_at_optimal=0 fiber_damping=0
        passive_fiber_strain_at_one_norm_force=0.6 tendon_strain_at_one_norm_force=0.033
      PathPoint P1: pelvis (-0.04162338 -0.07416881 -0.04446843)
      PathPoint P2: femur_l (-0.01223349 -0.08242564 -0.02536945)
    DeGrooteFregly2016Muscle grac_l: max_isometric_force=162 optimal_fiber_length=0.3495839
        tendon_slack_length=0.1251351 pennation_angle_at_optimal=0.05235988 fiber_damping=0
        passive_fiber_strain_at_one_norm_force=0.6 tendon_strain_at_one_norm_force=0.033
      PathPoint P1: pelvis (-0.0714744 -0.1146333 -0.02754874)
      ConditionalPathPoint P2: tibia_l (-0.02494705 -0.0299437 0.03543477)
          socket_coordinate=/jointset/knee_l/knee_angle_l range=(-0.4363323 0.1745329)
      PathPoint P3: tibia_l (-0.01824318 -0.04836987 0.03361327)
      PathPoint P4: tibia_l (0.005633508 -0.07847314 0.02140733)
    DeGrooteFregly2016Muscle glut_max1_l: max_isometric_force=573 optimal_fiber_length=0.1389936
        tendon_slack_length=0.1223535 pennation_angle_at_optimal=0.08726646 fiber_damping=0
        passive_fiber_strain_at_one_norm_force=0.6 tendon_strain_at_one_norm_force=0.033
      PathPoint P1: pelvis (-0.1154059 0.05910327 -0.06901974)
      PathPoint P2: pelvis (-0.124677 0.001158888 -0.08735928)
      PathPoint P3: femur_l (-0.04582545 -0.02486808 -0.03930761)
      PathPoint P4: femur_l (-0.02777604 -0.05675537 -0.04712902)
    DeGrooteFregly2016Muscle glut_max2_l: max_isometric_force=819 optimal_fiber_length=0.1447585
        tendon_slack_length=0.1250634 pennation_angle_at_optimal=0 fiber_damping=0
        passive_fiber_strain_at_one_norm_force=0.6 tendon_strain_at_one_norm_force=0.033
      PathPoint P1: pelvis (-0.1302783 0.01699702 -0.05551159)
      PathPoint P2: pelvis (-0.1328858 -0.05021847 -0.09012007)
      PathPoint P3: femur_l (-0.04271694 -0.05314549 -0.02938043)
      PathPoint P4: femur_l (-0.01564282 -0.1018789 -0.04201502)
    DeGrooteFregly2016Muscle glut_max3_l: max_isometric_force=552 optimal_fiber_length=0.1421178
        tendon_slack_length=0.1431047 pennation_angle_at_optimal=0.08726646 fiber_damping=0
        passive_fiber_strain_at_one_norm_force=0.6 tendon_strain_at_one_norm_force=0.033
      PathPoint P1: pelvis (-0.1502691 -0.03032423 -0.005718779)
      PathPoint P2: pelvis (-0.1476616 -0.1015958 -0.03973565)
      PathPoint P3: femur_l (-0.02998208 -0.1043858 -0.01353706)
      PathPoint P4: femur_l (-0.00601647 -0.1422895 -0.04121282)
    DeGrooteFregly2016Muscle iliacus_l: max_isometric_force=1073 optimal_fiber_length=0.09767838
        tendon_slack_length=0.09767838 pennation_angle_at_optimal=0.1221731 fiber_damping=0
        passive_fiber_strain_at_one_norm_force=0.6 tendon_strain_at_one_norm_force=0.033
      PathPoint P1: pelvis (-0.06509086 0.0352495 -0.08420409)
      PathPoint P2: pelvis (-0.02491609 -0.05311569 -0.0799643)
      ConditionalPathPoint P3: pelvis (-0.0278133 -0.07774205 -0.0804573)
          socket_coordinate=/jointset/hip_l/hip_flexion_l range=(-1.570796 0.7853982)
      PathPoint P4: femur_l (0.001704667 -0.05444906 -0.005715647)
      PathPoint P5: femur_l (-0.01935298 -0.06227047 -0.01293541)
    DeGrooteFregly2016Muscle psoas_l: max_isometric_force=1113 optimal_fiber_length=0.09749959
        tendon_slack_length=0.1559993 pennation_angle_at_optimal=0.1396263 fiber_damping=0
        passive_fiber_strain_at_one_norm_force=0.6 tendon_strain_at_one_norm_force=0.033
      PathPoint P1: pelvis (-0.06248336 0.08566112 -0.02849529)
      PathPoint P2: pelvis (-0.02298461 -0.05504717 -0.07483712)
      ConditionalPathPoint P3: pelvis (-0.0278133 -0.07774205 -0.0804573)
          socket_coordinate=/jointset/hip_l/hip_flexion_l range=(-1.570796 0.7853982)
      PathPoint P4: femur_l (0.001604392 -0.05083917 -0.003810431)
      PathPoint P5: femur_l (-0.01885161 -0.05986388 -0.01042855)
    DeGrooteFregly2016Muscle quad_fem_l: max_isometric_force=381 optimal_fiber_length=0.0534126
        tendon_slack_length=0.02373893 pennation_angle_at_optimal=0 fiber_damping=0
        passive_fiber_strain_at_one_norm_force=0.6 tendon_strain_at_one_norm_force=0.033
      PathPoint P1: pelvis (-0.1103841 -0.1111566 -0.05127181)
      PathPoint P2: femur_l (-0.03820459 -0.03599855 -0.03670047)
    DeGrooteFregly2016Muscle gem_l: max_isometric_force=164 optimal_fiber_length=0.02370322
        tendon_slack_length=0.03851773 pennation_angle_at_optimal=0 fiber_damping=0
        passive_fiber_strain_at_one_norm_force=0.6 tendon_strain_at_one_norm_force=0.033
      PathPoint P1: pelvis (-0.1094183 -0.07919066 -0.07040014)
      PathPoint P2: femur_l (-0.01423898 -0.003309059 -0.04442161)
    DeGrooteFregly2016Muscle peri_l: max_isometric_force=444 optimal_fiber_length=0.02549223
        tendon_slack_length=0.1127541 pennation_angle_at_optimal=0.1745329 fiber_damping=0
        passive_fiber_strain_at_one_norm_force=0.6 tendon_strain_at_one_norm_force=0.033
      PathPoint P1: pelvis (-0.1348173 0.0002897219 -0.02317091)
      PathPoint P2: pelvis (-0.1152128 -0.02665442 -0.06477996)
      PathPoint P3: femur_l (-0.01484063 -0.003609882 -0.04381996)
    DeGrooteFregly2016Muscle rect_fem_l: max_isometric_force=1169 optimal_fiber_length=0.1143024
        tendon_slack_length=0.3108223 pennation_angle_at_optimal=0.08726646 fiber_damping=0
        passive_fiber_strain_at_one_norm_force=0.6 tendon_strain_at_one_norm_force=0.033
      PathPoint P1: pelvis (-0.02848932 -0.03003451 -0.09544445)
      ConditionalPathPoint P2: femur_l (0.03349168 -0.4041063 -0.001905216)
          socket_coordinate=/jointset/knee_l/knee_angle_l range=(-2.617994 -1.459968)
      MovingPathPoint P3: tibia_l socket_x_coordinate=/jointset/knee_l/knee_angle_l
          socket_y_coordinate=/jointset/knee_l/knee_angle_l socket_z_coordinate=/jointset/knee_l/knee_angle_l
        x_location: MultiplierFunction: scale=0.9389181
          SimmSpline: x=(-2.0944 -1.99997 -1.5708 -1.45752 -1.39626 -1.0472 -0.698132 -0.526391 -0.349066 -0.174533 0 0.00017453 0.00034907 0.0279253 0.0872665 0.174533 2.0944)
              y=(0.0155805 0.0179938 0.0275081 0.0296564 0.0307615 0.0365695 0.0422074 0.0450902 0.048391 0.0534299 0.0617576 0.0617669 0.0617762 0.0633083 0.066994 0.0733035 0.0573481)
        y_location: MultiplierFunction: scale=0.9386739
          SimmSpline: x=(-2.0944 -1.99997 -1.5708 -1.45752 -1.39626 -1.0472 -0.698132 -0.526391 -0.349066 -0.174533 0 0.00017453 0.00034907 0.0279253 0.0872665 0.174533 2.0944)
              y=(0.0234116 0.0237613 0.0251141 0.0252795 0.0253146 0.0249184 0.0242373 0.0238447 0.0234197 0.0227644 0.020984 0.0209814 0.0209788 0.0205225 0.0191754 0.0159554 -0.0673774)
        z_location: MultiplierFunction: scale=0.9389181
          SimmSpline: x=(-2.0944 0.1745) y=(-0.0014 -0.0014)
    DeGrooteFregly2016Muscle vas_med_l: max_isometric_force=1294 optimal_fiber_length=0.08962777
        tendon_slack_length=0.1268888 pennation_angle_at_optimal=0.08726646 fiber_damping=0
        passive_fiber_strain_at_one_norm_force=0.6 tendon_strain_at_one_norm_force=0.033
      PathPoint P1: femur_l (0.01403843 -0.2104762 -0.01885161)
      PathPoint P2: femur_l (0.03569772 -0.2776601 -0.0009024705)
      ConditionalPathPoint P3: femur_l (0.03710157 -0.4059112 0.01253431)
          socket_coordinate=/jointset/knee_l/knee_angle_l range=(-2.617994 -1.210037)
      ConditionalPathPoint P4: femur_l (0.02747521 -0.426668 0.01313596)
          socket_coordinate=/jointset/knee_l/knee_angle_l range=(-2.617994 -1.780061)
      MovingPathPoint P5: tibia_l socket_x_coordinate=/jointset/knee_l/knee_angle_l
          socket_y_coordinate=/jointset/knee_l/knee_angle_l socket_z_coordinate=/jointset/knee_l/knee_angle_l
        x_location: MultiplierFunction: scale=0.9389181
          SimmSpline: x=(-2.0944 -1.99997 -1.5708 -1.45752 -1.39626 -1.0472 -0.698132 -0.526391 -0.349066 -0.174533 0 0.00017453 0.00034907 0.0279253 0.0872665 0.174533 2.0944)
              y=(0.00981097 0.0122243 0.0217371 0.0238851 0.0249902 0.0307959 0.0364187 0.0392871 0.0425654 0.0475764 0.0559586 0.0559681 0.0559776 0.0575419 0.0613368 0.0679503 0.0629332)
        y_location: MultiplierFunction: scale=0.9386739
          SimmSpline: x=(-2.0944 -1.99997 -1.5708 -1.45752 -1.39626 -1.0472 -0.698132 -0.526391 -0.349066 -0.174533 0 0.00017453 0.00034907 0.0279253 0.0872665 0.174533 2.0944)
              y=(0.0224154 0.0227651 0.0241265 0.0242933 0.0243287 0.0239462 0.0233593 0.0230677 0.0228342 0.0226362 0.0217917 0.0217903 0.0217889 0.0215365 0.0206842 0.0183269 -0.0656205)
        z_location: MultiplierFunction: scale=0.9389181
          SimmSpline: x=(-2.0944 2.0944) y=(0.0146 0.0146)
    DeGrooteFregly2016Muscle vas_int_l: max_isometric_force=1365 optimal_fiber_length=0.08785513
        tendon_slack_length=0.1373368 pennation_angle_at_optimal=0.05235988 fiber_damping=0
        passive_fiber_strain_at_one_norm_force=0.6 tendon_strain_at_one_norm_force=0.033
      PathPoint P1: femur_l (0.02907961 -0.1929281 -0.0310851)
      PathPoint P2: femur_l (0.03359196 -0.2089721 -0.02857823)
      ConditionalPathPoint P3: femur_l (0.03439416 -0.4041063 -0.005515098)
          socket_coordinate=/jointset/knee_l/knee_angle_l range=(-2.617994 -1.42)
      MovingPathPoint P4: tibia_l socket_x_coordinate=/jointset/knee_l/knee_angle_l
          socket_y_coordinate=/jointset/knee_l/knee_angle_l socket_z_coordinate=/jointset/knee_l/knee_angle_l
        x_location: MultiplierFunction: scale=0.9389181
          SimmSpline: x=(-2.0944 -1.99997 -1.5708 -1.45752 -1.39626 -1.0472 -0.698132 -0.526391 -0.349066 -0.174533 0 0.00017453 0.00034907 0.0279253 0.0872665 0.174533 2.0944)
              y=(0.0082733 0.0106866 0.0202042 0.022353 0.0234583 0.0292715 0.0349465 0.037871 0.0412569 0.0465287 0.0554632 0.0554735 0.0554837 0.0571717 0.061272 0.0684368 0.0648818)
        y_location: MultiplierFunction: scale=0.9386739
          SimmSpline: x=(-2.0944 -1.99997 -1.5708 -1.45752 -1.39626 -1.0472 -0.698132 -0.526391 -0.349066 -0.174533 0 0.00017453 0.00034907 0.0279253 0.0872665 0.174533 2.0944)
              y=(0.025599 0.0259487 0.0273124 0.0274796 0.0275151 0.0271363 0.0265737 0.0263073 0.0261187 0.0260129 0.0252923 0.0252911 0.0252898 0.0250526 0.0242191 0.0218288 -0.0685706)
        z_location: MultiplierFunction: scale=0.9389181
          SimmSpline: x=(-2.0944 2.0944) y=(-0.0018 -0.0018)
    DeGrooteFregly2016Muscle vas_lat_l: max_isometric_force=1871 optimal_fiber_length=0.08448281
        tendon_slack_length=0.1579024 pennation_angle_at_optimal=0.08726646 fiber_damping=0
        passive_fiber_strain_at_one_norm_force=0.6 tendon_strain_at_one_norm_force=0.033
      PathPoint P1: femur_l (0.004813176 -0.1859089 -0.0349958)
      PathPoint P2: femur_l (0.02697384 -0.2598112 -0.04101227)
      ConditionalPathPoint P3: femur_l (0.0361991 -0.4041063 -0.02055627)
          socket_coordinate=/jointset/knee_l/knee_angle_l range=(-2.617994 -1.210037)
      ConditionalPathPoint P4: femur_l (0.02536945 -0.4254647 -0.01845051)
          socket_coordinate=/jointset/knee_l/knee_angle_l range=(-2.617994 -1.920037)
      MovingPathPoint P5: tibia_l socket_x_coordinate=/jointset/knee_l/knee_angle_l
          socket_y_coordinate=/jointset/knee_l/knee_angle_l socket_z_coordinate=/jointset/knee_l/knee_angle_l
        x_location: MultiplierFunction: scale=0.9389181
          SimmSpline: x=(-2.0944 -1.99997 -1.5708 -1.45752 -1.39626 -1.0472 -0.698132 -0.526391 -0.349066 -0.174533 0 0.00017453 0.00034907 0.0279253 0.0872665 0.174533 2.0944)
              y=(0.0142897 0.016703 0.0262145 0.0283623 0.0294674 0.0352709 0.0408785 0.0437291 0.0469704 0.0518742 0.0599557 0.0599647 0.0599738 0.0614577 0.0650351 0.0711867 0.0583766)
        y_location: MultiplierFunction: scale=0.9386739
          SimmSpline: x=(-2.0944 -1.99997 -1.5708 -1.45752 -1.39626 -1.0472 -0.698132 -0.526391 -0.349066 -0.174533 0 0.00017453 0.00034907 0.0279253 0.0872665 0.174533 2.0944)
              y=(0.0215318 0.0218815 0.0232362 0.0234019 0.0234371 0.0230439 0.0223842 0.0220151 0.0216359 0.0210971 0.0195864 0.0195842 0.019582 0.01919 0.018008 0.0151073 -0.0653421)
        z_location: MultiplierFunction: scale=0.9389181
          SimmSpline: x=(-2.0944 2.0944) y=(-0.0165 -0.0165)
    DeGrooteFregly2016Muscle med_gas_l: max_isometric_force=1870 optimal_fiber_length=0.05709447
        tendon_slack_length=0.3711141 pennation_angle_at_optimal=0.296706 fiber_damping=0
        passive_fiber_strain_at_one_norm_force=0.6 tendon_strain_at_one_norm_force=0.033
      PathPoint P1: femur_l (-0.01905216 -0.3939785 0.02356451)
      ConditionalPathPoint P2: femur_l (-0.03008235 -0.4033041 0.02587082)
          socket_coordinate=/jointset/knee_l/knee_angle_l range=(-0.7853982 0.1745329)
      PathPoint P3: calcn_l (0 0.04431122 0.005288817)
    DeGrooteFregly2016Muscle lat_gas_l: max_isometric_force=820 optimal_fiber_length=0.06087252
        tendon_slack_length=0.3614306 pennation_angle_at_optimal=0.1396263 fiber_damping=0
        passive_fiber_strain_at_one_norm_force=0.6 tendon_strain_at_one_norm_force=0.033
      PathPoint P1: femur_l (-0.02206039 -0.3956832 -0.02727467)
      ConditionalPathPoint P2: femur_l (-0.03008235 -0.402903 -0.02747521)
          socket_coordinate=/jointset/knee_l/knee_angle_l range=(-0.7853982 0.1745329)
      PathPoint P3: calcn_l (0 0.04431122 0.005288817)
    DeGrooteFregly2016Muscle soleus_l: max_isometric_force=4259 optimal_fiber_length=0.04779569
        tendon_slack_length=0.2389785 pennation_angle_at_optimal=0.4363323 fiber_damping=0
        passive_fiber_strain_at_one_norm_force=0.6 tendon_strain_at_one_norm_force=0.033
      PathPoint P1: tibia_l (-0.002253403 -0.1438987 -0.006666318)
      PathPoint P2: calcn_l (0 0.04431122 0.005288817)
    DeGrooteFregly2016Muscle tib_post_l: max_isometric_force=1588 optimal_fiber_length=0.03007615
        tendon_slack_length=0.3007615 pennation_angle_at_optimal=0.2094395 fiber_damping=0
        passive_fiber_strain_at_one_norm_force=0.6 tendon_strain_at_one_norm_force=0.033
      PathPoint P1: tibia_l (-0.00882583 -0.1265332 -0.001783944)
      PathPoint P2: tibia_l (-0.01352042 -0.3802568 0.02150122)
      PathPoint P3: calcn_l (0.03757927 0.04774177 0.02853965)
      PathPoint P4: midfoot_l (0.0005721473 0.001013649 0.0233426)
    DeGrooteFregly2016Muscle flex_dig_l: max_isometric_force=310 optimal_fiber_length=0.03252889
        tendon_slack_length=0.3826929 pennation_angle_at_optimal=0.1221731 fiber_damping=0
        passive_fiber_strain_at_one_norm_force=0.6 tendon_strain_at_one_norm_force=0.033
      PathPoint P1: tibia_l (-0.00779302 -0.1920527 0.001690053)
      PathPoint P2: tibia_l (-0.01445934 -0.3802568 0.01840279)
      PathPoint P3: calcn_l (0.03929151 0.04502592 0.02794092)
      PathPoint P4: midfoot_l (-0.01342709 -0.004032687 0.01880961)
      PathPoint P5: forefoot_l (0.04917931 -0.02518359 -0.01376607)
      PathPoint P6: toes_l (-0.001712245 -0.01114927 -0.01466898)
      PathPoint P7: toes_l (0.02568367 -0.0101487 -0.02145463)
      PathPoint P8: toes_l (0.0397421 -0.008576365 -0.02414894)
    DeGrooteFregly2016Muscle flex_hal_l: max_isometric_force=322 optimal_fiber_length=0.04093934
        tendon_slack_length=0.3617895 pennation_angle_at_optimal=0.1745329 fiber_damping=0
        passive_fiber_strain_at_one_norm_force=0.6 tendon_strain_at_one_norm_force=0.033
      PathPoint P1: tibia_l (-0.007417453 -0.2190865 -0.0229096)
      PathPoint P2: tibia_l (-0.01746388 -0.3828851 0.01633717)
      PathPoint P3: calcn_l (0.03370419 0.03945128 0.02404915)
      PathPoint P4: midfoot_l (0.0163119 -0.01947014 0.01811109)
      PathPoint P5: forefoot_l (0.05530735 -0.023 0.027)
      PathPoint P6: toes_l (0.01396831 -0.009148123 0.03044408)
      PathPoint P7: toes_l (0.0506464 -0.01457982 0.03006181)
      PathWrap: wrap_object=MetatarsalHead_l method=hybrid range=(5 6)
    DeGrooteFregly2016Muscle tib_ant_l: max_isometric_force=905 optimal_fiber_length=0.09434574
        tendon_slack_length=0.2146847 pennation_angle_at_optimal=0.08726646 fiber_damping=0
        passive_fiber_strain_at_one_norm_force=0.6 tendon_strain_at_one_norm_force=0.033
      PathPoint P1: tibia_l (0.01680663 -0.1524406 -0.01079756)
      PathPoint P2: tibia_l (0.0308904 -0.3708701 0.01661885)
      PathPoint P3: midfoot_l (0.04497376 0.009615513 0.02084099)
    DeGrooteFregly2016Muscle per_brev_l: max_isometric_force=435 optimal_fiber_length=0.05484301
        tendon_slack_length=0.1765945 pennation_angle_at_optimal=0.08726646 fiber_damping=0
        passive_fiber_strain_at_one_norm_force=0.6 tendon_strain_at_one_norm_force=0.033
      PathPoint P1: tibia_l (-0.006572426 -0.2483731 -0.03051484)
      PathPoint P2: tibia_l (-0.01859058 -0.3927412 -0.02657138)
      PathPoint P3: tibia_l (-0.01352042 -0.4031605 -0.02713473)
      PathPoint P4: calcn_l (0.04244565 0.03859364 -0.02325084)
      PathPoint P5: forefoot_l (-0.02268535 -0.009356485 -0.03123189)
    DeGrooteFregly2016Muscle per_long_l: max_isometric_force=943 optimal_fiber_length=0.04948137
        tendon_slack_length=0.3483892 pennation_angle_at_optimal=0.1745329 fiber_damping=0
        passive_fiber_strain_at_one_norm_force=0.6 tendon_strain_at_one_norm_force=0.033
      PathPoint P1: tibia_l (0.000469459 -0.1471841 -0.03398883)
      PathPoint P2: tibia_l (-0.0194356 -0.3947124 -0.02685306)
      PathPoint P3: tibia_l (-0.01521047 -0.4054133 -0.02713473)
      PathPoint P4: calcn_l (0.03947175 0.03287607 -0.02205337)
      PathPoint P5: midfoot_l (0.002770918 -0.03247213 -0.02700875)
      PathPoint P6: midfoot_l (0.01787321 -0.02342133 -0.0098603)
      PathPoint P7: forefoot_l (0.0169679 -0.005211676 0.02000093)
    DeGrooteFregly2016Muscle per_tert_l: max_isometric_force=180 optimal_fiber_length=0.08792177
        tendon_slack_length=0.1112934 pennation_angle_at_optimal=0.2268928 fiber_damping=0
        passive_fiber_strain_at_one_norm_force=0.6 tendon_strain_at_one_norm_force=0.033
      PathPoint P1: tibia_l (0.0009389181 -0.2632042 -0.02168901)
      PathPoint P2: tibia_l (0.02150122 -0.3819464 -0.0149288)
      PathPoint P3: forefoot_l (-0.002914804 0.0006694051 -0.03094893)
    DeGrooteFregly2016Muscle ext_dig_l: max_isometric_force=512 optimal_fiber_length=0.09708468
        tendon_slack_length=0.3283747 pennation_angle_at_optimal=0.1396263 fiber_damping=0
        passive_fiber_strain_at_one_norm_force=0.6 tendon_strain_at_one_norm_force=0.033
      PathPoint P1: tibia_l (0.003004538 -0.1296309 -0.02591414)
      PathPoint P2: tibia_l (0.02713473 -0.3761267 -0.00676021)
      PathPoint P3: midfoot_l (0.005858191 0.02627047 -0.007335104)
      PathPoint P4: forefoot_l (0.04539435 -0.005743826 -0.01516312)
      PathPoint P5: toes_l (0.0002703544 0.006718153 -0.01526772)
      PathPoint P6: toes_l (0.03992234 -0.0005717577 -0.02494725)
    DeGrooteFregly2016Muscle ext_hal_l: max_isometric_force=162 optimal_fiber_length=0.1050929
        tendon_slack_length=0.2887688 pennation_angle_at_optimal=0.1047198 fiber_damping=0
        passive_fiber_strain_at_one_norm_force=0.6 tendon_strain_at_one_norm_force=0.033
      PathPoint P1: tibia_l (0.001126702 -0.1658637 -0.02140733)
      PathPoint P2: tibia_l (0.03060873 -0.3740616 0.007980804)
      PathPoint P3: midfoot_l (0.01018386 0.02641341 0.01362059)
      PathPoint P4: forefoot_l (0.01628619 0.03056279 0.02345523)
      PathPoint P5: forefoot_l (0.05602829 0.006263085 0.02575037)
      PathPoint P6: toes_l (0.02685521 0.005860516 0.02844831)
      PathPoint P7: toes_l (0.05073651 0.00485994 0.02256075)
    DeGrooteFregly2016Muscle FDB_l: max_isometric_force=600 optimal_fiber_length=0.023 tendon_slack_length=0.123
        pennation_angle_at_optimal=0.3491 fiber_damping=0 passive_fiber_strain_at_one_norm_force=0.6
        tendon_strain_at_one_norm_force=0.033
      PathPoint FDB_l_P1: calcn_l (0.03236061 -0.016 0.0152083)
      PathPoint FDB_l_P3: toes_l (0.015 -0.002727308 0.01425658)
      PathWrap: wrap_object=MetatarsalHead_l method=hybrid range=(1 2)
    DeGrooteFregly2016Muscle ercspn_r: max_isometric_force=2500 optimal_fiber_length=0.1152032
        tendon_slack_length=0.02880079 pennation_angle_at_optimal=0 fiber_damping=0
        passive_fiber_strain_at_one_norm_force=0.6 tendon_strain_at_one_norm_force=0.033
      PathPoint P1: pelvis (-0.1352036 0.04239597 0.04298944)
      PathPoint P2: torso (-0.04906049 -0.2610949 0.02149741)
    DeGrooteFregly2016Muscle ercspn_l: max_isometric_force=2500 optimal_fiber_length=0.1152032
        tendon_slack_length=0.02880079 pennation_angle_at_optimal=0 fiber_damping=0
        passive_fiber_strain_at_one_norm_force=0.6 tendon_strain_at_one_norm_force=0.033
      PathPoint P1: pelvis (-0.1352036 0.04239597 -0.04298944)
      PathPoint P2: torso (-0.04906049 -0.2610949 -0.02149741)
    DeGrooteFregly2016Muscle intobl_r: max_isometric_force=900 optimal_fiber_length=0.09683367
        tendon_slack_length=0.09683367 pennation_angle_at_optimal=0 fiber_damping=0
        passive_fiber_strain_at_one_norm_force=0.6 tendon_strain_at_one_norm_force=0.033
      PathPoint P1: pelvis (-0.03862959 0.06760178 0.1140798)
      PathPoint P2: torso (0.06244062 -0.2132034 0.01338013)
    DeGrooteFregly2016Muscle intobl_l: max_isometric_force=900 optimal_fiber_length=0.09683367
        tendon_slack_length=0.09683367 pennation_angle_at_optimal=0 fiber_damping=0
        passive_fiber_strain_at_one_norm_force=0.6 tendon_strain_at_one_norm_force=0.033
      PathPoint P1: pelvis (-0.03862959 0.06760178 -0.1140798)
      PathPoint P2: torso (0.06244062 -0.2132034 -0.01338013)
    DeGrooteFregly2016Muscle extobl_r: max_isometric_force=900 optimal_fiber_length=0.1143157
        tendon_slack_length=0.1333683 pennation_angle_at_optimal=0 fiber_damping=0
        passive_fiber_strain_at_one_norm_force=0.6 tendon_strain_at_one_norm_force=0.033
      PathPoint P1: pelvis (-0.02897219 -0.06142105 0.009859963)
      PathPoint P2: torso (0.05798058 -0.2610949 0.09812098)
    DeGrooteFregly2016Muscle extobl_l: max_isometric_force=900 optimal_fiber_length=0.1143157
        tendon_slack_length=0.1333683 pennation_angle_at_optimal=0 fiber_damping=0
        passive_fiber_strain_at_one_norm_force=0.6 tendon_strain_at_one_norm_force=0.033
      PathPoint P1: pelvis (-0.02897219 -0.06142105 -0.009859963)
      PathPoint P2: torso (0.05798058 -0.2610949 -0.09812098)
    DeGrooteFregly2016Muscle BRA_r: max_isometric_force=1177.4 optimal_fiber_length=0.1086812
        tendon_slack_length=0.05434059 pennation_angle_at_optimal=0 fiber_damping=0.1
        passive_fiber_strain_at_one_norm_force=0.7 tendon_strain_at_one_norm_force=0.049
      PathPoint Millard2012EquilibriumMuscle-P1: humerus_r (0.0140508 -0.1739099 -0.003600206)
      PathPoint: ulna_r (0.01640641 -0.0413638 0.001261062)
      PathPoint Millard2012EquilibriumMuscle-P2: ulna_r (-0.003104152 -0.07052932 0.0008730444)
    DeGrooteFregly2016Muscle TrapeziusScapula_M_r: max_isometric_force=470.4 optimal_fiber_length=0.07785306
        tendon_slack_length=0.02994348 pennation_angle_at_optimal=0 ignore_tendon_compliance=true fiber_damping=0.1
        passive_fiber_strain_at_one_norm_force=0.7 tendon_strain_at_one_norm_force=0.049
      PathPoint TrapeziusScapula5-P1: torso (-0.08026271 -0.000352005 -0.001590032)
      PathPoint TrapeziusScapula5-P2: scapula_r (-0.05533259 -0.001858808 -0.03268956)
      PathWrap: wrap_object=Thorax_r method=hybrid
    DeGrooteFregly2016Muscle TrapeziusScapula_S_r: max_isometric_force=1043 optimal_fiber_length=0.1172949
        tendon_slack_length=0.02810082 pennation_angle_at_optimal=0 ignore_tendon_compliance=true fiber_damping=0.1
        passive_fiber_strain_at_one_norm_force=0.7 tendon_strain_at_one_norm_force=0.049
      PathPoint TrapeziusScapula2-P1: torso (-0.07110539 0.04279082 -0.003263882)
      PathPoint TrapeziusScapula2-P2: scapula_r (-0.04916086 0.006545584 -0.02199857)
      PathWrap: wrap_object=Thorax_r method=hybrid
    DeGrooteFregly2016Muscle TrapeziusScapula_I_r: max_isometric_force=414.4 optimal_fiber_length=0.1031832
        tendon_slack_length=0.02857131 pennation_angle_at_optimal=0 ignore_tendon_compliance=true fiber_damping=0.1
        passive_fiber_strain_at_one_norm_force=0.7 tendon_strain_at_one_norm_force=0.049
      PathPoint TrapeziusScapula10-P1: torso (-0.09653599 -0.1278391 0.001035037)
      PathPoint TrapeziusScapula10-P2: scapula_r (-0.07193152 -0.008977609 -0.06648146)
      PathWrap: wrap_object=Thorax_r method=hybrid
    DeGrooteFregly2016Muscle TrapeziusClavicle_S_r: max_isometric_force=201.6 optimal_fiber_length=0.1112512
        tendon_slack_length=0.0266529 pennation_angle_at_optimal=0 ignore_tendon_compliance=true fiber_damping=0.1
        passive_fiber_strain_at_one_norm_force=0.7 tendon_strain_at_one_norm_force=0.049
      PathPoint TrapeziusClavicle1-P1: torso (-0.05915032 0.1142908 0.002201314)
      PathPoint TrapeziusClavicle1-P2: clavicle_r (-0.02860033 0.0236545 0.08188068)
    DeGrooteFregly2016Muscle SerratusAnterior_I_r: max_isometric_force=430 optimal_fiber_length=0.1569491
        tendon_slack_length=0 pennation_angle_at_optimal=0 ignore_tendon_compliance=true fiber_damping=0.1
        passive_fiber_strain_at_one_norm_force=0.7 tendon_strain_at_one_norm_force=0.049
      PathPoint SerratusAnterior4-P1: scapula_r (-0.1078693 -0.1065941 -0.07697104)
      PathPoint SerratusAnterior4-P2: torso (-0.000509663 -0.161967 0.1334286)
      PathWrap: wrap_object=Thorax_r method=hybrid
    DeGrooteFregly2016Muscle SerratusAnterior_M_r: max_isometric_force=508 optimal_fiber_length=0.1438244
        tendon_slack_length=0.01122167 pennation_angle_at_optimal=0 ignore_tendon_compliance=true fiber_damping=0.1
        passive_fiber_strain_at_one_norm_force=0.7 tendon_strain_at_one_norm_force=0.049
      PathPoint SerratusAnterior7-P1: scapula_r (-0.09795976 -0.0789272 -0.08874231)
      PathPoint SerratusAnterior7-P2: torso (0.01585701 -0.0724607 0.1032657)
      PathWrap: wrap_object=Thorax_r method=hybrid
    DeGrooteFregly2016Muscle SerratusAnterior_S_r: max_isometric_force=387.8 optimal_fiber_length=0.07579814
        tendon_slack_length=0 pennation_angle_at_optimal=0 ignore_tendon_compliance=true fiber_damping=0.1
        passive_fiber_strain_at_one_norm_force=0.7 tendon_strain_at_one_norm_force=0.049
      PathPoint SerratusAnterior12-P1: scapula_r (-0.04608293 0.008550107 -0.07618059)
      PathPoint SerratusAnterior12-P2: torso (-0.02703745 -0.01380159 0.08941782)
      PathWrap: wrap_object=Thorax_r method=hybrid
    DeGrooteFregly2016Muscle Rhomboideus_S_r: max_isometric_force=200.2 optimal_fiber_length=0.07269847
        tendon_slack_length=0.0110596 pennation_angle_at_optimal=0 fiber_damping=0.1
        passive_fiber_strain_at_one_norm_force=0.7 tendon_strain_at_one_norm_force=0.049
      PathPoint Rhomboideus1-P1: torso (-0.06963279 0.03817018 -0.00183606)
      PathPoint Rhomboideus1-P2: scapula_r (-0.0785338 -0.02176475 -0.09156584)
      PathWrap: wrap_object=Thorax_r method=hybrid
    DeGrooteFregly2016Muscle Rhomboideus_I_r: max_isometric_force=407.4 optimal_fiber_length=0.08081453
        tendon_slack_length=0.01964242 pennation_angle_at_optimal=0 fiber_damping=0.1
        passive_fiber_strain_at_one_norm_force=0.7 tendon_strain_at_one_norm_force=0.049
      PathPoint Rhomboideus4-P1: torso (-0.08612429 -0.00880631 -0.0004590164)
      PathPoint Rhomboideus4-P2: scapula_r (-0.1009403 -0.1013742 -0.083457)
      PathWrap: wrap_object=Thorax_r method=hybrid
    DeGrooteFregly2016Muscle LevatorScapulae_r: max_isometric_force=280 optimal_fiber_length=0.1389532
        tendon_slack_length=0.01673075 pennation_angle_at_optimal=0 ignore_tendon_compliance=true fiber_damping=0.1
        passive_fiber_strain_at_one_norm_force=0.7 tendon_strain_at_one_norm_force=0.049
      PathPoint LevatorScapulae1-P1: torso (-0.0330684 0.1150043 0.02797304)
      PathPoint LevatorScapulae1-P2: scapula_r (-0.07410704 -0.007676095 -0.09260054)
      PathWrap: wrap_object=Thorax_r method=hybrid
    DeGrooteFregly2016Muscle Coracobrachialis_r: max_isometric_force=648.2 optimal_fiber_length=0.06742167
        tendon_slack_length=0.1026626 pennation_angle_at_optimal=0 ignore_tendon_compliance=true fiber_damping=0.1
        passive_fiber_strain_at_one_norm_force=0.7 tendon_strain_at_one_norm_force=0.049
      PathPoint Coracobrachialis2-P1: scapula_r (0.007854586 -0.04031189 -0.02528376)
      PathPoint Coracobrachialis2-P2: humerus_r (-0.002310139 -0.1450089 -0.009330482)
    DeGrooteFregly2016Muscle DeltoideusClavicle_A_r: max_isometric_force=707.7 optimal_fiber_length=0.1202009
        tendon_slack_length=0.1125285 pennation_angle_at_optimal=0.08726646 fiber_damping=0.1
        passive_fiber_strain_at_one_norm_force=0.7 tendon_strain_at_one_norm_force=0.049
      PathPoint DeltoideusClavicle2-P1: clavicle_r (-0.02162376 0.01851618 0.07568825)
      PathPoint DeltoideusClavicle2-P2: scapula_r (0.0185836 -0.006257556 0.009358485)
      PathPoint DeltoideusClavicle2-P3: humerus_r (0.006644041 -0.1098115 0.001147484)
      PathWrap: wrap_object=deltsca_r method=hybrid
    DeGrooteFregly2016Muscle DeltoideusScapula_P_r: max_isometric_force=1324.4 optimal_fiber_length=0.09203717
        tendon_slack_length=0.07370732 pennation_angle_at_optimal=0.08726646 fiber_damping=0.1
        passive_fiber_strain_at_one_norm_force=0.7 tendon_strain_at_one_norm_force=0.049
      PathPoint DeltoideusScapulaPost2-P1: scapula_r (-0.05484913 -0.006565828 -0.02450801)
      PathPoint DeltoideusScapulaPost2-P2: scapula_r (-0.05225114 -0.03074673 0.006617825)
      PathPoint DeltoideusScapulaPost2-P3: humerus_r (-0.004766185 -0.08616744 0.006239429)
      PathWrap: wrap_object=deltsca_r method=hybrid
    DeGrooteFregly2016Muscle DeltoideusScapula_M_r: max_isometric_force=2597.8 optimal_fiber_length=0.0731768
        tendon_slack_length=0.06261116 pennation_angle_at_optimal=0.08726646 fiber_damping=0.1
        passive_fiber_strain_at_one_norm_force=0.7 tendon_strain_at_one_norm_force=0.049
      PathPoint DeltoideusScapulaLat10-P1: scapula_r (-0.01521876 0.001932278 0.007018513)
      PathPoint DeltoideusScapulaLat10-P2: scapula_r (-0.004880803 -0.006403983 0.02792772)
      PathPoint DeltoideusScapulaLat10-P3: humerus_r (-0.004313012 -0.1004606 0.003845755)
      PathWrap: wrap_object=deltsca_r method=hybrid
    DeGrooteFregly2016Muscle LatissimusDorsi_S_r: max_isometric_force=201.6 optimal_fiber_length=0.1691209
        tendon_slack_length=0.06495399 pennation_angle_at_optimal=0 ignore_tendon_compliance=true fiber_damping=0.1
        passive_fiber_strain_at_one_norm_force=0.7 tendon_strain_at_one_norm_force=0.049
      PathPoint LatissimusDorsi1-P1: torso (-0.09583299 -0.1107966 0.001539055)
      PathPoint LatissimusDorsi1-P2: torso (-0.109722 -0.1105686 0.02592092)
      MovingPathPoint LatissimusDorsi1-P3: torso socket_x_coordinate=/jointset/glenohumeral_r/shoulder_elev_r
          socket_y_coordinate=/jointset/glenohumeral_r/shoulder_elev_r
          socket_z_coordinate=/jointset/glenohumeral_r/shoulder_elev_r
        x_location: MultiplierFunction: scale=0.94997
          SimmSpline: x=(0 3.14159) y=(-0.122564 -0.123775)
        y_location: MultiplierFunction: scale=0.9499798
          SimmSpline: x=(0 3.14159) y=(-0.098615 -0.106769)
        z_location: MultiplierFunction: scale=0.9000327
          SimmSpline: x=(0 3.14159) y=(0.101016 0.114972)
      MovingPathPoint LatissimusDorsi1-P4: torso socket_x_coordinate=/jointset/glenohumeral_r/shoulder_elev_r
          socket_y_coordinate=/jointset/glenohumeral_r/shoulder_elev_r
          socket_z_coordinate=/jointset/glenohumeral_r/shoulder_elev_r
        x_location: MultiplierFunction: scale=0.94997
          SimmSpline: x=(0 3.14159) y=(-0.09279 -0.094357)
        y_location: MultiplierFunction: scale=0.9499798
          SimmSpline: x=(0 3.14159) y=(-0.08329 -0.084707)
        z_location: MultiplierFunction: scale=0.9000327
          SimmSpline: x=(0 3.14159) y=(0.13581 0.144557)
      PathPoint LatissimusDorsi1-P5: humerus_r (0.005880332 -0.01904122 -0.003450183)
      PathWrap: wrap_object=Thorax_r method=hybrid
    DeGrooteFregly2016Muscle LatissimusDorsi_M_r: max_isometric_force=315 optimal_fiber_length=0.2174209
        tendon_slack_length=0.07735796 pennation_angle_at_optimal=0 ignore_tendon_compliance=true fiber_damping=0.1
        passive_fiber_strain_at_one_norm_force=0.7 tendon_strain_at_one_norm_force=0.049
      PathPoint LatissimusDorsi3-P1: torso (-0.08627629 -0.2065733 -0.001404052)
      PathPoint LatissimusDorsi3-P2: torso (-0.102293 -0.1951645 0.02360788)
      MovingPathPoint LatissimusDorsi3-P3: torso socket_x_coordinate=/jointset/glenohumeral_r/shoulder_elev_r
          socket_y_coordinate=/jointset/glenohumeral_r/shoulder_elev_r
          socket_z_coordinate=/jointset/glenohumeral_r/shoulder_elev_r
        x_location: MultiplierFunction: scale=0.94997
          SimmSpline: x=(0 3.14159) y=(-0.103889 -0.101761)
        y_location: MultiplierFunction: scale=0.9499798
          SimmSpline: x=(0 3.14159) y=(-0.147585 -0.149604)
        z_location: MultiplierFunction: scale=0.9000327
          SimmSpline: x=(0 3.14159) y=(0.113647 0.122566)
      MovingPathPoint LatissimusDorsi3-P4: torso socket_x_coordinate=/jointset/glenohumeral_r/shoulder_elev_r
          socket_y_coordinate=/jointset/glenohumeral_r/shoulder_elev_r
          socket_z_coordinate=/jointset/glenohumeral_r/shoulder_elev_r
        x_location: MultiplierFunction: scale=0.94997
          SimmSpline: x=(0 3.14159) y=(-0.076222 -0.077789)
        y_location: MultiplierFunction: scale=0.9499798
          SimmSpline: x=(0 3.14159) y=(-0.110351 -0.111768)
        z_location: MultiplierFunction: scale=0.9000327
          SimmSpline: x=(0 3.14159) y=(0.140024 0.148771)
      PathPoint LatissimusDorsi3-P5: humerus_r (0.005780327 -0.04100262 -0.001000055)
      PathWrap: wrap_object=Thorax_r method=hybrid
    DeGrooteFregly2016Muscle LatissimusDorsi_I_r: max_isometric_force=270.2 optimal_fiber_length=0.2636614
        tendon_slack_length=0.05347281 pennation_angle_at_optimal=0 ignore_tendon_compliance=true fiber_damping=0.1
        passive_fiber_strain_at_one_norm_force=0.7 tendon_strain_at_one_norm_force=0.049
      PathPoint LatissimusDorsi6-P1: torso (-0.05959953 -0.2420608 0.08155542)
      PathPoint LatissimusDorsi6-P2: torso (-0.06382896 -0.1768511 0.1310363)
      MovingPathPoint LatissimusDorsi6-P3: torso socket_x_coordinate=/jointset/glenohumeral_r/shoulder_elev_r
          socket_y_coordinate=/jointset/glenohumeral_r/shoulder_elev_r
          socket_z_coordinate=/jointset/glenohumeral_r/shoulder_elev_r
        x_location: MultiplierFunction: scale=0.949945
          SimmSpline: x=(0 3.14159) y=(-0.040258 -0.031577)
        y_location: MultiplierFunction: scale=0.9499286
          SimmSpline: x=(0 3.14159) y=(-0.116638 -0.109479)
        z_location: MultiplierFunction: scale=0.9000705
          SimmSpline: x=(0 3.14159) y=(0.146215 0.149666)
      PathPoint LatissimusDorsi6-P4: humerus_r (0.004220271 -0.05000126 -0.0001800093)
      PathWrap: wrap_object=Thorax_r method=hybrid
    DeGrooteFregly2016Muscle PectoralisMajorClavicle_S_r: max_isometric_force=408.8 optimal_fiber_length=0.1623533
        tendon_slack_length=0.0208336 pennation_angle_at_optimal=0 ignore_tendon_compliance=true fiber_damping=0.1
        passive_fiber_strain_at_one_norm_force=0.7 tendon_strain_at_one_norm_force=0.049
      PathPoint PectoralisMajorClavicle1-P1: clavicle_r (0.00436908 0.006477485 0.04265278)
      PathPoint PectoralisMajorClavicle1-P2: humerus_r (0.01007572 -0.04214733 -0.002600886)
      PathWrap: wrap_object=Thorax_r method=hybrid
    DeGrooteFregly2016Muscle PectoralisMajorThorax_I_r: max_isometric_force=571.2 optimal_fiber_length=0.2134256
        tendon_slack_length=0.05014919 pennation_angle_at_optimal=0 ignore_tendon_compliance=true fiber_damping=0.1
        passive_fiber_strain_at_one_norm_force=0.7 tendon_strain_at_one_norm_force=0.049
      PathPoint PectoralisMajorThorax2-P1: torso (0.0505479 -0.1098751 0.02226685)
      PathPoint PectoralisMajorThorax2-P2: humerus_r (0.01000051 -0.03000187 0)
      PathWrap: wrap_object=Thorax_r method=hybrid
    DeGrooteFregly2016Muscle PectoralisMajorThorax_M_r: max_isometric_force=683.2 optimal_fiber_length=0.1972232
        tendon_slack_length=0.03418536 pennation_angle_at_optimal=0 ignore_tendon_compliance=true fiber_damping=0.1
        passive_fiber_strain_at_one_norm_force=0.7 tendon_strain_at_one_norm_force=0.049
      PathPoint PectoralisMajorThorax5-P1: torso (0.0185624 -0.03610093 0.01170021)
      PathPoint PectoralisMajorThorax5-P2: humerus_r (0.01018582 -0.02620551 -0.003150866)
      PathWrap: wrap_object=Thorax_r method=hybrid
    DeGrooteFregly2016Muscle TeresMajor_r: max_isometric_force=851.2 optimal_fiber_length=0.1381666
        tendon_slack_length=0.005879431 pennation_angle_at_optimal=0 ignore_tendon_compliance=true fiber_damping=0.1
        passive_fiber_strain_at_one_norm_force=0.7 tendon_strain_at_one_norm_force=0.049
      PathPoint TeresMajor1-P1: scapula_r (-0.09918566 -0.1115416 -0.06488894)
      PathPoint TeresMajor1-P2: humerus_r (0.004320252 -0.03900243 -0.001700095)
      PathWrap: wrap_object=Thorax_r method=hybrid
      PathWrap pathwrap_0: wrap_object=Tmajscapula_r method=hybrid
    DeGrooteFregly2016Muscle Infraspinatus_I_r: max_isometric_force=1037.4 optimal_fiber_length=0.0621364
        tendon_slack_length=0.07709687 pennation_angle_at_optimal=0 fiber_damping=0.1
        passive_fiber_strain_at_one_norm_force=0.7 tendon_strain_at_one_norm_force=0.049
      PathPoint Infraspinatus3-P1: scapula_r (-0.09411337 -0.07680845 -0.07313949)
      PathPoint Infraspinatus3-P2: humerus_r (-0.01716301 -0.005730323 0.02480856)
      PathWrap: wrap_object=Infra_r method=hybrid
      PathWrap pathwrap_0: wrap_object=hheadInfra_r method=hybrid
    DeGrooteFregly2016Muscle Infraspinatus_S_r: max_isometric_force=967.4 optimal_fiber_length=0.06345328
        tendon_slack_length=0.04545364 pennation_angle_at_optimal=0 fiber_damping=0.1
        passive_fiber_strain_at_one_norm_force=0.7 tendon_strain_at_one_norm_force=0.049
      PathPoint Infraspinatus5-P1: scapula_r (-0.07925581 -0.03065686 -0.07819608)
      PathPoint Infraspinatus5-P2: humerus_r (-0.01433444 0.00271924 0.02220524)
      PathWrap: wrap_object=Infra_r method=hybrid
      PathWrap pathwrap_0: wrap_object=hheadInfra_r method=hybrid
    DeGrooteFregly2016Muscle PectoralisMinor_r: max_isometric_force=429.8 optimal_fiber_length=0.1212937
        tendon_slack_length=0.03280979 pennation_angle_at_optimal=0 ignore_tendon_compliance=true fiber_damping=0.1
        passive_fiber_strain_at_one_norm_force=0.7 tendon_strain_at_one_norm_force=0.049
      PathPoint PectoralisMinor3-P1: torso (0.04534171 -0.09880636 0.08206519)
      PathPoint PectoralisMinor3-P2: scapula_r (0.01033058 -0.03328835 -0.02064798)
      PathWrap: wrap_object=Thorax_r method=hybrid
    DeGrooteFregly2016Muscle TeresMinor_r: max_isometric_force=695.8 optimal_fiber_length=0.05065339
        tendon_slack_length=0.04696951 pennation_angle_at_optimal=0 fiber_damping=0.1
        passive_fiber_strain_at_one_norm_force=0.7 tendon_strain_at_one_norm_force=0.049
      PathPoint TeresMinor2-P1: scapula_r (-0.08014872 -0.06274826 -0.0380588)
      PathPoint TeresMinor2-P2: humerus_r (-0.01587092 -0.009360585 0.01085051)
      PathWrap: wrap_object=hheadsupraTminor_r method=hybrid
    DeGrooteFregly2016Muscle Subscapularis_S_r: max_isometric_force=540.4 optimal_fiber_length=0.06279346
        tendon_slack_length=0.05480494 pennation_angle_at_optimal=0.08726646 fiber_damping=0.1
        passive_fiber_strain_at_one_norm_force=0.7 tendon_strain_at_one_norm_force=0.049
      PathPoint Subscapularis3-P1: scapula_r (-0.07484795 -0.02970681 -0.08124617)
      PathPoint Subscapularis3-P2: humerus_r (0.01800112 -0.000230015 -0.01200057)
      PathWrap: wrap_object=Subscapuralis_r method=hybrid
      PathWrap pathwrap_0: wrap_object=hhead_r method=hybrid
    DeGrooteFregly2016Muscle Subscapularis_M_r: max_isometric_force=609 optimal_fiber_length=0.06905171
        tendon_slack_length=0.05104629 pennation_angle_at_optimal=0.08726646 fiber_damping=0.1
        passive_fiber_strain_at_one_norm_force=0.7 tendon_strain_at_one_norm_force=0.049
      PathPoint Subscapularis4-P1: scapula_r (-0.07938881 -0.05216513 -0.06727323)
      PathPoint Subscapularis4-P2: humerus_r (0.01639204 0.0009578606 -0.01943619)
      PathWrap: wrap_object=Subscapuralis_r method=hybrid
      PathWrap pathwrap_0: wrap_object=hhead_r method=hybrid
    DeGrooteFregly2016Muscle Subscapularis_I_r: max_isometric_force=854 optimal_fiber_length=0.06733683
        tendon_slack_length=0.05510226 pennation_angle_at_optimal=0 fiber_damping=0.1
        passive_fiber_strain_at_one_norm_force=0.7 tendon_strain_at_one_norm_force=0.049
      PathPoint Subscapularis9-P1: scapula_r (-0.09031343 -0.09276865 -0.07683739)
      PathPoint Subscapularis9-P2: humerus_r (0.01098446 -0.003407536 -0.01952689)
      PathWrap: wrap_object=Subscapuralis_r method=hybrid
      PathWrap pathwrap_0: wrap_object=hhead_r method=hybrid
    DeGrooteFregly2016Muscle Supraspinatus_P_r: max_isometric_force=326.2 optimal_fiber_length=0.05473493
        tendon_slack_length=0.02315353 pennation_angle_at_optimal=0 fiber_damping=0.1
        passive_fiber_strain_at_one_norm_force=0.7 tendon_strain_at_one_norm_force=0.049
      PathPoint Supraspinatus2-P1: scapula_r (-0.05750156 -0.001311013 -0.04450998)
      PathPoint Supraspinatus2-P2: humerus_r (0.01017032 0.009568305 0.02005152)
      PathWrap: wrap_object=hheadsupraTminor_r method=hybrid
    DeGrooteFregly2016Muscle Supraspinatus_A_r: max_isometric_force=543.2 optimal_fiber_length=0.05978057
        tendon_slack_length=0.02851073 pennation_angle_at_optimal=0 fiber_damping=0.1
        passive_fiber_strain_at_one_norm_force=0.7 tendon_strain_at_one_norm_force=0.049
      PathPoint Supraspinatus4-P1: scapula_r (-0.04654216 0.001287881 -0.06232632)
      PathPoint Supraspinatus4-P2: humerus_r (0.01778101 0.01764109 0.0096505)
      PathWrap: wrap_object=Thorax_r method=hybrid
      PathWrap pathwrap_0: wrap_object=hheadsupraTminor_r method=hybrid
    DeGrooteFregly2016Muscle TRI_long_r: max_isometric_force=1129 optimal_fiber_length=0.1076582
        tendon_slack_length=0.2156921 pennation_angle_at_optimal=0.174533 fiber_damping=0.1
        passive_fiber_strain_at_one_norm_force=0.7 tendon_strain_at_one_norm_force=0.049
      PathPoint TRI_long2-P1: ulna_r (-0.0184309 0.01459533 0.002153506)
      PathPoint TRI_long2-P2: scapula_r (-0.03999388 -0.04930802 -0.0116296)
      PathWrap: wrap_object=TRI_r method=hybrid
    DeGrooteFregly2016Muscle TRI_med_r: max_isometric_force=1077 optimal_fiber_length=0.1002282
        tendon_slack_length=0.06506814 pennation_angle_at_optimal=0.145444 fiber_damping=0.1
        passive_fiber_strain_at_one_norm_force=0.7 tendon_strain_at_one_norm_force=0.049
      PathPoint TRI_med-P1: ulna_r (-0.0184309 0.01459533 0.002153506)
      PathPoint TRI_med-P2: humerus_r (-0.008380479 -0.1369578 -0.009060518)
      PathWrap: wrap_object=TRI_r method=hybrid
    DeGrooteFregly2016Muscle TRI_lat_r: max_isometric_force=1144 optimal_fiber_length=0.1102308
        tendon_slack_length=0.07014689 pennation_angle_at_optimal=0.1832595 fiber_damping=0.1
        passive_fiber_strain_at_one_norm_force=0.7 tendon_strain_at_one_norm_force=0.049
      PathPoint TRI_lat-P1: ulna_r (-0.0184309 0.01459533 0.002153506)
      PathPoint TRI_lat-P2: humerus_r (-0.005990343 -0.1264672 0.004280245)
      PathWrap: wrap_object=TRI_r method=hybrid
    DeGrooteFregly2016Muscle BIC_long_r: max_isometric_force=347 optimal_fiber_length=0.1280487
        tendon_slack_length=0.2314193 pennation_angle_at_optimal=0 fiber_damping=0.1
        passive_fiber_strain_at_one_norm_force=0.7 tendon_strain_at_one_norm_force=0.049
      PathPoint BIC_long-P1: scapula_r (-0.02145728 -0.01551258 -0.01632323)
      PathPoint BIC_long-P2: humerus_r (0.01183131 0.02814349 0.02003952)
      MovingPathPoint BIC_long-P3: radius_r socket_x_coordinate=/jointset/radioulnar_r/pro_sup_r
          socket_y_coordinate=/jointset/radioulnar_r/pro_sup_r socket_z_coordinate=/jointset/radioulnar_r/pro_sup_r
        x_location: MultiplierFunction: scale=0.9700475
          SimmSpline: x=(-1.57561 1.57823) y=(-0.0115 0.01096)
        y_location: MultiplierFunction: scale=0.9700475
          PiecewiseLinearFunction: x=(-1.57561 0 1.57561) y=(-0.0282 -0.03655 -0.0392)
        z_location: MultiplierFunction: scale=0.9700475
          SimmSpline: x=(-1.57561 0.0866167 1.57561) y=(-0.01 -0.01358 -0.01083)
      PathPoint BIC_long-P4: radius_r (-0.001940095 -0.03637678 -0.001940095)
      PathWrap: wrap_object=hhead_r method=hybrid
      PathWrap pathwrap_0: wrap_object=BIC_r method=hybrid
    DeGrooteFregly2016Muscle BIC_brevis_r: max_isometric_force=495 optimal_fiber_length=0.1148211
        tendon_slack_length=0.1901306 pennation_angle_at_optimal=0 fiber_damping=0.1
        passive_fiber_strain_at_one_norm_force=0.7 tendon_strain_at_one_norm_force=0.049
      PathPoint BIC_brevis2-P1: scapula_r (0.00906979 -0.03631141 -0.02181619)
      MovingPathPoint BIC_brevis-P2: radius_r socket_x_coordinate=/jointset/radioulnar_r/pro_sup_r
          socket_y_coordinate=/jointset/radioulnar_r/pro_sup_r socket_z_coordinate=/jointset/radioulnar_r/pro_sup_r
        x_location: MultiplierFunction: scale=0.9700475
          SimmSpline: x=(-1.57561 1.57823) y=(-0.0115 0.01096)
        y_location: MultiplierFunction: scale=0.9700475
          PiecewiseLinearFunction: x=(-1.57561 0 1.57561) y=(-0.0282 -0.03655 -0.0392)
        z_location: MultiplierFunction: scale=0.9700475
          SimmSpline: x=(-1.57561 0.0866167 1.57561) y=(-0.01 -0.01358 -0.01083)
      PathPoint BIC_brevis-P3: radius_r (-0.001940095 -0.03637678 -0.001940095)
      PathWrap: wrap_object=BIC_r method=hybrid
    DeGrooteFregly2016Muscle BRA_l: max_isometric_force=1177.4 optimal_fiber_length=0.1086812
        tendon_slack_length=0.05434059 pennation_angle_at_optimal=0 fiber_damping=0.1
        passive_fiber_strain_at_one_norm_force=0.7 tendon_strain_at_one_norm_force=0.049
      PathPoint Millard2012EquilibriumMuscle-P1_0: humerus_l (0.01405086 -0.1739098 0.003600403)
      PathPoint pathpoint_0: ulna_l (0.01640633 -0.04136389 -0.001260781)
      PathPoint Millard2012EquilibriumMuscle-P2_0: ulna_l (-0.00310426 -0.07052939 -0.0008727985)
    DeGrooteFregly2016Muscle TrapeziusScapula_M_l: max_isometric_force=470.4 optimal_fiber_length=0.07788769
        tendon_slack_length=0.0299568 pennation_angle_at_optimal=0 ignore_tendon_compliance=true fiber_damping=0.1
        passive_fiber_strain_at_one_norm_force=0.7 tendon_strain_at_one_norm_force=0.049
      PathPoint TrapeziusScapula5-P1_0: torso (-0.08026272 -0.0003520047 0.001590032)
      PathPoint TrapeziusScapula5-P2_0: scapula_l (-0.05533253 -0.001858815 0.03268952)
      PathWrap pathwrap_0: wrap_object=Thorax_l method=hybrid
    DeGrooteFregly2016Muscle TrapeziusScapula_S_l: max_isometric_force=1043 optimal_fiber_length=0.1173662
        tendon_slack_length=0.0281179 pennation_angle_at_optimal=0 ignore_tendon_compliance=true fiber_damping=0.1
        passive_fiber_strain_at_one_norm_force=0.7 tendon_strain_at_one_norm_force=0.049
      PathPoint TrapeziusScapula2-P1_0: torso (-0.07110542 0.04279085 0.003263879)
      PathPoint TrapeziusScapula2-P2_0: scapula_l (-0.04916074 0.006545565 0.02199856)
      PathWrap pathwrap_0: wrap_object=Thorax_l method=hybrid
    DeGrooteFregly2016Muscle TrapeziusScapula_I_l: max_isometric_force=414.4 optimal_fiber_length=0.1029668
        tendon_slack_length=0.02851136 pennation_angle_at_optimal=0 ignore_tendon_compliance=true fiber_damping=0.1
        passive_fiber_strain_at_one_norm_force=0.7 tendon_strain_at_one_norm_force=0.049
      PathPoint TrapeziusScapula10-P1_0: torso (-0.09653577 -0.1278392 -0.001035033)
      PathPoint TrapeziusScapula10-P2_0: scapula_l (-0.07193158 -0.008977584 0.06648143)
      PathWrap pathwrap_0: wrap_object=Thorax_l method=hybrid
    DeGrooteFregly2016Muscle TrapeziusClavicle_S_l: max_isometric_force=201.6 optimal_fiber_length=0.1112335
        tendon_slack_length=0.02664867 pennation_angle_at_optimal=0 ignore_tendon_compliance=true fiber_damping=0.1
        passive_fiber_strain_at_one_norm_force=0.7 tendon_strain_at_one_norm_force=0.049
      PathPoint TrapeziusClavicle1-P1_0: torso (-0.05915032 0.1142908 -0.002201314)
      PathPoint TrapeziusClavicle1-P2_0: clavicle_l (-0.02860033 0.0236545 -0.08188068)
    DeGrooteFregly2016Muscle SerratusAnterior_I_l: max_isometric_force=430 optimal_fiber_length=0.1567639
        tendon_slack_length=0 pennation_angle_at_optimal=0 ignore_tendon_compliance=true fiber_damping=0.1
        passive_fiber_strain_at_one_norm_force=0.7 tendon_strain_at_one_norm_force=0.049
      PathPoint SerratusAnterior4-P1_0: scapula_l (-0.1078696 -0.106594 0.07697122)
      PathPoint SerratusAnterior4-P2_0: torso (-0.0005096634 -0.1619669 -0.1334287)
      PathWrap pathwrap_0: wrap_object=Thorax_l method=hybrid
    DeGrooteFregly2016Muscle SerratusAnterior_M_l: max_isometric_force=508 optimal_fiber_length=0.1438093
        tendon_slack_length=0.01122049 pennation_angle_at_optimal=0 ignore_tendon_compliance=true fiber_damping=0.1
        passive_fiber_strain_at_one_norm_force=0.7 tendon_strain_at_one_norm_force=0.049
      PathPoint SerratusAnterior7-P1_0: scapula_l (-0.09796 -0.07892718 0.08874235)
      PathPoint SerratusAnterior7-P2_0: torso (0.01585699 -0.07246072 -0.103266)
      PathWrap pathwrap_0: wrap_object=Thorax_l method=hybrid
    DeGrooteFregly2016Muscle SerratusAnterior_S_l: max_isometric_force=387.8 optimal_fiber_length=0.07588062
        tendon_slack_length=0 pennation_angle_at_optimal=0 ignore_tendon_compliance=true fiber_damping=0.1
        passive_fiber_strain_at_one_norm_force=0.7 tendon_strain_at_one_norm_force=0.049
      PathPoint SerratusAnterior12-P1_0: scapula_l (-0.04608299 0.008550106 0.07618087)
      PathPoint SerratusAnterior12-P2_0: torso (-0.02703747 -0.01380162 -0.08941746)
      PathWrap pathwrap_0: wrap_object=Thorax_l method=hybrid
    DeGrooteFregly2016Muscle Rhomboideus_S_l: max_isometric_force=200.2 optimal_fiber_length=0.07294982
        tendon_slack_length=0.01109784 pennation_angle_at_optimal=0 fiber_damping=0.1
        passive_fiber_strain_at_one_norm_force=0.7 tendon_strain_at_one_norm_force=0.049
      PathPoint Rhomboideus1-P1_0: torso (-0.06963279 0.0381702 0.001836059)
      PathPoint Rhomboideus1-P2_0: scapula_l (-0.07853389 -0.02176474 0.09156593)
      PathWrap pathwrap_0: wrap_object=Thorax_l method=hybrid
    DeGrooteFregly2016Muscle Rhomboideus_I_l: max_isometric_force=407.4 optimal_fiber_length=0.08111567
        tendon_slack_length=0.01971561 pennation_angle_at_optimal=0 fiber_damping=0.1
        passive_fiber_strain_at_one_norm_force=0.7 tendon_strain_at_one_norm_force=0.049
      PathPoint Rhomboideus4-P1_0: torso (-0.08612432 -0.008806341 0.0004590167)
      PathPoint Rhomboideus4-P2_0: scapula_l (-0.1009401 -0.1013744 0.0834567)
      PathWrap pathwrap_0: wrap_object=Thorax_l method=hybrid
    DeGrooteFregly2016Muscle LevatorScapulae_l: max_isometric_force=280 optimal_fiber_length=0.1393097
        tendon_slack_length=0.01677366 pennation_angle_at_optimal=0 ignore_tendon_compliance=true fiber_damping=0.1
        passive_fiber_strain_at_one_norm_force=0.7 tendon_strain_at_one_norm_force=0.049
      PathPoint LevatorScapulae1-P1_0: torso (-0.0330684 0.115004 -0.02797303)
      PathPoint LevatorScapulae1-P2_0: scapula_l (-0.07410718 -0.007676066 0.09260027)
      PathWrap pathwrap_0: wrap_object=Thorax_l method=hybrid
    DeGrooteFregly2016Muscle Coracobrachialis_l: max_isometric_force=648.2 optimal_fiber_length=0.06742167
        tendon_slack_length=0.1026626 pennation_angle_at_optimal=0 ignore_tendon_compliance=true fiber_damping=0.1
        passive_fiber_strain_at_one_norm_force=0.7 tendon_strain_at_one_norm_force=0.049
      PathPoint Coracobrachialis2-P1_0: scapula_l (0.007854658 -0.04031191 0.02528389)
      PathPoint Coracobrachialis2-P2_0: humerus_l (-0.002310098 -0.1450093 0.009330657)
    DeGrooteFregly2016Muscle DeltoideusClavicle_A_l: max_isometric_force=707.7 optimal_fiber_length=0.1201724
        tendon_slack_length=0.1125018 pennation_angle_at_optimal=0.08726646 fiber_damping=0.1
        passive_fiber_strain_at_one_norm_force=0.7 tendon_strain_at_one_norm_force=0.049
      PathPoint DeltoideusClavicle2-P1_0: clavicle_l (-0.02162377 0.01851621 -0.07568801)
      PathPoint DeltoideusClavicle2-P2_0: scapula_l (0.0185838 -0.006257627 -0.009358306)
      PathPoint DeltoideusClavicle2-P3_0: humerus_l (0.006644136 -0.1098116 -0.001147328)
      PathWrap pathwrap_0: wrap_object=deltsca_l method=hybrid
    DeGrooteFregly2016Muscle DeltoideusScapula_P_l: max_isometric_force=1324.4 optimal_fiber_length=0.09203717
        tendon_slack_length=0.07370732 pennation_angle_at_optimal=0.08726646 fiber_damping=0.1
        passive_fiber_strain_at_one_norm_force=0.7 tendon_strain_at_one_norm_force=0.049
      PathPoint DeltoideusScapulaPost2-P1_0: scapula_l (-0.05484899 -0.00656584 0.02450803)
      PathPoint DeltoideusScapulaPost2-P2_0: scapula_l (-0.052251 -0.03074679 -0.00661782)
      PathPoint DeltoideusScapulaPost2-P3_0: humerus_l (-0.00476606 -0.08616729 -0.006239308)
      PathWrap pathwrap_0: wrap_object=deltsca_l method=hybrid
    DeGrooteFregly2016Muscle DeltoideusScapula_M_l: max_isometric_force=2597.8 optimal_fiber_length=0.0731768
        tendon_slack_length=0.06261117 pennation_angle_at_optimal=0.08726646 fiber_damping=0.1
        passive_fiber_strain_at_one_norm_force=0.7 tendon_strain_at_one_norm_force=0.049
      PathPoint DeltoideusScapulaLat10-P1_0: scapula_l (-0.01521855 0.001932232 -0.007018435)
      PathPoint DeltoideusScapulaLat10-P2_0: scapula_l (-0.004880542 -0.006404046 -0.02792763)
      PathPoint DeltoideusScapulaLat10-P3_0: humerus_l (-0.004312901 -0.1004604 -0.003845631)
      PathWrap pathwrap_0: wrap_object=deltsca_l method=hybrid
    DeGrooteFregly2016Muscle LatissimusDorsi_S_l: max_isometric_force=201.6 optimal_fiber_length=0.1692324
        tendon_slack_length=0.06499678 pennation_angle_at_optimal=0 ignore_tendon_compliance=true fiber_damping=0.1
        passive_fiber_strain_at_one_norm_force=0.7 tendon_strain_at_one_norm_force=0.049
      PathPoint LatissimusDorsi1-P1_0: torso (-0.09583296 -0.1107968 -0.001539056)
      PathPoint LatissimusDorsi1-P2_0: torso (-0.1097219 -0.110569 -0.0259209)
      MovingPathPoint LatissimusDorsi1-P3_0: torso socket_x_coordinate=/jointset/glenohumeral_l/shoulder_elev_l
          socket_y_coordinate=/jointset/glenohumeral_l/shoulder_elev_l
          socket_z_coordinate=/jointset/glenohumeral_l/shoulder_elev_l
        x_location: MultiplierFunction: scale=0.94997
          SimmSpline: x=(0 3.14159) y=(-0.122564 -0.123775)
        y_location: MultiplierFunction: scale=0.9499798
          SimmSpline: x=(0 3.14159) y=(-0.098615 -0.106769)
        z_location: MultiplierFunction: scale=0.9000327
          SimmSpline: x=(0 3.14159) y=(-0.101016 -0.114972)
      MovingPathPoint LatissimusDorsi1-P4_0: torso socket_x_coordinate=/jointset/glenohumeral_l/shoulder_elev_l
          socket_y_coordinate=/jointset/glenohumeral_l/shoulder_elev_l
          socket_z_coordinate=/jointset/glenohumeral_l/shoulder_elev_l
        x_location: MultiplierFunction: scale=0.94997
          SimmSpline: x=(0 3.14159) y=(-0.09279 -0.094357)
        y_location: MultiplierFunction: scale=0.9499798
          SimmSpline: x=(0 3.14159) y=(-0.08329 -0.084707)
        z_location: MultiplierFunction: scale=0.9000327
          SimmSpline: x=(0 3.14159) y=(-0.13581 -0.144557)
      PathPoint LatissimusDorsi1-P5_0: humerus_l (0.005880473 -0.01904128 0.00345031)
      PathWrap pathwrap_0: wrap_object=Thorax_l method=hybrid
    DeGrooteFregly2016Muscle LatissimusDorsi_M_l: max_isometric_force=315 optimal_fiber_length=0.2175495
        tendon_slack_length=0.07740373 pennation_angle_at_optimal=0 ignore_tendon_compliance=true fiber_damping=0.1
        passive_fiber_strain_at_one_norm_force=0.7 tendon_strain_at_one_norm_force=0.049
      PathPoint LatissimusDorsi3-P1_0: torso (-0.08627632 -0.2065735 0.001404055)
      PathPoint LatissimusDorsi3-P2_0: torso (-0.1022928 -0.1951641 -0.02360791)
      MovingPathPoint LatissimusDorsi3-P3_0: torso socket_x_coordinate=/jointset/glenohumeral_l/shoulder_elev_l
          socket_y_coordinate=/jointset/glenohumeral_l/shoulder_elev_l
          socket_z_coordinate=/jointset/glenohumeral_l/shoulder_elev_l
        x_location: MultiplierFunction: scale=0.94997
          SimmSpline: x=(0 3.14159) y=(-0.103889 -0.101761)
        y_location: MultiplierFunction: scale=0.9499798
          SimmSpline: x=(0 3.14159) y=(-0.147585 -0.149604)
        z_location: MultiplierFunction: scale=0.9000327
          SimmSpline: x=(0 3.14159) y=(-0.113647 -0.122566)
      MovingPathPoint LatissimusDorsi3-P4_0: torso socket_x_coordinate=/jointset/glenohumeral_l/shoulder_elev_l
          socket_y_coordinate=/jointset/glenohumeral_l/shoulder_elev_l
          socket_z_coordinate=/jointset/glenohumeral_l/shoulder_elev_l
        x_location: MultiplierFunction: scale=0.94997
          SimmSpline: x=(0 3.14159) y=(-0.076222 -0.077789)
        y_location: MultiplierFunction: scale=0.9499798
          SimmSpline: x=(0 3.14159) y=(-0.110351 -0.111768)
        z_location: MultiplierFunction: scale=0.9000327
          SimmSpline: x=(0 3.14159) y=(-0.140024 -0.148771)
      PathPoint LatissimusDorsi3-P5_0: humerus_l (0.005780462 -0.04100264 0.001000188)
      PathWrap pathwrap_0: wrap_object=Thorax_l method=hybrid
    DeGrooteFregly2016Muscle LatissimusDorsi_I_l: max_isometric_force=270.2 optimal_fiber_length=0.2636656
        tendon_slack_length=0.05347365 pennation_angle_at_optimal=0 ignore_tendon_compliance=true fiber_damping=0.1
        passive_fiber_strain_at_one_norm_force=0.7 tendon_strain_at_one_norm_force=0.049
      PathPoint LatissimusDorsi6-P1_0: torso (-0.05959948 -0.2420611 -0.08155578)
      PathPoint LatissimusDorsi6-P2_0: torso (-0.06382898 -0.1768507 -0.1310362)
      MovingPathPoint LatissimusDorsi6-P3_0: torso socket_x_coordinate=/jointset/glenohumeral_l/shoulder_elev_l
          socket_y_coordinate=/jointset/glenohumeral_l/shoulder_elev_l
          socket_z_coordinate=/jointset/glenohumeral_l/shoulder_elev_l
        x_location: MultiplierFunction: scale=0.949945
          SimmSpline: x=(0 3.14159) y=(-0.040258 -0.031577)
        y_location: MultiplierFunction: scale=0.9499286
          SimmSpline: x=(0 3.14159) y=(-0.116638 -0.109479)
        z_location: MultiplierFunction: scale=0.9000705
          SimmSpline: x=(0 3.14159) y=(-0.146215 -0.149666)
      PathPoint LatissimusDorsi6-P4_0: humerus_l (0.004220405 -0.05000131 0.0001801436)
      PathWrap pathwrap_0: wrap_object=Thorax_l method=hybrid
    DeGrooteFregly2016Muscle PectoralisMajorClavicle_S_l: max_isometric_force=408.8 optimal_fiber_length=0.1622898
        tendon_slack_length=0.02082546 pennation_angle_at_optimal=0 ignore_tendon_compliance=true fiber_damping=0.1
        passive_fiber_strain_at_one_norm_force=0.7 tendon_strain_at_one_norm_force=0.049
      PathPoint PectoralisMajorClavicle1-P1_0: clavicle_l (0.004369077 0.006477482 -0.04265276)
      PathPoint PectoralisMajorClavicle1-P2_0: humerus_l (0.01007585 -0.04214737 0.002601036)
      PathWrap pathwrap_0: wrap_object=Thorax_l method=hybrid
    DeGrooteFregly2016Muscle PectoralisMajorThorax_I_l: max_isometric_force=571.2 optimal_fiber_length=0.2134281
        tendon_slack_length=0.05014977 pennation_angle_at_optimal=0 ignore_tendon_compliance=true fiber_damping=0.1
        passive_fiber_strain_at_one_norm_force=0.7 tendon_strain_at_one_norm_force=0.049
      PathPoint PectoralisMajorThorax2-P1_0: torso (0.05054791 -0.109875 -0.02226683)
      PathPoint PectoralisMajorThorax2-P2_0: humerus_l (0.01000067 -0.03000193 1.431538e-7)
      PathWrap pathwrap_0: wrap_object=Thorax_l method=hybrid
    DeGrooteFregly2016Muscle PectoralisMajorThorax_M_l: max_isometric_force=683.2 optimal_fiber_length=0.1972214
        tendon_slack_length=0.03418504 pennation_angle_at_optimal=0 ignore_tendon_compliance=true fiber_damping=0.1
        passive_fiber_strain_at_one_norm_force=0.7 tendon_strain_at_one_norm_force=0.049
      PathPoint PectoralisMajorThorax5-P1_0: torso (0.01856239 -0.03610092 -0.01170019)
      PathPoint PectoralisMajorThorax5-P2_0: humerus_l (0.01018597 -0.02620558 0.003151011)
      PathWrap pathwrap_0: wrap_object=Thorax_l method=hybrid
    DeGrooteFregly2016Muscle TeresMajor_l: max_isometric_force=851.2 optimal_fiber_length=0.1381005
        tendon_slack_length=0.005876616 pennation_angle_at_optimal=0 ignore_tendon_compliance=true fiber_damping=0.1
        passive_fiber_strain_at_one_norm_force=0.7 tendon_strain_at_one_norm_force=0.049
      PathPoint TeresMajor1-P1_0: scapula_l (-0.09918611 -0.1115418 0.06488889)
      PathPoint TeresMajor1-P2_0: humerus_l (0.004320387 -0.0390025 0.001700227)
      PathWrap pathwrap_1: wrap_object=Thorax_l method=hybrid
      PathWrap pathwrap_0_0: wrap_object=Tmajscapula_l method=hybrid
    DeGrooteFregly2016Muscle Infraspinatus_I_l: max_isometric_force=1037.4 optimal_fiber_length=0.06213641
        tendon_slack_length=0.07709687 pennation_angle_at_optimal=0 fiber_damping=0.1
        passive_fiber_strain_at_one_norm_force=0.7 tendon_strain_at_one_norm_force=0.049
      PathPoint Infraspinatus3-P1_0: scapula_l (-0.09411343 -0.07680839 0.07313948)
      PathPoint Infraspinatus3-P2_0: humerus_l (-0.01716277 -0.005730366 -0.02480852)
      PathWrap pathwrap_1: wrap_object=Infra_l method=hybrid
      PathWrap pathwrap_0_0: wrap_object=hheadInfra_l method=hybrid
    DeGrooteFregly2016Muscle Infraspinatus_S_l: max_isometric_force=967.4 optimal_fiber_length=0.06345331
        tendon_slack_length=0.04545366 pennation_angle_at_optimal=0 fiber_damping=0.1
        passive_fiber_strain_at_one_norm_force=0.7 tendon_strain_at_one_norm_force=0.049
      PathPoint Infraspinatus5-P1_0: scapula_l (-0.07925592 -0.03065685 0.07819577)
      PathPoint Infraspinatus5-P2_0: humerus_l (-0.01433423 0.002719195 -0.02220518)
      PathWrap pathwrap_1: wrap_object=Infra_l method=hybrid
      PathWrap pathwrap_0_0: wrap_object=hheadInfra_l method=hybrid
    DeGrooteFregly2016Muscle PectoralisMinor_l: max_isometric_force=429.8 optimal_fiber_length=0.1212552
        tendon_slack_length=0.03279937 pennation_angle_at_optimal=0 ignore_tendon_compliance=true fiber_damping=0.1
        passive_fiber_strain_at_one_norm_force=0.7 tendon_strain_at_one_norm_force=0.049
      PathPoint PectoralisMinor3-P1_0: torso (0.0453417 -0.09880603 -0.08206533)
      PathPoint PectoralisMinor3-P2_0: scapula_l (0.0103307 -0.03328844 0.02064811)
      PathWrap pathwrap_0: wrap_object=Thorax_l method=hybrid
    DeGrooteFregly2016Muscle TeresMinor_l: max_isometric_force=695.8 optimal_fiber_length=0.0506534
        tendon_slack_length=0.04696951 pennation_angle_at_optimal=0 fiber_damping=0.1
        passive_fiber_strain_at_one_norm_force=0.7 tendon_strain_at_one_norm_force=0.049
      PathPoint TeresMinor2-P1_0: scapula_l (-0.08014871 -0.06274828 0.03805874)
      PathPoint TeresMinor2-P2_0: humerus_l (-0.01587076 -0.009360632 -0.01085047)
      PathWrap pathwrap_0: wrap_object=hheadsupraTminor_l method=hybrid
    DeGrooteFregly2016Muscle Subscapularis_S_l: max_isometric_force=540.4 optimal_fiber_length=0.0627935
        tendon_slack_length=0.05480497 pennation_angle_at_optimal=0.08726646 fiber_damping=0.1
        passive_fiber_strain_at_one_norm_force=0.7 tendon_strain_at_one_norm_force=0.049
      PathPoint Subscapularis3-P1_0: scapula_l (-0.07484805 -0.02970679 0.0812458)
      PathPoint Subscapularis3-P2_0: humerus_l (0.01800128 -0.0002300721 0.01200073)
      PathWrap pathwrap_1: wrap_object=Subscapuralis_l method=hybrid
      PathWrap pathwrap_0_0: wrap_object=hhead_l method=hybrid
    DeGrooteFregly2016Muscle Subscapularis_M_l: max_isometric_force=609 optimal_fiber_length=0.06905173
        tendon_slack_length=0.05104631 pennation_angle_at_optimal=0.08726646 fiber_damping=0.1
        passive_fiber_strain_at_one_norm_force=0.7 tendon_strain_at_one_norm_force=0.049
      PathPoint Subscapularis4-P1_0: scapula_l (-0.0793889 -0.05216513 0.06727319)
      PathPoint Subscapularis4-P2_0: humerus_l (0.01639217 0.0009578062 0.0194363)
      PathWrap pathwrap_1: wrap_object=Subscapuralis_l method=hybrid
      PathWrap pathwrap_0_0: wrap_object=hhead_l method=hybrid
    DeGrooteFregly2016Muscle Subscapularis_I_l: max_isometric_force=854 optimal_fiber_length=0.0673368
        tendon_slack_length=0.05510224 pennation_angle_at_optimal=0 fiber_damping=0.1
        passive_fiber_strain_at_one_norm_force=0.7 tendon_strain_at_one_norm_force=0.049
      PathPoint Subscapularis9-P1_0: scapula_l (-0.09031356 -0.09276839 0.0768377)
      PathPoint Subscapularis9-P2_0: humerus_l (0.01098459 -0.003407587 0.01952701)
      PathWrap pathwrap_1: wrap_object=Subscapuralis_l method=hybrid
      PathWrap pathwrap_0_0: wrap_object=hhead_l method=hybrid
    DeGrooteFregly2016Muscle Supraspinatus_P_l: max_isometric_force=326.2 optimal_fiber_length=0.05473494
        tendon_slack_length=0.02315353 pennation_angle_at_optimal=0 fiber_damping=0.1
        passive_fiber_strain_at_one_norm_force=0.7 tendon_strain_at_one_norm_force=0.049
      PathPoint Supraspinatus2-P1_0: scapula_l (-0.0575015 -0.001311018 0.04450998)
      PathPoint Supraspinatus2-P2_0: humerus_l (0.01017054 0.009568245 -0.02005141)
      PathWrap pathwrap_0: wrap_object=hheadsupraTminor_l method=hybrid
    DeGrooteFregly2016Muscle Supraspinatus_A_l: max_isometric_force=543.2 optimal_fiber_length=0.05978058
        tendon_slack_length=0.02851074 pennation_angle_at_optimal=0 fiber_damping=0.1
        passive_fiber_strain_at_one_norm_force=0.7 tendon_strain_at_one_norm_force=0.049
      PathPoint Supraspinatus4-P1_0: scapula_l (-0.0465422 0.00128788 0.06232636)
      PathPoint Supraspinatus4-P2_0: humerus_l (0.0177812 0.01764106 -0.009650326)
      PathWrap pathwrap_1: wrap_object=Thorax_l method=hybrid
      PathWrap pathwrap_0_0: wrap_object=hheadsupraTminor_l method=hybrid
    DeGrooteFregly2016Muscle TRI_long_l: max_isometric_force=1129 optimal_fiber_length=0.1076582
        tendon_slack_length=0.2156921 pennation_angle_at_optimal=0.174533 fiber_damping=0.1
        passive_fiber_strain_at_one_norm_force=0.7 tendon_strain_at_one_norm_force=0.049
      PathPoint TRI_long2-P1_0: ulna_l (-0.01843091 0.01459532 -0.002153331)
      PathPoint TRI_long2-P2_0: scapula_l (-0.03999377 -0.04930804 0.01162961)
      PathWrap pathwrap_0: wrap_object=TRI_l method=hybrid
    DeGrooteFregly2016Muscle TRI_med_l: max_isometric_force=1077 optimal_fiber_length=0.1002282
        tendon_slack_length=0.06506814 pennation_angle_at_optimal=0.145444 fiber_damping=0.1
        passive_fiber_strain_at_one_norm_force=0.7 tendon_strain_at_one_norm_force=0.049
      PathPoint TRI_med-P1_0: ulna_l (-0.01843091 0.01459532 -0.002153331)
      PathPoint TRI_med-P2_0: humerus_l (-0.00838046 -0.1369579 0.009060625)
      PathWrap pathwrap_0: wrap_object=TRI_l method=hybrid
    DeGrooteFregly2016Muscle TRI_lat_l: max_isometric_force=1144 optimal_fiber_length=0.1102308
        tendon_slack_length=0.07014689 pennation_angle_at_optimal=0.1832595 fiber_damping=0.1
        passive_fiber_strain_at_one_norm_force=0.7 tendon_strain_at_one_norm_force=0.049
      PathPoint TRI_lat-P1_0: ulna_l (-0.01843091 0.01459532 -0.002153331)
      PathPoint TRI_lat-P2_0: humerus_l (-0.005990254 -0.1264676 -0.004280112)
      PathWrap pathwrap_0: wrap_object=TRI_l method=hybrid
    DeGrooteFregly2016Muscle BIC_long_l: max_isometric_force=347 optimal_fiber_length=0.1280487
        tendon_slack_length=0.2314193 pennation_angle_at_optimal=0 fiber_damping=0.1
        passive_fiber_strain_at_one_norm_force=0.7 tendon_strain_at_one_norm_force=0.049
      PathPoint BIC_long-P1_0: scapula_l (-0.02145714 -0.01551257 0.01632327)
      PathPoint BIC_long-P2_0: humerus_l (0.01183157 0.02814345 -0.02003938)
      MovingPathPoint BIC_long-P3_0: radius_l socket_x_coordinate=/jointset/radioulnar_l/pro_sup_l
          socket_y_coordinate=/jointset/radioulnar_l/pro_sup_l socket_z_coordinate=/jointset/radioulnar_l/pro_sup_l
        x_location: MultiplierFunction: scale=0.9700475
          SimmSpline: x=(-1.57561 1.57823) y=(-0.0115 0.01096)
        y_location: MultiplierFunction: scale=0.9700475
          PiecewiseLinearFunction: x=(-1.57561 0 1.57561) y=(-0.0282 -0.03655 -0.0392)
        z_location: MultiplierFunction: scale=0.9700475
          SimmSpline: x=(-1.57561 0.0866167 1.57561) y=(0.01 0.01358 0.01083)
      PathPoint BIC_long-P4_0: radius_l (-0.001940151 -0.0363768 0.001940338)
      PathWrap pathwrap_1: wrap_object=hhead_l method=hybrid
      PathWrap pathwrap_0_0: wrap_object=BIC_l method=hybrid
    DeGrooteFregly2016Muscle BIC_brevis_l: max_isometric_force=495 optimal_fiber_length=0.1148211
        tendon_slack_length=0.1901306 pennation_angle_at_optimal=0 fiber_damping=0.1
        passive_fiber_strain_at_one_norm_force=0.7 tendon_strain_at_one_norm_force=0.049
      PathPoint BIC_brevis2-P1_0: scapula_l (0.00906979 -0.03631141 0.02181619)
      MovingPathPoint BIC_brevis-P2_0: radius_l socket_x_coordinate=/jointset/radioulnar_l/pro_sup_l
          socket_y_coordinate=/jointset/radioulnar_l/pro_sup_l socket_z_coordinate=/jointset/radioulnar_l/pro_sup_l
        x_location: MultiplierFunction: scale=0.9700475
          SimmSpline: x=(-1.57561 1.57823) y=(-0.0115 0.01096)
        y_location: MultiplierFunction: scale=0.9700475
          PiecewiseLinearFunction: x=(-1.57561 0 1.57561) y=(-0.0282 -0.03655 -0.0392)
        z_location: MultiplierFunction: scale=0.9700475
          SimmSpline: x=(-1.57561 0.0866167 1.57561) y=(0.01 0.01358 0.01083)
      PathPoint BIC_brevis-P3_0: radius_l (-0.001940095 -0.03637678 0.001940095)
      PathWrap pathwrap_0: wrap_object=BIC_l method=hybrid
    ObjectGroup R_hip_abd
    ObjectGroup R_hip_flex
    ObjectGroup R_hip_inrot
    ObjectGroup R_hip_exrot
    ObjectGroup R_hip_ext
    ObjectGroup R_hip_add
    ObjectGroup R_knee_bend
    ObjectGroup R_knee_ext
    ObjectGroup R_ankle_pf
    ObjectGroup R_inverter
    ObjectGroup R_ankle_df
    ObjectGroup R_everter
    ObjectGroup L_hip_abd
    ObjectGroup L_hip_flex
    ObjectGroup L_hip_inrot
    ObjectGroup L_hip_exrot
    ObjectGroup L_hip_ext
    ObjectGroup L_hip_add
    ObjectGroup L_knee_bend
    ObjectGroup L_knee_ext
    ObjectGroup L_ankle_pf
    ObjectGroup L_inverter
    ObjectGroup L_ankle_df
    ObjectGroup L_everter
    ObjectGroup back_ext
    ObjectGroup back_rlb
    ObjectGroup back_introt
    ObjectGroup back_llb
    ObjectGroup back_extrot
    ObjectGroup back_flex
  MarkerSet:
    Marker RASI: pelvis (0.008762871 0.01377339 0.1252911)
    Marker LASI: pelvis (0.006143326 0.009980113 -0.1310262)
    Marker CLAV: torso (0.07389266 -0.01067553 -0.01261955)
    Marker RSHO: torso (-0.01976027 0.01789484 0.1749357)
    Marker LSHO: torso (-0.01690845 0.01789484 -0.1694192)
    Marker RKNE: femur_r (0.02006501 -0.4173163 0.05513063)
    Marker RKNE_med: femur_r (-0.02716563 -0.440216 -0.0506508)
    Marker RTHI1: femur_r (0.06521318 -0.1114077 0.1120796)
    Marker RTHI2: femur_r (0.003320801 -0.1185134 0.1334152)
    Marker RTHI3: femur_r (0.04041395 -0.1622775 0.1208044)
    Marker RANK: tibia_r (-0.01253531 -0.4121093 0.04811968)
    Marker RANK_med: tibia_r (0.0003546329 -0.3929537 -0.03391232)
    Marker RTIB1: tibia_r (0.01813524 -0.1967338 0.07286868)
    Marker RTIB2: tibia_r (-0.05395098 -0.2054163 0.08296131)
    Marker RTIB3: tibia_r (-0.0114094 -0.2436728 0.07699552)
    Marker LKNE: femur_l (0.02115601 -0.4125421 -0.04943929)
    Marker LKNE_med: femur_l (0.005911145 -0.4177621 0.0440494)
    Marker LTHI1: femur_l (0.1051451 -0.1944703 -0.04354274)
    Marker LTHI2: femur_l (0.06330602 -0.1948894 -0.09932725)
    Marker LTHI3: femur_l (0.08473438 -0.2452909 -0.07051976)
    Marker LANK: tibia_l (-0.007080103 -0.4058654 -0.05203657)
    Marker LANK_med: tibia_l (-0.01267525 -0.3936136 0.03296641)
    Marker LTIB1: tibia_l (0.02623082 -0.206756 -0.05459831)
    Marker LTIB2: tibia_l (-0.03490818 -0.2091925 -0.08166404)
    Marker LTIB3: tibia_l (0.0002754598 -0.2552029 -0.06855732)
    Marker RPSI: pelvis (-0.165599 0.03446201 0.02485997)
    Marker LPSI: pelvis (-0.1655745 0.03976524 -0.02333465)
    Marker RELB: humerus_r (-0.02347941 -0.2927387 -0.01170465)
    Marker LELB: humerus_l (-0.03154078 -0.3140619 0.0163705)
    Marker RW1: radius_r (-0.005009293 -0.2053322 0.04423164)
    Marker RW2: ulna_r (-0.02827807 -0.2142705 0.03914507)
    Marker LW1: radius_l (-0.001206421 -0.2183523 -0.0370764)
    Marker LW2: ulna_l (-0.03689109 -0.224503 -0.04004729)
    Marker hum_l2: humerus_l (-0.0260907 -0.1484488 -0.03112593)
    Marker hum_r2: humerus_r (-0.02283712 -0.1423694 0.02015541)
    Marker rad_l2: radius_l (-0.01215158 -0.09542098 0.008926213)
    Marker rad_r2: radius_r (-0.01181863 -0.1202886 -0.003224079)
    Marker LH: hand_l (-0.01641184 -0.04633394 0.009619696)
    Marker RH: hand_r (-0.01973079 -0.02753184 0.0001210377)
    Marker Foot_r1: calcn_r (-0.01242661 0.04712014 0.003372451)
    Marker Foot_r2: calcn_r (-0.01901277 0.01302153 0.00761759)
    Marker Foot_r3: calcn_r (0.04484858 0.027582 0.03535122)
    Marker Foot_r4: forefoot_r (-0.02236722 -0.002875031 0.04607593)
    Marker Foot_r5: forefoot_r (0.04647907 -0.007447853 0.06577853)
    Marker Foot_r6: toes_r (0.02264763 0.02324956 0.01591996)
    Marker Foot_r7: toes_r (0.05369102 0.01861586 -0.02435677)
    Marker Foot_r8: forefoot_r (0.08078574 0.001870196 -0.03713958)
    Marker Foot_r9: forefoot_r (0.02849789 0.02343617 -0.03137838)
    Marker Foot_r10: calcn_r (0.0535256 0.03909548 -0.03972037)
    Marker Foot_l1: calcn_l (-0.02228468 0.0403714 -0.006913784)
    Marker Foot_l2: calcn_l (-0.02534942 0.007274217 -0.01020576)
    Marker Foot_l3: calcn_l (0.04416436 0.02840796 -0.03689327)
    Marker Foot_l4: forefoot_l (-0.0206478 0.0002024851 -0.04389372)
    Marker Foot_l5: forefoot_l (0.05514101 -0.005327901 -0.05421513)
    Marker Foot_l6: toes_l (0.01423896 0.02204451 -0.002952386)
    Marker Foot_l7: toes_l (0.04250901 0.01657066 0.03596706)
    Marker Foot_l8: forefoot_l (0.07037393 0.004544138 0.0443498)
    Marker Foot_l9: forefoot_l (0.008010992 0.01371268 0.04145339)
    Marker Foot_l10: calcn_l (0.03527088 0.03606314 0.03620474)
  ContactGeometrySet:
    ContactHalfSpace floor: socket_frame=/ground location=(0 0 0) orientation=(0 0 -1.570796)
    ContactSphere heel_r: socket_frame=/bodyset/calcn_r location=(0.01 0.006922918 -0.0049972) radius=0.032
    ContactSphere hindfoot_lat_r: socket_frame=/bodyset/calcn_r location=(0.06 0.01192292 0.020001) radius=0.032
    ContactSphere forefoot_lat_r: socket_frame=/bodyset/forefoot_r location=(0.06397017 -0.01140601 0.02274865)
        radius=0.023
    ContactSphere forefoot_med_r: socket_frame=/bodyset/forefoot_r location=(0.06397017 -0.01140601 -0.008434048)
        radius=0.021
    ContactSphere hallux_r: socket_frame=/bodyset/toes_r location=(0.053154 -0.001538541 -0.0034173) radius=0.016
    ContactSphere heel_l: socket_frame=/bodyset/calcn_l location=(0.01 0.006922918 0.0049972) radius=0.032
    ContactSphere hindfoot_lat_l: socket_frame=/bodyset/calcn_l location=(0.06 0.01192292 -0.020001) radius=0.032
    ContactSphere forefoot_lat_l: socket_frame=/bodyset/forefoot_l location=(0.06397017 -0.01140601 -0.02274865)
        radius=0.023
    ContactSphere forefoot_med_l: socket_frame=/bodyset/forefoot_l location=(0.06397017 -0.01140601 0.008434048)
        radius=0.021
    ContactSphere hallux_l: socket_frame=/bodyset/toes_l location=(0.053154 -0.001538541 0.0034173) radius=0.016
