# OpenSim document version 40000
AnalyzeTool dummy_motion:
  model_file: C:\Users\u0150099\Documents\PredSim_dev\Subjects\test_1\test_1.osim
  replace_force_set: false
  results_directory: C:\Users\u0150099\Documents\PredSim_dev\Subjects\test_1\MuscleAnalysis
  output_precision: 8
  initial_time: 0.01
  final_time: 0.1
  solve_for_equilibrium_for_auxiliary_states: false
  maximum_number_of_integrator_steps: 20000
  maximum_integrator_step_size: 1
  minimum_integrator_step_size: 1e-8
  integrator_error_tolerance: 1e-5
  coordinates_file: C:\Users\u0150099\Documents\PredSim_dev\Subjects\test_1\MuscleAnalysis\dummy_motion.mot
  lowpass_cutoff_frequency_for_coordinates: -1
  AnalysisSet Analyses:
    MuscleAnalysis: start_time=0.01 end_time=0.1 step_interval=1 in_degrees=true muscle_list=all
        moment_arm_coordinate_list=(hip_flexion_l hip_adduction_l hip_rotation_l hip_flexion_r hip_adduction_r hip_rotation_r knee_angle_l knee_angle_r ankle_angle_l ankle_angle_r subtalar_angle_l subtalar_angle_r mtp_angle_l mtp_angle_r lumbar_extension lumbar_bending lumbar_rotation arm_flex_l arm_add_l arm_rot_l arm_flex_r arm_add_r arm_rot_r elbow_flex_l elbow_flex_r)
        compute_moments=true
